<Lems xmlns="http://www.neuroml.org/lems/0.7.2" xmlns:xsi="http://www.w3.org/2001/XMLSchema-instance" xsi:schemaLocation="http://www.neuroml.org/lems/0.7.2  https://raw.githubusercontent.com/LEMS/LEMS/development/Schemas/LEMS/LEMS_v0.7.2.xsd">

    <Target component="sim1" reportFile="/home/rokas/Thalamocortical/neuroConstruct/pythonScripts/../simulations/C3D_285/simulator.props" timesFile="/home/rokas/Thalamocortical/neuroConstruct/pythonScripts/../simulations/C3D_285/time.dat"/>

        <!--Include standard NeuroML 2 ComponentType definitions-->

    <Include file="Cells.xml"/>
    <Include file="Networks.xml"/>
    <Include file="Simulation.xml"/>

        <!--Include the generated NeuroML 2 files-->

        <!--   Channel/synapse files-->
    <Include file="ar.channel.nml"/>
    <Include file="ar__m00_25.channel.nml"/>
    <Include file="ar__m00_25.channel.nml"/>
    <Include file="cad.nml"/>
    <Include file="cad__beta0_01__phi26000.nml"/>
    <Include file="cad__beta0_05__phi52000.nml"/>
    <Include file="cal.channel.nml"/>
    <Include file="cat.channel.nml"/>
    <Include file="k2.channel.nml"/>
    <Include file="ka.channel.nml"/>
    <Include file="kahp.channel.nml"/>
    <Include file="kc.channel.nml"/>
    <Include file="kdr.channel.nml"/>
    <Include file="km.channel.nml"/>
    <Include file="naf.channel.nml"/>
    <Include file="naf__a0__b0__c0__d0__fastNa_shiftmin3_5.channel.nml"/>
    <Include file="naf__a0__b0__c0__d0__fastNa_shiftmin3_5.channel.nml"/>
    <Include file="naf__a0__b0__c0__d0__fastNa_shiftmin3_5.channel.nml"/>
    <Include file="naf__a0__b0__c0__d0__fastNa_shiftmin3_5.channel.nml"/>
    <Include file="nap.channel.nml"/>
    <Include file="pas.channel.nml"/>
        <!--   Cell files-->
    <Include file="L23PyrRS.cell.nml"/>
        <!--   Network file-->
    <Include file="Thalamocortical.net.nml"/>

        <!--Note: this could be: Simulation id="sim1" ... , but Component type="Simulation" ...
        is used to allow validation of this file according to the LEMS schema specified above...-->
    <Component type="Simulation" id="sim1" length="800.0ms" step="0.025ms" target="network_Thalamocortical">

        <Display id="GraphWin_53" title="Thalamocortical: Cell1-supppyrRS-FigA1RS, CGsuppyrRS, cad:CONC:ca, cad:CONC:ca" xmin="-80.0" xmax="880.0" ymin="-1.20000004E-4" ymax="0.00132" timeScale="1ms">
            <Line id="cad_CONC_ca" timeScale="1ms" quantity="CGsuppyrRS/0/L23PyrRS/79/caConc" scale="1 mol_per_cm3" color="#000000"/>

            <Line id="cad_CONC_ca" timeScale="1ms" quantity="CGsuppyrRS/0/L23PyrRS/0/caConc" scale="1 mol_per_cm3" color="#ff0000"/>
        </Display>

        <Display id="CGsuppyrRS_v" title="Thalamocortical: Cell1-supppyrRS-FigA1RS, CGsuppyrRS, VOLTAGE" xmin="-80.0" xmax="880.0" ymin="-92.0" ymax="52.0" timeScale="1ms">
            <Line id="v" timeScale="1ms" quantity="CGsuppyrRS/0/L23PyrRS/0/v" scale="1 mV" color="#000000"/>
        </Display>

        <Display id="GraphWin_1" title="Thalamocortical: Cell1-supppyrRS-FigA1RS, CGsuppyrRS, VOLTAGE" xmin="-80.0" xmax="880.0" ymin="-92.0" ymax="52.0" timeScale="1ms">
            <Line id="v" timeScale="1ms" quantity="CGsuppyrRS/0/L23PyrRS/142/v" scale="1 mV" color="#000000"/>
        </Display>

        <OutputFile id="CGsuppyrFRB_v_11_0_79_OF" fileName="/home/rokas/Thalamocortical/neuroConstruct/pythonScripts/../simulations/C3D_285/CGsuppyrRS_0.79.cad_CONC_ca.dat">
            <OutputColumn id="caConc" quantity="CGsuppyrRS/0/L23PyrRS/79/caConc"/>
        </OutputFile>

        <OutputFile id="CGsuppyrFRB_v_2_0_0_OF" fileName="/home/rokas/Thalamocortical/neuroConstruct/pythonScripts/../simulations/C3D_285/CGsuppyrRS_0.0.cad_CONC_ca.dat">
            <OutputColumn id="caConc" quantity="CGsuppyrRS/0/L23PyrRS/0/caConc"/>
        </OutputFile>

        <OutputFile id="CGsuppyrRS_v_0_0_OF" fileName="/home/rokas/Thalamocortical/neuroConstruct/pythonScripts/../simulations/C3D_285/CGsuppyrRS_0.0.dat">
            <OutputColumn id="v" quantity="CGsuppyrRS/0/L23PyrRS/0/v"/>
        </OutputFile>

        <OutputFile id="Var_1_0_142_OF" fileName="/home/rokas/Thalamocortical/neuroConstruct/pythonScripts/../simulations/C3D_285/CGsuppyrRS_0.142.dat">
            <OutputColumn id="v" quantity="CGsuppyrRS/0/L23PyrRS/142/v"/>
        </OutputFile>
    </Component>

</Lems>
