<Lems>

    <!--

        This LEMS file has been automatically generated using PyNeuroML v0.1.12 (libNeuroML v0.2.15)

     -->

    <!-- Specify which component to run -->
    <Target component="Sim_Default_Simulation_Configuration"/>

    <!-- Include core NeuroML2 ComponentType definitions -->
    <Include file="Cells.xml"/>
    <Include file="Networks.xml"/>
    <Include file="Simulation.xml"/>

    <Include file="Default_Simulation_Configuration.net.nml"/>
    <Include file="ar.channel.nml"/>
    <Include file="ar__m00_25.channel.nml"/>
    <Include file="cad.nml"/>
    <Include file="cad__beta0_03__phi300000.nml"/>
    <Include file="cal.channel.nml"/>
    <Include file="cat.channel.nml"/>
    <Include file="cat_a.channel.nml"/>
    <Include file="k2.channel.nml"/>
    <Include file="ka.channel.nml"/>
    <Include file="ka_ib.channel.nml"/>
    <Include file="kahp.channel.nml"/>
    <Include file="kahp_deeppyr.channel.nml"/>
    <Include file="kahp_slower.channel.nml"/>
    <Include file="kc.channel.nml"/>
    <Include file="kc_fast.channel.nml"/>
    <Include file="kdr.channel.nml"/>
    <Include file="kdr_fs.channel.nml"/>
    <Include file="km.channel.nml"/>
    <Include file="naf.channel.nml"/>
    <Include file="naf2.channel.nml"/>
    <Include file="naf_tcr.channel.nml"/>
    <Include file="nap.channel.nml"/>
    <Include file="napf.channel.nml"/>
    <Include file="napf_spinstell.channel.nml"/>
    <Include file="napf_tcr.channel.nml"/>
    <Include file="pas.channel.nml"/>
    <Include file="TestSeg_all.cell.nml"/>
    <Include file="ar__m00_25.channel.nml"/>
    <Include file="cad__beta0_03__phi300000.nml"/>
    <Include file="cal.channel.nml"/>
    <Include file="cat.channel.nml"/>
    <Include file="cat_a.channel.nml"/>
    <Include file="k2.channel.nml"/>
    <Include file="ka.channel.nml"/>
    <Include file="ka_ib.channel.nml"/>
    <Include file="kahp.channel.nml"/>
    <Include file="kahp_deeppyr.channel.nml"/>
    <Include file="kahp_slower.channel.nml"/>
    <Include file="kc.channel.nml"/>
    <Include file="kc_fast.channel.nml"/>
    <Include file="kdr.channel.nml"/>
    <Include file="kdr_fs.channel.nml"/>
    <Include file="km.channel.nml"/>
    <Include file="naf.channel.nml"/>
    <Include file="naf2.channel.nml"/>
    <Include file="naf_tcr.channel.nml"/>
    <Include file="nap.channel.nml"/>
    <Include file="napf.channel.nml"/>
    <Include file="napf_spinstell.channel.nml"/>
    <Include file="napf_tcr.channel.nml"/>
    <Include file="pas.channel.nml"/>

    <Simulation id="Sim_Default_Simulation_Configuration" length="100ms" step="0.005ms" target="Default_Simulation_Configuration" seed="12345">  <!-- Note seed: ensures same random numbers used every run -->

        <Display id="DispPop__CG_CML" title="Membrane potentials of cells in CG_CML" timeScale="1ms" xmin="-10.0" xmax="110.0" ymin="-90" ymax="50">
            <Line id="CG_CML[0]: v" quantity="CG_CML/0/TestSeg_all/v" scale="1mV" color="#f7697f" timeScale="1ms"/>
        </Display>

        <OutputFile id="Volts_file__CG_CML" fileName="Sim_Default_Simulation_Configuration.CG_CML.v.dat">
            <OutputColumn id="v_CG_CML_0_TestSeg_all_v" quantity="CG_CML/0/TestSeg_all/v"/>
        </OutputFile>

    </Simulation>

</Lems>
