<neuroml xmlns="http://www.neuroml.org/schema/neuroml2"  xmlns:xs="http://www.w3.org/2001/XMLSchema" xmlns:xsi="http://www.w3.org/2001/XMLSchema-instance" xsi:schemaLocation="http://www.neuroml.org/schema/neuroml2 https://raw.github.com/NeuroML/NeuroML2/development/Schemas/NeuroML2/NeuroML_v2beta4.xsd" id="DeepLTSInter">
    <include href="../channels/ar__m00_25.channel.nml"></include>
    <include href="../channels/cad__beta0_02__phi260000.nml"></include>
    <include href="../channels/cad__beta0_05__phi520000.nml"></include>
    <include href="../channels/cal.channel.nml"></include>
    <include href="../channels/cat_a.channel.nml"></include>
    <include href="../channels/k2.channel.nml"></include>
    <include href="../channels/ka.channel.nml"></include>
    <include href="../channels/kahp_slower.channel.nml"></include>
    <include href="../channels/kc_fast.channel.nml"></include>
    <include href="../channels/kdr_fs.channel.nml"></include>
    <include href="../channels/km.channel.nml"></include>
    <include href="../channels/naf2__a0__b0__c0__d0__fastNa_shiftmin2_5.channel.nml"></include>
    <include href="../channels/nap.channel.nml"></include>
    <include href="../channels/pas.channel.nml"></include>
    <cell id="DeepLTSInter">
        <notes>Cell: deepLTS_0 exported from NEURON ModelView</notes>
        <morphology id="morphology_DeepLTSInter">
            <segment id="0" name="Seg0_comp_1">
                <proximal x="0.000000e+00" y="0.000000e+00" z="0.000000e+00" diameter="15.0"/>
                <distal x="0.000000e+00" y="1.000000e+01" z="0.000000e+00" diameter="15.0"/>
            </segment>
            <segment id="1" name="Seg1_comp_1">
                <parent segment="0" fractionAlong="1"/>
                <distal x="-4.371139e-07" y="2.000000e+01" z="0.000000e+00" diameter="15.0"/>
            </segment>
            <segment id="106" name="Seg0_comp_54">
                <parent segment="0" fractionAlong="0.0"/>
                <proximal x="4.371139e-07" y="0.000000e+00" z="0.000000e+00" diameter="1.4"/>
                <distal x="-3.774500e-07" y="-2.500000e+01" z="0.000000e+00" diameter="1.4"/>
            </segment>
            <segment id="107" name="Seg1_comp_54">
                <parent segment="106" fractionAlong="1"/>
                <distal x="-1.192014e-06" y="-5.000000e+01" z="0.000000e+00" diameter="1.4"/>
            </segment>
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            <segmentGroup neuroLexId="sao864921383" id="comp_1">
                <property tag="numberInternalDivisions" value="2"/>
                <member segment="0"/>
                <member segment="1"/>
            </segmentGroup>
            <segmentGroup neuroLexId="sao864921383" id="comp_54">
                <property tag="numberInternalDivisions" value="54"/>
                <member segment="106"/>
                <member segment="107"/>
            </segmentGroup>
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            <segmentGroup id="ModelViewParmSubset_1">
                <include segmentGroup="comp_1"/>
                <include segmentGroup="comp_41"/>
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            </segmentGroup>
            <segmentGroup id="ModelViewParmSubset_4">
                <include segmentGroup="comp_1"/>
                <include segmentGroup="comp_41"/>
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            </segmentGroup>
            <segmentGroup id="OneSecGrp_SectionRef_1">
                <include segmentGroup="comp_1"/>
            </segmentGroup>
            <segmentGroup neuroLexId="GO:0043025" id="soma_group">
                <include segmentGroup="comp_1"/>
            </segmentGroup>
            <segmentGroup id="prox_dend_soma">
                <include segmentGroup="comp_1"/>
                <include segmentGroup="comp_41"/>
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            </segmentGroup>
            <segmentGroup id="prox_mid_dends">
                <include segmentGroup="comp_1"/>
                <include segmentGroup="comp_41"/>
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            </segmentGroup>
            <segmentGroup id="ModelViewParmSubset_2">
                <include segmentGroup="comp_54"/>
                <include segmentGroup="comp_55"/>
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            </segmentGroup>
            <segmentGroup neuroLexId="GO:0030424" id="axon_group">
                <include segmentGroup="comp_54"/>
                <include segmentGroup="comp_55"/>
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            </segmentGroup>
            <segmentGroup id="prox_axon">
                <include segmentGroup="comp_54"/>
            </segmentGroup>
            <segmentGroup neuroLexId="GO:0030425" id="dendrite_group">
                <include segmentGroup="comp_41"/>
                <include segmentGroup="comp_28"/>
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            </segmentGroup>
            <segmentGroup id="ModelViewParmSubset_3">
                <include segmentGroup="comp_41"/>
                <include segmentGroup="comp_28"/>
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            </segmentGroup>
            <segmentGroup id="prox_dend">
                <include segmentGroup="comp_41"/>
                <include segmentGroup="comp_28"/>
                <include segmentGroup="comp_15"/>
                <include segmentGroup="comp_2"/>
            </segmentGroup>
            <segmentGroup id="mid_dend">
                <include segmentGroup="comp_43"/>
                <include segmentGroup="comp_42"/>
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            </segmentGroup>
            <segmentGroup id="ModelViewParmSubset_5">
                <include segmentGroup="comp_46"/>
                <include segmentGroup="comp_45"/>
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            </segmentGroup>
            <segmentGroup id="gap_dend">
                <include segmentGroup="comp_46"/>
                <include segmentGroup="comp_45"/>
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            </segmentGroup>
            <segmentGroup id="mid_tip_dends">
                <include segmentGroup="comp_46"/>
                <include segmentGroup="comp_45"/>
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            </segmentGroup>
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        </morphology>
        <biophysicalProperties id="biophys">
            <membraneProperties>
                <channelDensity id="ar_ModelViewParmSubset_1" ionChannel="ar__m00_25" condDensity="0.0 mS_per_cm2" erev="-40.0 mV" segmentGroup="ModelViewParmSubset_1" ion="ar"/>
                <channelDensity id="cal_ModelViewParmSubset_4" ionChannel="cal" condDensity="0.1 mS_per_cm2" erev="125.0 mV" segmentGroup="ModelViewParmSubset_4" ion="ca"/>
                <channelDensity id="cal_ModelViewParmSubset_5" ionChannel="cal" condDensity="0.2 mS_per_cm2" erev="125.0 mV" segmentGroup="ModelViewParmSubset_5" ion="ca"/>
                <channelDensity id="cat_a_ModelViewParmSubset_5" ionChannel="cat_a" condDensity="2.0 mS_per_cm2" erev="125.0 mV" segmentGroup="ModelViewParmSubset_5" ion="cat_a"/>
                <channelDensity id="cat_a_ModelViewParmSubset_4" ionChannel="cat_a" condDensity="0.05 mS_per_cm2" erev="125.0 mV" segmentGroup="ModelViewParmSubset_4" ion="cat_a"/>
                <channelDensity id="k2_all" ionChannel="k2" condDensity="0.5 mS_per_cm2" erev="-100.0 mV" ion="k"/>
                <channelDensity id="ka_all" ionChannel="ka" condDensity="1.0 mS_per_cm2" erev="-100.0 mV" ion="k"/>
                <channelDensity id="kahp_slower_ModelViewParmSubset_1" ionChannel="kahp_slower" condDensity="0.1 mS_per_cm2" erev="-100.0 mV" segmentGroup="ModelViewParmSubset_1" ion="k"/>
                <channelDensity id="kc_fast_ModelViewParmSubset_1" ionChannel="kc_fast" condDensity="25.0 mS_per_cm2" erev="-100.0 mV" segmentGroup="ModelViewParmSubset_1" ion="k"/>
                <channelDensity id="kdr_fs_ModelViewParmSubset_4" ionChannel="kdr_fs" condDensity="100.0 mS_per_cm2" erev="-100.0 mV" segmentGroup="ModelViewParmSubset_4" ion="k"/>
                <channelDensity id="kdr_fs_ModelViewParmSubset_5" ionChannel="kdr_fs" condDensity="10.0 mS_per_cm2" erev="-100.0 mV" segmentGroup="ModelViewParmSubset_5" ion="k"/>
                <channelDensity id="kdr_fs_ModelViewParmSubset_2" ionChannel="kdr_fs" condDensity="400.0 mS_per_cm2" erev="-100.0 mV" segmentGroup="ModelViewParmSubset_2" ion="k"/>
                <channelDensity id="km_ModelViewParmSubset_1" ionChannel="km" condDensity="0.5 mS_per_cm2" erev="-100.0 mV" segmentGroup="ModelViewParmSubset_1" ion="k"/>
                <channelDensity id="naf2_ModelViewParmSubset_5" ionChannel="naf2__a0__b0__c0__d0__fastNa_shiftmin2_5" condDensity="10.0 mS_per_cm2" erev="50.0 mV" segmentGroup="ModelViewParmSubset_5" ion="na"/>
                <channelDensity id="naf2_ModelViewParmSubset_2" ionChannel="naf2__a0__b0__c0__d0__fastNa_shiftmin2_5" condDensity="400.0 mS_per_cm2" erev="50.0 mV" segmentGroup="ModelViewParmSubset_2" ion="na"/>
                <channelDensity id="naf2_ModelViewParmSubset_4" ionChannel="naf2__a0__b0__c0__d0__fastNa_shiftmin2_5" condDensity="60.0 mS_per_cm2" erev="50.0 mV" segmentGroup="ModelViewParmSubset_4" ion="na"/>
                <channelDensity id="nap_ModelViewParmSubset_1" ionChannel="nap" condDensity="0.0 mS_per_cm2" erev="50.0 mV" segmentGroup="ModelViewParmSubset_1" ion="na"/>
                <channelDensity id="pas_ModelViewParmSubset_2" ionChannel="pas" condDensity="1.0 mS_per_cm2" erev="-65.0 mV" segmentGroup="ModelViewParmSubset_2" ion="non_specific"/>
                <channelDensity id="pas_ModelViewParmSubset_1" ionChannel="pas" condDensity="0.04 mS_per_cm2" erev="-65.0 mV" segmentGroup="ModelViewParmSubset_1" ion="non_specific"/>
                <spikeThresh value="0.0 mV"/>
                <specificCapacitance value="1.0 uF_per_cm2"/>
                <initMembPotential value="-65.0 mV"/>
            </membraneProperties>
            <intracellularProperties>
                <species segmentGroup="ModelViewParmSubset_3" id="ca" concentrationModel="cad__beta0_05__phi520000" ion="ca" initialConcentration="1.0E-8 mol_per_cm3" initialExtConcentration="2.0E-6 mol_per_cm3"/>
                <species segmentGroup="OneSecGrp_SectionRef_1" id="ca" concentrationModel="cad__beta0_02__phi260000" ion="ca" initialConcentration="1.0E-8 mol_per_cm3" initialExtConcentration="2.0E-6 mol_per_cm3"/>
                <resistivity value="0.1 kohm_cm" segmentGroup="ModelViewParmSubset_2"/>
                <resistivity value="0.2 kohm_cm" segmentGroup="ModelViewParmSubset_1"/>
            </intracellularProperties>
        </biophysicalProperties>
    </cell>
</neuroml>
