<neuroml xmlns="http://www.neuroml.org/schema/neuroml2"  xmlns:xs="http://www.w3.org/2001/XMLSchema" xmlns:xsi="http://www.w3.org/2001/XMLSchema-instance" xsi:schemaLocation="http://www.neuroml.org/schema/neuroml2 https://raw.github.com/NeuroML/NeuroML2/development/Schemas/NeuroML2/NeuroML_v2beta4.xsd" id="L23PyrFRB_varInit">
    <include href="../channels/ar__m00_25.channel.nml"></include>
    <include href="../channels/cad__beta0_01__phi26000.nml"></include>
    <include href="../channels/cad__beta0_05__phi52000.nml"></include>
    <include href="../channels/cal.channel.nml"></include>
    <include href="../channels/cat.channel.nml"></include>
    <include href="../channels/k2.channel.nml"></include>
    <include href="../channels/ka.channel.nml"></include>
    <include href="../channels/kahp.channel.nml"></include>
    <include href="../channels/kc.channel.nml"></include>
    <include href="../channels/kdr.channel.nml"></include>
    <include href="../channels/km.channel.nml"></include>
    <include href="../channels/naf__a0__b0__c0__d0__fastNa_shiftmin3_5.channel.nml"></include>
    <include href="../channels/nap.channel.nml"></include>
    <include href="../channels/pas.channel.nml"></include>
    <cell id="L23PyrFRB_varInit">
        <notes>Cell: suppyrFRB_0 exported from NEURON ModelView

NOTE: This is a variant of L23PyrFRB which has a variable initial potential. This is used in the network model to initialise the FRB cells at different voltages, and so ensure they fire out of synchrony</notes>
        <morphology id="morphology_L23PyrFRB_varInit">
            <segment id="0" name="Seg0_comp_1">
                <proximal x="0.000000e+00" y="0.000000e+00" z="0.000000e+00" diameter="16.0"/>
                <distal x="0.000000e+00" y="7.500000e+00" z="0.000000e+00" diameter="16.0"/>
            </segment>
            <segment id="1" name="Seg1_comp_1">
                <parent segment="0" fractionAlong="1"/>
                <distal x="-0.000000e+00" y="1.500000e+01" z="0.000000e+00" diameter="16.0"/>
            </segment>
            <segment id="136" name="Seg0_comp_69">
                <parent segment="0" fractionAlong="0.0"/>
                <proximal x="0.000000e+00" y="0.000000e+00" z="0.000000e+00" diameter="1.8"/>
                <distal x="-0.000000e+00" y="-1.250000e+01" z="0.000000e+00" diameter="1.8"/>
            </segment>
            <segment id="137" name="Seg1_comp_69">
                <parent segment="136" fractionAlong="1"/>
                <distal x="-0.000000e+00" y="-2.500000e+01" z="0.000000e+00" diameter="1.8"/>
            </segment>
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            <segmentGroup neuroLexId="sao864921383" id="comp_1">
                <property tag="numberInternalDivisions" value="6"/>
                <member segment="0"/>
                <member segment="1"/>
            </segmentGroup>
            <segmentGroup neuroLexId="sao864921383" id="comp_69">
                <property tag="numberInternalDivisions" value="12"/>
                <member segment="136"/>
                <member segment="137"/>
            </segmentGroup>
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            <segmentGroup id="ModelViewParmSubset_1">
                <include segmentGroup="comp_1"/>
                <include segmentGroup="comp_38"/>
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            </segmentGroup>
            <segmentGroup id="ModelViewParmSubset_3">
                <include segmentGroup="comp_1"/>
                <include segmentGroup="comp_69"/>
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            </segmentGroup>
            <segmentGroup id="ModelViewParmSubset_8">
                <include segmentGroup="comp_1"/>
                <include segmentGroup="comp_9"/>
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            </segmentGroup>
            <segmentGroup id="OneSecGrp_SectionRef_1">
                <include segmentGroup="comp_1"/>
            </segmentGroup>
            <segmentGroup neuroLexId="GO:0043025" id="soma_group">
                <include segmentGroup="comp_1"/>
            </segmentGroup>
            <segmentGroup id="prox_dends_soma">
                <include segmentGroup="comp_1"/>
                <include segmentGroup="comp_38"/>
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            </segmentGroup>
            <segmentGroup id="ModelViewParmSubset_2">
                <include segmentGroup="comp_69"/>
                <include segmentGroup="comp_70"/>
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            </segmentGroup>
            <segmentGroup neuroLexId="GO:0030424" id="axon_group">
                <include segmentGroup="comp_69"/>
                <include segmentGroup="comp_70"/>
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            </segmentGroup>
            <segmentGroup id="prox_axon">
                <include segmentGroup="comp_69"/>
            </segmentGroup>
            <segmentGroup neuroLexId="GO:0030425" id="dendrite_group">
                <include segmentGroup="comp_38"/>
                <include segmentGroup="comp_9"/>
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            </segmentGroup>
            <segmentGroup id="ModelViewParmSubset_4">
                <include segmentGroup="comp_38"/>
                <include segmentGroup="comp_9"/>
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            </segmentGroup>
            <segmentGroup id="OneSecGrp_SectionRef_3">
                <include segmentGroup="comp_38"/>
            </segmentGroup>
            <segmentGroup id="ModelViewParmSubset_5">
                <include segmentGroup="comp_9"/>
                <include segmentGroup="comp_8"/>
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            </segmentGroup>
            <segmentGroup id="ModelViewParmSubset_7">
                <include segmentGroup="comp_9"/>
                <include segmentGroup="comp_8"/>
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            </segmentGroup>
            <segmentGroup id="most_prox_bas_dend">
                <include segmentGroup="comp_9"/>
                <include segmentGroup="comp_8"/>
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            </segmentGroup>
            <segmentGroup id="basal_obl_dends">
                <include segmentGroup="comp_9"/>
                <include segmentGroup="comp_8"/>
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            </segmentGroup>
            <segmentGroup id="basal_dends">
                <include segmentGroup="comp_9"/>
                <include segmentGroup="comp_8"/>
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            </segmentGroup>
            <segmentGroup id="mid_dist_apic_dend">
                <include segmentGroup="comp_39"/>
                <include segmentGroup="comp_13"/>
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            </segmentGroup>
            <segmentGroup id="ModelViewParmSubset_6">
                <include segmentGroup="comp_21"/>
                <include segmentGroup="comp_20"/>
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            </segmentGroup>
            <segmentGroup id="mid_dist_bas_dend">
                <include segmentGroup="comp_21"/>
                <include segmentGroup="comp_20"/>
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            </segmentGroup>
            <segmentGroup id="LTS_dends">
                <include segmentGroup="comp_21"/>
                <include segmentGroup="comp_20"/>
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            </segmentGroup>
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        </morphology>
        <biophysicalProperties id="biophys">
            <membraneProperties>
                <channelDensity id="ar_OneSecGrp_SectionRef_1" ionChannel="ar__m00_25" condDensity="0.25 mS_per_cm2" erev="-35.0 mV" segmentGroup="OneSecGrp_SectionRef_1" ion="ar"/>
                <channelDensity id="ar_ModelViewParmSubset_4" ionChannel="ar__m00_25" condDensity="0.5 mS_per_cm2" erev="-35.0 mV" segmentGroup="ModelViewParmSubset_4" ion="ar"/>
                <channelDensity id="cal_OneSecGrp_SectionRef_1" ionChannel="cal" condDensity="1.0 mS_per_cm2" erev="125.0 mV" segmentGroup="OneSecGrp_SectionRef_1" ion="ca"/>
                <channelDensity id="cal_ModelViewParmSubset_4" ionChannel="cal" condDensity="2.0 mS_per_cm2" erev="125.0 mV" segmentGroup="ModelViewParmSubset_4" ion="ca"/>
                <channelDensity id="cat_OneSecGrp_SectionRef_1" ionChannel="cat" condDensity="0.1 mS_per_cm2" erev="125.0 mV" segmentGroup="OneSecGrp_SectionRef_1" ion="cat"/>
                <channelDensity id="cat_ModelViewParmSubset_4" ionChannel="cat" condDensity="0.2 mS_per_cm2" erev="125.0 mV" segmentGroup="ModelViewParmSubset_4" ion="cat"/>
                <channelDensity id="k2_ModelViewParmSubset_3" ionChannel="k2" condDensity="0.1 mS_per_cm2" erev="-95.0 mV" segmentGroup="ModelViewParmSubset_3" ion="k"/>
                <channelDensity id="k2_ModelViewParmSubset_4" ionChannel="k2" condDensity="0.2 mS_per_cm2" erev="-95.0 mV" segmentGroup="ModelViewParmSubset_4" ion="k"/>
                <channelDensity id="ka_ModelViewParmSubset_2" ionChannel="ka" condDensity="2.0 mS_per_cm2" erev="-95.0 mV" segmentGroup="ModelViewParmSubset_2" ion="k"/>
                <channelDensity id="ka_OneSecGrp_SectionRef_1" ionChannel="ka" condDensity="30.0 mS_per_cm2" erev="-95.0 mV" segmentGroup="OneSecGrp_SectionRef_1" ion="k"/>
                <channelDensity id="ka_ModelViewParmSubset_5" ionChannel="ka" condDensity="4.0 mS_per_cm2" erev="-95.0 mV" segmentGroup="ModelViewParmSubset_5" ion="k"/>
                <channelDensity id="ka_OneSecGrp_SectionRef_3" ionChannel="ka" condDensity="60.0 mS_per_cm2" erev="-95.0 mV" segmentGroup="OneSecGrp_SectionRef_3" ion="k"/>
                <channelDensity id="kahp_OneSecGrp_SectionRef_1" ionChannel="kahp" condDensity="0.1 mS_per_cm2" erev="-95.0 mV" segmentGroup="OneSecGrp_SectionRef_1" ion="k"/>
                <channelDensity id="kahp_ModelViewParmSubset_4" ionChannel="kahp" condDensity="0.2 mS_per_cm2" erev="-95.0 mV" segmentGroup="ModelViewParmSubset_4" ion="k"/>
                <channelDensity id="kc_OneSecGrp_SectionRef_1" ionChannel="kc" condDensity="4.5 mS_per_cm2" erev="-95.0 mV" segmentGroup="OneSecGrp_SectionRef_1" ion="k"/>
                <channelDensity id="kc_ModelViewParmSubset_4" ionChannel="kc" condDensity="9.0 mS_per_cm2" erev="-95.0 mV" segmentGroup="ModelViewParmSubset_4" ion="k"/>
                <channelDensity id="kdr_OneSecGrp_SectionRef_1" ionChannel="kdr" condDensity="125.0 mS_per_cm2" erev="-95.0 mV" segmentGroup="OneSecGrp_SectionRef_1" ion="k"/>
                <channelDensity id="kdr_ModelViewParmSubset_6" ionChannel="kdr" condDensity="12.5 mS_per_cm2" erev="-95.0 mV" segmentGroup="ModelViewParmSubset_6" ion="k"/>
                <channelDensity id="kdr_ModelViewParmSubset_7" ionChannel="kdr" condDensity="187.5 mS_per_cm2" erev="-95.0 mV" segmentGroup="ModelViewParmSubset_7" ion="k"/>
                <channelDensity id="kdr_OneSecGrp_SectionRef_3" ionChannel="kdr" condDensity="250.0 mS_per_cm2" erev="-95.0 mV" segmentGroup="OneSecGrp_SectionRef_3" ion="k"/>
                <channelDensity id="kdr_ModelViewParmSubset_2" ionChannel="kdr" condDensity="400.0 mS_per_cm2" erev="-95.0 mV" segmentGroup="ModelViewParmSubset_2" ion="k"/>
                <channelDensity id="km_ModelViewParmSubset_4" ionChannel="km" condDensity="15.0 mS_per_cm2" erev="-95.0 mV" segmentGroup="ModelViewParmSubset_4" ion="k"/>
                <channelDensity id="km_OneSecGrp_SectionRef_1" ionChannel="km" condDensity="7.5 mS_per_cm2" erev="-95.0 mV" segmentGroup="OneSecGrp_SectionRef_1" ion="k"/>
                <channelDensity id="naf_ModelViewParmSubset_8" ionChannel="naf__a0__b0__c0__d0__fastNa_shiftmin3_5" condDensity="187.5 mS_per_cm2" erev="50.0 mV" segmentGroup="ModelViewParmSubset_8" ion="na"/>
                <channelDensity id="naf_OneSecGrp_SectionRef_3" ionChannel="naf__a0__b0__c0__d0__fastNa_shiftmin3_5" condDensity="250.0 mS_per_cm2" erev="50.0 mV" segmentGroup="OneSecGrp_SectionRef_3" ion="na"/>
                <channelDensity id="naf_ModelViewParmSubset_6" ionChannel="naf__a0__b0__c0__d0__fastNa_shiftmin3_5" condDensity="25.0 mS_per_cm2" erev="50.0 mV" segmentGroup="ModelViewParmSubset_6" ion="na"/>
                <channelDensity id="naf_ModelViewParmSubset_2" ionChannel="naf__a0__b0__c0__d0__fastNa_shiftmin3_5" condDensity="400.0 mS_per_cm2" erev="50.0 mV" segmentGroup="ModelViewParmSubset_2" ion="na"/>
                <channelDensity id="nap_ModelViewParmSubset_8" ionChannel="nap" condDensity="0.48 mS_per_cm2" erev="50.0 mV" segmentGroup="ModelViewParmSubset_8" ion="na"/>
                <channelDensity id="nap_ModelViewParmSubset_6" ionChannel="nap" condDensity="0.064 mS_per_cm2" erev="50.0 mV" segmentGroup="ModelViewParmSubset_6" ion="na"/>
                <channelDensity id="nap_OneSecGrp_SectionRef_3" ionChannel="nap" condDensity="0.64 mS_per_cm2" erev="50.0 mV" segmentGroup="OneSecGrp_SectionRef_3" ion="na"/>
                <channelDensity id="pas_ModelViewParmSubset_2" ionChannel="pas" condDensity="1.0 mS_per_cm2" erev="-70.0 mV" segmentGroup="ModelViewParmSubset_2" ion="non_specific"/>
                <channelDensity id="pas_OneSecGrp_SectionRef_1" ionChannel="pas" condDensity="0.02 mS_per_cm2" erev="-70.0 mV" segmentGroup="OneSecGrp_SectionRef_1" ion="non_specific"/>
                <channelDensity id="pas_ModelViewParmSubset_4" ionChannel="pas" condDensity="0.04 mS_per_cm2" erev="-70.0 mV" segmentGroup="ModelViewParmSubset_4" ion="non_specific"/>
                <spikeThresh value="0.0 mV"/>
                <specificCapacitance value="1.8 uF_per_cm2" segmentGroup="ModelViewParmSubset_4"/>
                <specificCapacitance value="0.9 uF_per_cm2" segmentGroup="ModelViewParmSubset_3"/>
                <initMembPotential value="-70.0 mV"/>
            </membraneProperties>
            <intracellularProperties>
                <species segmentGroup="ModelViewParmSubset_4" id="ca" concentrationModel="cad__beta0_05__phi52000" ion="ca" initialConcentration="1.0E-8 mol_per_cm3" initialExtConcentration="2.0E-6 mol_per_cm3"/>
                <species segmentGroup="OneSecGrp_SectionRef_1" id="ca" concentrationModel="cad__beta0_01__phi26000" ion="ca" initialConcentration="1.0E-8 mol_per_cm3" initialExtConcentration="2.0E-6 mol_per_cm3"/>
                <resistivity value="0.1 kohm_cm" segmentGroup="ModelViewParmSubset_2"/>
                <resistivity value="0.25 kohm_cm" segmentGroup="ModelViewParmSubset_1"/>
            </intracellularProperties>
        </biophysicalProperties>
    </cell>
</neuroml>
