<?xml version="1.0" encoding="UTF-8"?>
<neuroml xmlns="http://www.neuroml.org/schema/neuroml2" xmlns:xsi="http://www.w3.org/2001/XMLSchema-instance" xsi:schemaLocation="http://www.neuroml.org/schema/neuroml2  https://raw.githubusercontent.com/NeuroML/NeuroML2/development/Schemas/NeuroML2/NeuroML_v2beta5.xsd" id="L4SpinyStellate">

    <include href="../channels/ar__m00.channel.nml"/>

    <include href="../channels/cad__beta0_02__phi260000.nml"/>

    <include href="../channels/cad__beta0_05__phi260000.nml"/>

    <include href="../channels/cal.channel.nml"/>

    <include href="../channels/cat_a.channel.nml"/>

    <include href="../channels/k2.channel.nml"/>

    <include href="../channels/ka.channel.nml"/>

    <include href="../channels/kahp_slower.channel.nml"/>

    <include href="../channels/kc_fast.channel.nml"/>

    <include href="../channels/kdr_fs.channel.nml"/>

    <include href="../channels/km.channel.nml"/>

    <include href="../channels/naf2__a0__b0__c0__d0__fastNa_shiftmin2_5.channel.nml"/>

    <include href="../channels/napf_spinstell__a0__b0__c0__d0__shmin2_5.channel.nml"/>

    <include href="../channels/pas.channel.nml"/>

    <cell id="L4SpinyStellate">

        <notes>Cell: spinstell_0 exported from NEURON ModelView</notes>

        <morphology id="morphology_L4SpinyStellate">

            <segment id="0" name="Seg0_comp_1">
                <proximal x="0.0" y="0.0" z="0.0" diameter="15.0"/>
                <distal x="0.0" y="10.0" z="0.0" diameter="15.0"/>
            </segment>

            <segment id="1" name="Seg1_comp_1">
                <parent segment="0"/>
                <distal x="-4.371139E-7" y="20.0" z="0.0" diameter="15.0"/>
            </segment>

            <segment id="106" name="Seg0_comp_54">
                <parent segment="0" fractionAlong="0.0"/>
                <proximal x="4.371139E-7" y="0.0" z="0.0" diameter="1.4"/>
                <distal x="-3.7745E-7" y="-25.0" z="0.0" diameter="1.4"/>
            </segment>

            <segment id="107" name="Seg1_comp_54">
                <parent segment="106"/>
                <distal x="-1.1920139E-6" y="-50.0" z="0.0" diameter="1.4"/>
            </segment>

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
            <segmentGroup id="comp_1" neuroLexId="sao864921383">    <!--
                This group contains an unbranched set of segments, and all of the segmentGroups marked with
                neuroLexId = sao864921383 form a non-overlapping set of all of the segments.
                These segmentGroups correspond to the 'cables' of NeuroML v1.8.1. -->

                <!--This 'Section' has number of internal divisions (nseg) = 2-->

                <property tag="numberInternalDivisions" value="2"/>

                <member segment="0"/>

                <member segment="1"/>
            </segmentGroup>

            <segmentGroup id="comp_54" neuroLexId="sao864921383">    <!--
                This group contains an unbranched set of segments, and all of the segmentGroups marked with
                neuroLexId = sao864921383 form a non-overlapping set of all of the segments.
                These segmentGroups correspond to the 'cables' of NeuroML v1.8.1. -->

                <!--This 'Section' has number of internal divisions (nseg) = 54-->

                <property tag="numberInternalDivisions" value="54"/>

                <member segment="106"/>

                <member segment="107"/>
            </segmentGroup>

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
            <segmentGroup id="ModelViewParmSubset_1">
                <include segmentGroup="comp_1"/>
                <include segmentGroup="comp_41"/>
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            </segmentGroup>

            <segmentGroup id="ModelViewParmSubset_2">
                <include segmentGroup="comp_1"/>
                <include segmentGroup="comp_41"/>
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            </segmentGroup>

            <segmentGroup id="ModelViewParmSubset_3">
                <include segmentGroup="comp_1"/>
                <include segmentGroup="comp_54"/>
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            </segmentGroup>

            <segmentGroup id="ModelViewParmSubset_5">
                <include segmentGroup="comp_1"/>
                <include segmentGroup="comp_54"/>
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            </segmentGroup>

            <segmentGroup id="ModelViewParmSubset_14">
                <include segmentGroup="comp_1"/>
                <include segmentGroup="comp_41"/>
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            </segmentGroup>

            <segmentGroup id="OneSecGrp_SectionRef_1">
                <include segmentGroup="comp_1"/>
            </segmentGroup>

            <segmentGroup id="soma_group" neuroLexId="GO:0043025">    <!--Soma group-->

                <include segmentGroup="comp_1"/>
            </segmentGroup>

            <segmentGroup id="prox_dends_soma">
                <include segmentGroup="comp_1"/>
                <include segmentGroup="comp_41"/>
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            </segmentGroup>

            <segmentGroup id="axon_group" neuroLexId="GO:0030424">    <!--Axon group-->

                <include segmentGroup="comp_54"/>
                <include segmentGroup="comp_55"/>
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            </segmentGroup>

            <segmentGroup id="prox_axon">
                <include segmentGroup="comp_54"/>
            </segmentGroup>

            <segmentGroup id="dendrite_group" neuroLexId="GO:0030425">    <!--Dendrite group-->

                <include segmentGroup="comp_41"/>
                <include segmentGroup="comp_28"/>
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            </segmentGroup>

            <segmentGroup id="ModelViewParmSubset_6">
                <include segmentGroup="comp_41"/>
                <include segmentGroup="comp_28"/>
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            </segmentGroup>

            <segmentGroup id="ModelViewParmSubset_7">
                <include segmentGroup="comp_41"/>
                <include segmentGroup="comp_28"/>
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            </segmentGroup>

            <segmentGroup id="ModelViewParmSubset_10">
                <include segmentGroup="comp_41"/>
                <include segmentGroup="comp_28"/>
                <include segmentGroup="comp_15"/>
                <include segmentGroup="comp_2"/>
            </segmentGroup>

            <segmentGroup id="ModelViewParmSubset_11">
                <include segmentGroup="comp_41"/>
                <include segmentGroup="comp_28"/>
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            </segmentGroup>

            <segmentGroup id="ModelViewParmSubset_12">
                <include segmentGroup="comp_41"/>
                <include segmentGroup="comp_28"/>
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            </segmentGroup>

            <segmentGroup id="ModelViewParmSubset_9">
                <include segmentGroup="comp_43"/>
                <include segmentGroup="comp_42"/>
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            </segmentGroup>

            <segmentGroup id="mid_tip_dends">
                <include segmentGroup="comp_46"/>
                <include segmentGroup="comp_45"/>
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            </segmentGroup>

            <segmentGroup id="mid_dist_dends">
                <include segmentGroup="comp_46"/>
                <include segmentGroup="comp_45"/>
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            </segmentGroup>

            <segmentGroup id="distal_axon">
                <include segmentGroup="comp_59"/>
                <include segmentGroup="comp_57"/>
            </segmentGroup>

            <segmentGroup id="ModelViewParmSubset_8">
                <include segmentGroup="comp_51"/>
                <include segmentGroup="comp_38"/>
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            </segmentGroup>

        </morphology>

            <!--Adding the biophysical parameters-->

        <biophysicalProperties id="biophys">

            <membraneProperties>

                <channelDensity condDensity="0.25 mS_per_cm2" id="ar_OneSecGrp_SectionRef_1" ionChannel="ar__m00" segmentGroup="OneSecGrp_SectionRef_1" erev="-40.0 mV" ion="ar"/>

                <channelDensity condDensity="0.5 mS_per_cm2" id="ar_ModelViewParmSubset_6" ionChannel="ar__m00" segmentGroup="ModelViewParmSubset_6" erev="-40.0 mV" ion="ar"/>

                <channelDensity condDensity="1.0 mS_per_cm2" id="cal_ModelViewParmSubset_7" ionChannel="cal" segmentGroup="ModelViewParmSubset_7" ion="ca" erev="125.0 mV"/>

                <channelDensity condDensity="0.5 mS_per_cm2" id="cal_OneSecGrp_SectionRef_1" ionChannel="cal" segmentGroup="OneSecGrp_SectionRef_1" ion="ca" erev="125.0 mV"/>

                <channelDensity condDensity="6.0 mS_per_cm2" id="cal_ModelViewParmSubset_8" ionChannel="cal" segmentGroup="ModelViewParmSubset_8" ion="ca" erev="125.0 mV"/>

                <channelDensity condDensity="0.1 mS_per_cm2" id="cat_a_OneSecGrp_SectionRef_1" ionChannel="cat_a" segmentGroup="OneSecGrp_SectionRef_1" ion="cat_a" erev="125.0 mV"/>

                <channelDensity condDensity="0.2 mS_per_cm2" id="cat_a_ModelViewParmSubset_6" ionChannel="cat_a" segmentGroup="ModelViewParmSubset_6" ion="cat_a" erev="125.0 mV"/>

                <channelDensity condDensity="0.1 mS_per_cm2" id="k2_ModelViewParmSubset_5" ionChannel="k2" segmentGroup="ModelViewParmSubset_5" ion="k" erev="-100.0 mV"/>

                <channelDensity condDensity="0.2 mS_per_cm2" id="k2_ModelViewParmSubset_6" ionChannel="k2" segmentGroup="ModelViewParmSubset_6" ion="k" erev="-100.0 mV"/>

                <channelDensity condDensity="2.0 mS_per_cm2" id="ka_axon_group" ionChannel="ka" segmentGroup="axon_group" ion="k" erev="-100.0 mV"/>

                <channelDensity condDensity="30.0 mS_per_cm2" id="ka_OneSecGrp_SectionRef_1" ionChannel="ka" segmentGroup="OneSecGrp_SectionRef_1" ion="k" erev="-100.0 mV"/>

                <channelDensity condDensity="4.0 mS_per_cm2" id="ka_ModelViewParmSubset_9" ionChannel="ka" segmentGroup="ModelViewParmSubset_9" ion="k" erev="-100.0 mV"/>

                <channelDensity condDensity="60.0 mS_per_cm2" id="ka_ModelViewParmSubset_10" ionChannel="ka" segmentGroup="ModelViewParmSubset_10" ion="k" erev="-100.0 mV"/>

                <channelDensity condDensity="0.1 mS_per_cm2" id="kahp_slower_OneSecGrp_SectionRef_1" ionChannel="kahp_slower" segmentGroup="OneSecGrp_SectionRef_1" ion="k" erev="-100.0 mV"/>

                <channelDensity condDensity="0.2 mS_per_cm2" id="kahp_slower_ModelViewParmSubset_6" ionChannel="kahp_slower" segmentGroup="ModelViewParmSubset_6" ion="k" erev="-100.0 mV"/>

                <channelDensity condDensity="10.0 mS_per_cm2" id="kc_fast_OneSecGrp_SectionRef_1" ionChannel="kc_fast" segmentGroup="OneSecGrp_SectionRef_1" ion="k" erev="-100.0 mV"/>

                <channelDensity condDensity="20.0 mS_per_cm2" id="kc_fast_ModelViewParmSubset_11" ionChannel="kc_fast" segmentGroup="ModelViewParmSubset_11" ion="k" erev="-100.0 mV"/>

                <channelDensity condDensity="100.0 mS_per_cm2" id="kdr_fs_OneSecGrp_SectionRef_1" ionChannel="kdr_fs" segmentGroup="OneSecGrp_SectionRef_1" ion="k" erev="-100.0 mV"/>

                <channelDensity condDensity="150.0 mS_per_cm2" id="kdr_fs_ModelViewParmSubset_12" ionChannel="kdr_fs" segmentGroup="ModelViewParmSubset_12" ion="k" erev="-100.0 mV"/>

                <channelDensity condDensity="400.0 mS_per_cm2" id="kdr_fs_axon_group" ionChannel="kdr_fs" segmentGroup="axon_group" ion="k" erev="-100.0 mV"/>

                <channelDensity condDensity="3.75 mS_per_cm2" id="km_OneSecGrp_SectionRef_1" ionChannel="km" segmentGroup="OneSecGrp_SectionRef_1" ion="k" erev="-100.0 mV"/>

                <channelDensity condDensity="7.5 mS_per_cm2" id="km_ModelViewParmSubset_6" ionChannel="km" segmentGroup="ModelViewParmSubset_6" ion="k" erev="-100.0 mV"/>

                <channelDensity condDensity="10.0 mS_per_cm2" id="naf2_mid_dist_dends" ionChannel="naf2__a0__b0__c0__d0__fastNa_shiftmin2_5" segmentGroup="mid_dist_dends" ion="na" erev="50.0 mV"/>

                <channelDensity condDensity="150.0 mS_per_cm2" id="naf2_ModelViewParmSubset_14" ionChannel="naf2__a0__b0__c0__d0__fastNa_shiftmin2_5" segmentGroup="ModelViewParmSubset_14" ion="na" erev="50.0 mV"/>

                <channelDensity condDensity="400.0 mS_per_cm2" id="naf2_axon_group" ionChannel="naf2__a0__b0__c0__d0__fastNa_shiftmin2_5" segmentGroup="axon_group" ion="na" erev="50.0 mV"/>

                <channelDensity condDensity="0.01 mS_per_cm2" id="napf_spinstell_mid_dist_dends" ionChannel="napf_spinstell__a0__b0__c0__d0__shmin2_5" segmentGroup="mid_dist_dends" ion="na" erev="50.0 mV"/>

                <channelDensity condDensity="0.15 mS_per_cm2" id="napf_spinstell_ModelViewParmSubset_14" ionChannel="napf_spinstell__a0__b0__c0__d0__shmin2_5" segmentGroup="ModelViewParmSubset_14" ion="na" erev="50.0 mV"/>

                <channelDensity condDensity="1.0 mS_per_cm2" id="pas_axon_group" ionChannel="pas" segmentGroup="axon_group" erev="-65.0 mV" ion="non_specific"/>

                <channelDensity condDensity="0.02 mS_per_cm2" id="pas_OneSecGrp_SectionRef_1" ionChannel="pas" segmentGroup="OneSecGrp_SectionRef_1" erev="-65.0 mV" ion="non_specific"/>

                <channelDensity condDensity="0.04 mS_per_cm2" id="pas_ModelViewParmSubset_6" ionChannel="pas" segmentGroup="ModelViewParmSubset_6" erev="-65.0 mV" ion="non_specific"/>

                <spikeThresh value="0.0 mV"/>

                <specificCapacitance segmentGroup="ModelViewParmSubset_6" value="1.8 uF_per_cm2"/>

                <specificCapacitance segmentGroup="ModelViewParmSubset_5" value="0.9 uF_per_cm2"/>

                <initMembPotential value="-65.0 mV"/>

            </membraneProperties>

            <intracellularProperties>

                <species segmentGroup="ModelViewParmSubset_6" id="ca" ion="ca" concentrationModel="cad__beta0_05__phi260000" initialConcentration="1.0E-8 mol_per_cm3" initialExtConcentration="2.0E-6 mol_per_cm3"/>

                <species segmentGroup="OneSecGrp_SectionRef_1" id="ca" ion="ca" concentrationModel="cad__beta0_02__phi260000" initialConcentration="1.0E-8 mol_per_cm3" initialExtConcentration="2.0E-6 mol_per_cm3"/>

                <resistivity segmentGroup="axon_group" value="0.1 kohm_cm"/>

                <resistivity segmentGroup="ModelViewParmSubset_1" value="0.25 kohm_cm"/>

            </intracellularProperties>

        </biophysicalProperties>

    </cell>

</neuroml>
