<?xml version="1.0" encoding="UTF-8"?>
<neuroml xmlns="http://www.neuroml.org/schema/neuroml2" xmlns:xsi="http://www.w3.org/2001/XMLSchema-instance" xsi:schemaLocation="http://www.neuroml.org/schema/neuroml2  https://raw.githubusercontent.com/NeuroML/NeuroML2/development/Schemas/NeuroML2/NeuroML_v2beta5.xsd" id="L6NonTuftedPyrRS">

    <include href="../channels/ar__m00_25.channel.nml"/>

    <include href="../channels/cad__beta0_01__phi13000.nml"/>

    <include href="../channels/cad__beta0_05__phi65000.nml"/>

    <include href="../channels/cal.channel.nml"/>

    <include href="../channels/cat.channel.nml"/>

    <include href="../channels/k2.channel.nml"/>

    <include href="../channels/ka.channel.nml"/>

    <include href="../channels/kahp_deeppyr.channel.nml"/>

    <include href="../channels/kc.channel.nml"/>

    <include href="../channels/kdr.channel.nml"/>

    <include href="../channels/km.channel.nml"/>

    <include href="../channels/naf__a0__b0__c0__d0__fastNa_shiftmin3_5.channel.nml"/>

    <include href="../channels/nap.channel.nml"/>

    <include href="../channels/pas.channel.nml"/>

    <cell id="L6NonTuftedPyrRS">

        <notes>Cell: nontuftRS_0 exported from NEURON ModelView</notes>

        <morphology id="morphology_L6NonTuftedPyrRS">

            <segment id="0" name="Seg0_comp_1">
                <proximal x="0.0" y="0.0" z="0.0" diameter="16.0"/>
                <distal x="0.0" y="10.0" z="0.0" diameter="16.0"/>
            </segment>

            <segment id="1" name="Seg1_comp_1">
                <parent segment="0"/>
                <distal x="-4.371139E-7" y="20.0" z="0.0" diameter="16.0"/>
            </segment>

            <segment id="88" name="Seg0_comp_45">
                <parent segment="0" fractionAlong="0.0"/>
                <proximal x="0.0" y="0.0" z="0.0" diameter="1.8"/>
                <distal x="12.5" y="0.0" z="0.0" diameter="1.8"/>
            </segment>

            <segment id="89" name="Seg1_comp_45">
                <parent segment="88"/>
                <distal x="25.0" y="9.2276395E-7" z="-6.94707E-14" diameter="1.8"/>
            </segment>

            <segment id="68" name="Seg0_comp_35">
                <parent segment="1"/>
                <proximal x="0.0" y="20.0" z="0.0" diameter="3.0"/>
                <distal x="0.0" y="45.0" z="0.0" diameter="3.0"/>
            </segment>

            <segment id="69" name="Seg1_comp_35">
                <parent segment="68"/>
                <distal x="-1.6583364E-5" y="69.99997" z="0.0" diameter="3.0"/>
            </segment>

            <segment id="10" name="Seg0_comp_6">
                <parent segment="1"/>
                <proximal x="0.0" y="20.0" z="0.0" diameter="1.7"/>
                <distal x="0.0" y="-1.2132034" z="21.213203" diameter="1.7"/>
            </segment>

            <segment id="11" name="Seg1_comp_6">
                <parent segment="10"/>
                <distal x="1.1551366E-5" y="-22.426464" z="42.426445" diameter="1.7"/>
            </segment>

            <segment id="8" name="Seg0_comp_5">
                <parent segment="1"/>
                <proximal x="0.0" y="20.0" z="0.0" diameter="1.7"/>
                <distal x="0.0" y="-1.2132034" z="-21.213203" diameter="1.7"/>
            </segment>

            <segment id="9" name="Seg1_comp_5">
                <parent segment="8"/>
                <distal x="7.984267E-6" y="-22.426373" z="-42.42637" diameter="1.7"/>
            </segment>

            <segment id="6" name="Seg0_comp_4">
                <parent segment="1"/>
                <proximal x="0.0" y="20.0" z="0.0" diameter="1.7"/>
                <distal x="-21.213203" y="-1.2132034" z="0.0" diameter="1.7"/>
            </segment>

            <segment id="7" name="Seg1_comp_4">
                <parent segment="6"/>
                <distal x="-42.42636" y="-22.42638" z="0.0" diameter="1.7"/>
            </segment>

            <segment id="4" name="Seg0_comp_3">
                <parent segment="1"/>
                <proximal x="0.0" y="20.0" z="0.0" diameter="1.7"/>
                <distal x="21.213203" y="-1.2132034" z="0.0" diameter="1.7"/>
            </segment>

            <segment id="5" name="Seg1_comp_3">
                <parent segment="4"/>
                <distal x="42.42646" y="-22.426445" z="0.0" diameter="1.7"/>
            </segment>

            <segment id="2" name="Seg0_comp_2">
                <parent segment="1"/>
                <proximal x="0.0" y="20.0" z="0.0" diameter="1.7"/>
                <distal x="0.0" y="-9.999994" z="0.0" diameter="1.7"/>
            </segment>

            <segment id="3" name="Seg1_comp_2">
                <parent segment="2"/>
                <distal x="-1.3068187E-4" y="-40.00004" z="0.0" diameter="1.7"/>
            </segment>

            <segment id="90" name="Seg0_comp_46">
                <parent segment="89"/>
                <proximal x="25.0" y="9.2276395E-7" z="-6.94707E-14" diameter="1.4"/>
                <distal x="50.0" y="1.2789027E-6" z="6.947164E-14" diameter="1.4"/>
            </segment>

            <segment id="91" name="Seg1_comp_46">
                <parent segment="90"/>
                <distal x="75.0" y="1.4565248E-7" z="2.0841583E-13" diameter="1.4"/>
            </segment>

            <segment id="70" name="Seg0_comp_36">
                <parent segment="69"/>
                <proximal x="0.0" y="70.0" z="0.0" diameter="2.8"/>
                <distal x="0.0" y="100.0" z="0.0" diameter="2.8"/>
            </segment>

            <segment id="71" name="Seg1_comp_36">
                <parent segment="70"/>
                <distal x="3.04693E-4" y="124.99974" z="0.0" diameter="2.8"/>
            </segment>

            <segment id="22" name="Seg0_comp_12">
                <parent segment="69"/>
                <proximal x="0.0" y="70.0" z="0.0" diameter="1.24"/>
                <distal x="-30.0" y="70.0" z="0.0" diameter="1.24"/>
            </segment>

            <segment id="23" name="Seg1_comp_12">
                <parent segment="22"/>
                <distal x="-60.00023" y="69.99986" z="0.0" diameter="1.24"/>
            </segment>

            <segment id="12" name="Seg0_comp_7">
                <parent segment="69"/>
                <proximal x="0.0" y="70.0" z="0.0" diameter="1.24"/>
                <distal x="30.0" y="70.0" z="0.0" diameter="1.24"/>
            </segment>

            <segment id="13" name="Seg1_comp_7">
                <parent segment="12"/>
                <distal x="60.00001" y="70.00002" z="0.0" diameter="1.24"/>
            </segment>

            <segment id="32" name="Seg0_comp_17">
                <parent segment="11"/>
                <proximal x="1.1551366E-5" y="-22.426464" z="42.426445" diameter="1.7"/>
                <distal x="2.33004E-5" y="-43.639362" z="63.639324" diameter="1.7"/>
            </segment>

            <segment id="33" name="Seg1_comp_17">
                <parent segment="32"/>
                <distal x="-1.4493322E-4" y="-64.853096" z="84.853195" diameter="1.7"/>
            </segment>

            <segment id="30" name="Seg0_comp_16">
                <parent segment="9"/>
                <proximal x="7.984267E-6" y="-22.426373" z="-42.42637" diameter="1.7"/>
                <distal x="2.3281485E-5" y="-43.639473" z="-63.63946" diameter="1.7"/>
            </segment>

            <segment id="31" name="Seg1_comp_16">
                <parent segment="30"/>
                <distal x="3.1499014E-5" y="-64.852646" z="-84.85263" diameter="1.7"/>
            </segment>

            <segment id="28" name="Seg0_comp_15">
                <parent segment="7"/>
                <proximal x="-42.42636" y="-22.42638" z="0.0" diameter="1.7"/>
                <distal x="-63.63944" y="-43.639492" z="0.0" diameter="1.7"/>
            </segment>

            <segment id="29" name="Seg1_comp_15">
                <parent segment="28"/>
                <distal x="-84.8526" y="-64.85267" z="0.0" diameter="1.7"/>
            </segment>

            <segment id="26" name="Seg0_comp_14">
                <parent segment="5"/>
                <proximal x="42.42646" y="-22.426445" z="0.0" diameter="1.7"/>
                <distal x="63.639362" y="-43.639328" z="0.0" diameter="1.7"/>
            </segment>

            <segment id="27" name="Seg1_comp_14">
                <parent segment="26"/>
                <distal x="84.85303" y="-64.85327" z="0.0" diameter="1.7"/>
            </segment>

            <segment id="24" name="Seg0_comp_13">
                <parent segment="3"/>
                <proximal x="-1.3068187E-4" y="-40.00004" z="0.0" diameter="1.7"/>
                <distal x="6.618662E-5" y="-69.999565" z="0.0" diameter="1.7"/>
            </segment>

            <segment id="25" name="Seg1_comp_13">
                <parent segment="24"/>
                <distal x="-9.839095E-5" y="-99.999695" z="0.0" diameter="1.7"/>
            </segment>

            <segment id="96" name="Seg0_comp_49">
                <parent segment="91"/>
                <proximal x="75.0" y="1.4565248E-7" z="2.0841583E-13" diameter="1.0"/>
                <distal x="98.02649" y="-9.735456" z="1.7022016E-6" diameter="1.0"/>
            </segment>

            <segment id="97" name="Seg1_comp_49">
                <parent segment="96"/>
                <distal x="121.05301" y="-19.470882" z="3.404398E-6" diameter="1.0"/>
            </segment>

            <segment id="92" name="Seg0_comp_47">
                <parent segment="91"/>
                <proximal x="75.0" y="1.4565248E-7" z="2.0841583E-13" diameter="1.0"/>
                <distal x="98.0265" y="9.735463" z="-1.7022022E-6" diameter="1.0"/>
            </segment>

            <segment id="93" name="Seg1_comp_47">
                <parent segment="92"/>
                <distal x="121.05301" y="19.470919" z="-3.4044026E-6" diameter="1.0"/>
            </segment>

            <segment id="20" name="Seg0_comp_11">
                <parent segment="71"/>
                <proximal x="0.0" y="125.0" z="0.0" diameter="1.24"/>
                <distal x="0.0" y="125.0" z="-30.0" diameter="1.24"/>
            </segment>

            <segment id="21" name="Seg1_comp_11">
                <parent segment="20"/>
                <distal x="-3.9912673E-4" y="125.0" z="-60.000046" diameter="1.24"/>
            </segment>

            <segment id="14" name="Seg0_comp_8">
                <parent segment="71"/>
                <proximal x="0.0" y="125.0" z="0.0" diameter="1.24"/>
                <distal x="0.0" y="125.0" z="30.0" diameter="1.24"/>
            </segment>

            <segment id="15" name="Seg1_comp_8">
                <parent segment="14"/>
                <distal x="4.4153922E-4" y="125.00026" z="59.999832" diameter="1.24"/>
            </segment>

            <segment id="72" name="Seg0_comp_37">
                <parent segment="71"/>
                <proximal x="0.0" y="125.0" z="0.0" diameter="2.6"/>
                <distal x="0.0" y="150.0" z="0.0" diameter="2.6"/>
            </segment>

            <segment id="73" name="Seg1_comp_37">
                <parent segment="72"/>
                <distal x="-6.4953038E-6" y="174.99948" z="0.0" diameter="2.6"/>
            </segment>

            <segment id="44" name="Seg0_comp_23">
                <parent segment="23"/>
                <proximal x="-60.00023" y="69.99986" z="0.0" diameter="1.24"/>
                <distal x="-90.00041" y="69.999855" z="0.0" diameter="1.24"/>
            </segment>

            <segment id="45" name="Seg1_comp_23">
                <parent segment="44"/>
                <distal x="-119.99962" y="70.000145" z="0.0" diameter="1.24"/>
            </segment>

            <segment id="34" name="Seg0_comp_18">
                <parent segment="13"/>
                <proximal x="60.00001" y="70.00002" z="0.0" diameter="1.24"/>
                <distal x="90.0" y="70.00005" z="0.0" diameter="1.24"/>
            </segment>

            <segment id="35" name="Seg1_comp_18">
                <parent segment="34"/>
                <distal x="120.0" y="70.000084" z="0.0" diameter="1.24"/>
            </segment>

            <segment id="54" name="Seg0_comp_28">
                <parent segment="33"/>
                <proximal x="-1.4493322E-4" y="-64.853096" z="84.853195" diameter="1.7"/>
                <distal x="-1.1118335E-4" y="-86.06622" z="106.06629" diameter="1.7"/>
            </segment>

            <segment id="55" name="Seg1_comp_28">
                <parent segment="54"/>
                <distal x="-7.2776886E-5" y="-107.27936" z="127.27937" diameter="1.7"/>
            </segment>

            <segment id="52" name="Seg0_comp_27">
                <parent segment="31"/>
                <proximal x="3.1499014E-5" y="-64.852646" z="-84.85263" diameter="1.7"/>
                <distal x="3.911812E-5" y="-86.06582" z="-106.065796" diameter="1.7"/>
            </segment>

            <segment id="53" name="Seg1_comp_27">
                <parent segment="52"/>
                <distal x="7.813368E-6" y="-107.27897" z="-127.27896" diameter="1.7"/>
            </segment>

            <segment id="50" name="Seg0_comp_26">
                <parent segment="29"/>
                <proximal x="-84.8526" y="-64.85267" z="0.0" diameter="1.7"/>
                <distal x="-106.06576" y="-86.06585" z="0.0" diameter="1.7"/>
            </segment>

            <segment id="51" name="Seg1_comp_26">
                <parent segment="50"/>
                <distal x="-127.27894" y="-107.27899" z="0.0" diameter="1.7"/>
            </segment>

            <segment id="48" name="Seg0_comp_25">
                <parent segment="27"/>
                <proximal x="84.85303" y="-64.85327" z="0.0" diameter="1.7"/>
                <distal x="106.06616" y="-86.06635" z="0.0" diameter="1.7"/>
            </segment>

            <segment id="49" name="Seg1_comp_25">
                <parent segment="48"/>
                <distal x="127.2793" y="-107.27943" z="0.0" diameter="1.7"/>
            </segment>

            <segment id="46" name="Seg0_comp_24">
                <parent segment="25"/>
                <proximal x="-9.839095E-5" y="-99.999695" z="0.0" diameter="1.7"/>
                <distal x="-1.7607235E-4" y="-129.99988" z="0.0" diameter="1.7"/>
            </segment>

            <segment id="47" name="Seg1_comp_24">
                <parent segment="46"/>
                <distal x="-3.4862006E-4" y="-160.00003" z="0.0" diameter="1.7"/>
            </segment>

            <segment id="98" name="Seg0_comp_50">
                <parent segment="97"/>
                <proximal x="121.05301" y="-19.470882" z="3.404398E-6" diameter="1.0"/>
                <distal x="144.08" y="-29.206375" z="5.1066063E-6" diameter="1.0"/>
            </segment>

            <segment id="99" name="Seg1_comp_50">
                <parent segment="98"/>
                <distal x="167.106" y="-38.94187" z="6.8088148E-6" diameter="1.0"/>
            </segment>

            <segment id="94" name="Seg0_comp_48">
                <parent segment="93"/>
                <proximal x="121.05301" y="19.470919" z="-3.4044026E-6" diameter="1.0"/>
                <distal x="144.08" y="29.206419" z="-5.106612E-6" diameter="1.0"/>
            </segment>

            <segment id="95" name="Seg1_comp_48">
                <parent segment="94"/>
                <distal x="167.106" y="38.941826" z="-6.808804E-6" diameter="1.0"/>
            </segment>

            <segment id="42" name="Seg0_comp_22">
                <parent segment="21"/>
                <proximal x="-3.9912673E-4" y="125.0" z="-60.000046" diameter="1.24"/>
                <distal x="-8.4935466E-4" y="125.0" z="-89.999985" diameter="1.24"/>
            </segment>

            <segment id="43" name="Seg1_comp_22">
                <parent segment="42"/>
                <distal x="-3.4218514E-4" y="124.99999" z="-119.99954" diameter="1.24"/>
            </segment>

            <segment id="36" name="Seg0_comp_19">
                <parent segment="15"/>
                <proximal x="4.4153922E-4" y="125.00026" z="59.999832" diameter="1.24"/>
                <distal x="0.0010041951" y="125.00052" z="89.99986" diameter="1.24"/>
            </segment>

            <segment id="37" name="Seg1_comp_19">
                <parent segment="36"/>
                <distal x="9.4755244E-4" y="125.00078" z="119.99925" diameter="1.24"/>
            </segment>

            <segment id="18" name="Seg0_comp_10">
                <parent segment="73"/>
                <proximal x="0.0" y="175.0" z="0.0" diameter="1.24"/>
                <distal x="21.213203" y="175.0" z="21.213203" diameter="1.24"/>
            </segment>

            <segment id="19" name="Seg1_comp_10">
                <parent segment="18"/>
                <distal x="42.426598" y="174.99991" z="42.42608" diameter="1.24"/>
            </segment>

            <segment id="16" name="Seg0_comp_9">
                <parent segment="73"/>
                <proximal x="0.0" y="175.0" z="0.0" diameter="1.24"/>
                <distal x="-21.213203" y="175.0" z="-21.213203" diameter="1.24"/>
            </segment>

            <segment id="17" name="Seg1_comp_9">
                <parent segment="16"/>
                <distal x="-42.426537" y="175.00044" z="-42.426445" diameter="1.24"/>
            </segment>

            <segment id="74" name="Seg0_comp_38">
                <parent segment="73"/>
                <proximal x="0.0" y="175.0" z="0.0" diameter="2.4"/>
                <distal x="0.0" y="200.0" z="0.0" diameter="2.4"/>
            </segment>

            <segment id="75" name="Seg1_comp_38">
                <parent segment="74"/>
                <distal x="1.1079743E-5" y="225.0" z="0.0" diameter="2.4"/>
            </segment>

            <segment id="66" name="Seg0_comp_34">
                <parent segment="45"/>
                <proximal x="-119.99962" y="70.000145" z="0.0" diameter="1.24"/>
                <distal x="-149.9998" y="70.00013" z="0.0" diameter="1.24"/>
            </segment>

            <segment id="67" name="Seg1_comp_34">
                <parent segment="66"/>
                <distal x="-179.99992" y="70.00004" z="0.0" diameter="1.24"/>
            </segment>

            <segment id="56" name="Seg0_comp_29">
                <parent segment="35"/>
                <proximal x="120.0" y="70.000084" z="0.0" diameter="1.24"/>
                <distal x="150.0" y="70.00011" z="0.0" diameter="1.24"/>
            </segment>

            <segment id="57" name="Seg1_comp_29">
                <parent segment="56"/>
                <distal x="179.99998" y="70.00014" z="0.0" diameter="1.24"/>
            </segment>

            <segment id="64" name="Seg0_comp_33">
                <parent segment="43"/>
                <proximal x="-3.4218514E-4" y="124.99999" z="-119.99954" diameter="1.24"/>
                <distal x="-4.34654E-4" y="124.99999" z="-150.00043" diameter="1.24"/>
            </segment>

            <segment id="65" name="Seg1_comp_33">
                <parent segment="64"/>
                <distal x="-8.648856E-4" y="124.99999" z="-180.00037" diameter="1.24"/>
            </segment>

            <segment id="58" name="Seg0_comp_30">
                <parent segment="37"/>
                <proximal x="9.4755244E-4" y="125.00078" z="119.99925" diameter="1.24"/>
                <distal x="0.0015615688" y="125.00104" z="149.99931" diameter="1.24"/>
            </segment>

            <segment id="59" name="Seg1_comp_30">
                <parent segment="58"/>
                <distal x="0.0014558281" y="125.0013" z="180.00014" diameter="1.24"/>
            </segment>

            <segment id="40" name="Seg0_comp_21">
                <parent segment="19"/>
                <proximal x="42.426598" y="174.99991" z="42.42608" diameter="1.24"/>
                <distal x="63.64018" y="174.99962" z="63.638973" diameter="1.24"/>
            </segment>

            <segment id="41" name="Seg1_comp_21">
                <parent segment="40"/>
                <distal x="84.853035" y="174.99994" z="84.851654" diameter="1.24"/>
            </segment>

            <segment id="38" name="Seg0_comp_20">
                <parent segment="17"/>
                <proximal x="-42.426537" y="175.00044" z="-42.426445" diameter="1.24"/>
                <distal x="-63.63994" y="175.00078" z="-63.63958" diameter="1.24"/>
            </segment>

            <segment id="39" name="Seg1_comp_20">
                <parent segment="38"/>
                <distal x="-84.853165" y="175.00156" z="-84.853195" diameter="1.24"/>
            </segment>

            <segment id="76" name="Seg0_comp_39">
                <parent segment="75"/>
                <proximal x="1.1079743E-5" y="225.0" z="0.0" diameter="2.2"/>
                <distal x="2.3916264E-5" y="250.0" z="0.0" diameter="2.2"/>
            </segment>

            <segment id="77" name="Seg1_comp_39">
                <parent segment="76"/>
                <distal x="4.9515475E-5" y="275.0" z="0.0" diameter="2.2"/>
            </segment>

            <segment id="62" name="Seg0_comp_32">
                <parent segment="41"/>
                <proximal x="84.853035" y="174.99994" z="84.851654" diameter="1.24"/>
                <distal x="106.06665" y="174.99965" z="106.064606" diameter="1.24"/>
            </segment>

            <segment id="63" name="Seg1_comp_32">
                <parent segment="62"/>
                <distal x="127.28051" y="174.99997" z="127.27829" diameter="1.24"/>
            </segment>

            <segment id="60" name="Seg0_comp_31">
                <parent segment="39"/>
                <proximal x="-84.853165" y="175.00156" z="-84.853195" diameter="1.24"/>
                <distal x="-106.06663" y="175.00168" z="-106.06609" diameter="1.24"/>
            </segment>

            <segment id="61" name="Seg1_comp_31">
                <parent segment="60"/>
                <distal x="-127.27904" y="175.00273" z="-127.27927" diameter="1.24"/>
            </segment>

            <segment id="78" name="Seg0_comp_40">
                <parent segment="77"/>
                <proximal x="4.9515475E-5" y="275.0" z="0.0" diameter="2.0"/>
                <distal x="5.4033335E-5" y="300.00006" z="0.0" diameter="2.0"/>
            </segment>

            <segment id="79" name="Seg1_comp_40">
                <parent segment="78"/>
                <distal x="5.5863948E-5" y="325.0" z="0.0" diameter="2.0"/>
            </segment>

            <segment id="80" name="Seg0_comp_41">
                <parent segment="79"/>
                <proximal x="5.5863948E-5" y="325.0" z="0.0" diameter="1.8"/>
                <distal x="7.79496E-5" y="350.00006" z="0.0" diameter="1.8"/>
            </segment>

            <segment id="81" name="Seg1_comp_41">
                <parent segment="80"/>
                <distal x="8.949458E-5" y="375.00006" z="0.0" diameter="1.8"/>
            </segment>

            <segment id="82" name="Seg0_comp_42">
                <parent segment="81"/>
                <proximal x="8.949458E-5" y="375.00006" z="0.0" diameter="1.6"/>
                <distal x="9.1325186E-5" y="400.00003" z="0.0" diameter="1.6"/>
            </segment>

            <segment id="83" name="Seg1_comp_42">
                <parent segment="82"/>
                <distal x="1.169244E-4" y="425.00006" z="0.0" diameter="1.6"/>
            </segment>

            <segment id="84" name="Seg0_comp_43">
                <parent segment="83"/>
                <proximal x="1.169244E-4" y="425.00006" z="0.0" diameter="1.4"/>
                <distal x="1.3063931E-4" y="450.00006" z="0.0" diameter="1.4"/>
            </segment>

            <segment id="85" name="Seg1_comp_43">
                <parent segment="84"/>
                <distal x="1.3029999E-4" y="475.00006" z="0.0" diameter="1.4"/>
            </segment>

            <segment id="86" name="Seg0_comp_44">
                <parent segment="85"/>
                <proximal x="1.3029999E-4" y="475.00006" z="0.0" diameter="1.2"/>
                <distal x="1.4401489E-4" y="500.00006" z="0.0" diameter="1.2"/>
            </segment>

            <segment id="87" name="Seg1_comp_44">
                <parent segment="86"/>
                <distal x="1.5989975E-4" y="525.0" z="0.0" diameter="1.2"/>
            </segment>

            <segmentGroup id="comp_1" neuroLexId="sao864921383">    <!--
                This group contains an unbranched set of segments, and all of the segmentGroups marked with
                neuroLexId = sao864921383 form a non-overlapping set of all of the segments.
                These segmentGroups correspond to the 'cables' of NeuroML v1.8.1. -->

                <!--This 'Section' has number of internal divisions (nseg) = 2-->

                <property tag="numberInternalDivisions" value="2"/>

                <member segment="0"/>

                <member segment="1"/>
            </segmentGroup>

            <segmentGroup id="comp_45" neuroLexId="sao864921383">    <!--
                This group contains an unbranched set of segments, and all of the segmentGroups marked with
                neuroLexId = sao864921383 form a non-overlapping set of all of the segments.
                These segmentGroups correspond to the 'cables' of NeuroML v1.8.1. -->

                <!--This 'Section' has number of internal divisions (nseg) = 24-->

                <property tag="numberInternalDivisions" value="24"/>

                <member segment="88"/>

                <member segment="89"/>
            </segmentGroup>

            <segmentGroup id="comp_35" neuroLexId="sao864921383">    <!--
                This group contains an unbranched set of segments, and all of the segmentGroups marked with
                neuroLexId = sao864921383 form a non-overlapping set of all of the segments.
                These segmentGroups correspond to the 'cables' of NeuroML v1.8.1. -->

                <!--This 'Section' has number of internal divisions (nseg) = 12-->

                <property tag="numberInternalDivisions" value="12"/>

                <member segment="68"/>

                <member segment="69"/>
            </segmentGroup>

            <segmentGroup id="comp_6" neuroLexId="sao864921383">    <!--
                This group contains an unbranched set of segments, and all of the segmentGroups marked with
                neuroLexId = sao864921383 form a non-overlapping set of all of the segments.
                These segmentGroups correspond to the 'cables' of NeuroML v1.8.1. -->

                <!--This 'Section' has number of internal divisions (nseg) = 19-->

                <property tag="numberInternalDivisions" value="19"/>

                <member segment="10"/>

                <member segment="11"/>
            </segmentGroup>

            <segmentGroup id="comp_5" neuroLexId="sao864921383">    <!--
                This group contains an unbranched set of segments, and all of the segmentGroups marked with
                neuroLexId = sao864921383 form a non-overlapping set of all of the segments.
                These segmentGroups correspond to the 'cables' of NeuroML v1.8.1. -->

                <!--This 'Section' has number of internal divisions (nseg) = 19-->

                <property tag="numberInternalDivisions" value="19"/>

                <member segment="8"/>

                <member segment="9"/>
            </segmentGroup>

            <segmentGroup id="comp_4" neuroLexId="sao864921383">    <!--
                This group contains an unbranched set of segments, and all of the segmentGroups marked with
                neuroLexId = sao864921383 form a non-overlapping set of all of the segments.
                These segmentGroups correspond to the 'cables' of NeuroML v1.8.1. -->

                <!--This 'Section' has number of internal divisions (nseg) = 19-->

                <property tag="numberInternalDivisions" value="19"/>

                <member segment="6"/>

                <member segment="7"/>
            </segmentGroup>

            <segmentGroup id="comp_3" neuroLexId="sao864921383">    <!--
                This group contains an unbranched set of segments, and all of the segmentGroups marked with
                neuroLexId = sao864921383 form a non-overlapping set of all of the segments.
                These segmentGroups correspond to the 'cables' of NeuroML v1.8.1. -->

                <!--This 'Section' has number of internal divisions (nseg) = 19-->

                <property tag="numberInternalDivisions" value="19"/>

                <member segment="4"/>

                <member segment="5"/>
            </segmentGroup>

            <segmentGroup id="comp_2" neuroLexId="sao864921383">    <!--
                This group contains an unbranched set of segments, and all of the segmentGroups marked with
                neuroLexId = sao864921383 form a non-overlapping set of all of the segments.
                These segmentGroups correspond to the 'cables' of NeuroML v1.8.1. -->

                <!--This 'Section' has number of internal divisions (nseg) = 19-->

                <property tag="numberInternalDivisions" value="19"/>

                <member segment="2"/>

                <member segment="3"/>
            </segmentGroup>

            <segmentGroup id="comp_46" neuroLexId="sao864921383">    <!--
                This group contains an unbranched set of segments, and all of the segmentGroups marked with
                neuroLexId = sao864921383 form a non-overlapping set of all of the segments.
                These segmentGroups correspond to the 'cables' of NeuroML v1.8.1. -->

                <!--This 'Section' has number of internal divisions (nseg) = 54-->

                <property tag="numberInternalDivisions" value="54"/>

                <member segment="90"/>

                <member segment="91"/>
            </segmentGroup>

            <segmentGroup id="comp_36" neuroLexId="sao864921383">    <!--
                This group contains an unbranched set of segments, and all of the segmentGroups marked with
                neuroLexId = sao864921383 form a non-overlapping set of all of the segments.
                These segmentGroups correspond to the 'cables' of NeuroML v1.8.1. -->

                <!--This 'Section' has number of internal divisions (nseg) = 14-->

                <property tag="numberInternalDivisions" value="14"/>

                <member segment="70"/>

                <member segment="71"/>
            </segmentGroup>

            <segmentGroup id="comp_12" neuroLexId="sao864921383">    <!--
                This group contains an unbranched set of segments, and all of the segmentGroups marked with
                neuroLexId = sao864921383 form a non-overlapping set of all of the segments.
                These segmentGroups correspond to the 'cables' of NeuroML v1.8.1. -->

                <!--This 'Section' has number of internal divisions (nseg) = 22-->

                <property tag="numberInternalDivisions" value="22"/>

                <member segment="22"/>

                <member segment="23"/>
            </segmentGroup>

            <segmentGroup id="comp_7" neuroLexId="sao864921383">    <!--
                This group contains an unbranched set of segments, and all of the segmentGroups marked with
                neuroLexId = sao864921383 form a non-overlapping set of all of the segments.
                These segmentGroups correspond to the 'cables' of NeuroML v1.8.1. -->

                <!--This 'Section' has number of internal divisions (nseg) = 22-->

                <property tag="numberInternalDivisions" value="22"/>

                <member segment="12"/>

                <member segment="13"/>
            </segmentGroup>

            <segmentGroup id="comp_17" neuroLexId="sao864921383">    <!--
                This group contains an unbranched set of segments, and all of the segmentGroups marked with
                neuroLexId = sao864921383 form a non-overlapping set of all of the segments.
                These segmentGroups correspond to the 'cables' of NeuroML v1.8.1. -->

                <!--This 'Section' has number of internal divisions (nseg) = 19-->

                <property tag="numberInternalDivisions" value="19"/>

                <member segment="32"/>

                <member segment="33"/>
            </segmentGroup>

            <segmentGroup id="comp_16" neuroLexId="sao864921383">    <!--
                This group contains an unbranched set of segments, and all of the segmentGroups marked with
                neuroLexId = sao864921383 form a non-overlapping set of all of the segments.
                These segmentGroups correspond to the 'cables' of NeuroML v1.8.1. -->

                <!--This 'Section' has number of internal divisions (nseg) = 19-->

                <property tag="numberInternalDivisions" value="19"/>

                <member segment="30"/>

                <member segment="31"/>
            </segmentGroup>

            <segmentGroup id="comp_15" neuroLexId="sao864921383">    <!--
                This group contains an unbranched set of segments, and all of the segmentGroups marked with
                neuroLexId = sao864921383 form a non-overlapping set of all of the segments.
                These segmentGroups correspond to the 'cables' of NeuroML v1.8.1. -->

                <!--This 'Section' has number of internal divisions (nseg) = 19-->

                <property tag="numberInternalDivisions" value="19"/>

                <member segment="28"/>

                <member segment="29"/>
            </segmentGroup>

            <segmentGroup id="comp_14" neuroLexId="sao864921383">    <!--
                This group contains an unbranched set of segments, and all of the segmentGroups marked with
                neuroLexId = sao864921383 form a non-overlapping set of all of the segments.
                These segmentGroups correspond to the 'cables' of NeuroML v1.8.1. -->

                <!--This 'Section' has number of internal divisions (nseg) = 19-->

                <property tag="numberInternalDivisions" value="19"/>

                <member segment="26"/>

                <member segment="27"/>
            </segmentGroup>

            <segmentGroup id="comp_13" neuroLexId="sao864921383">    <!--
                This group contains an unbranched set of segments, and all of the segmentGroups marked with
                neuroLexId = sao864921383 form a non-overlapping set of all of the segments.
                These segmentGroups correspond to the 'cables' of NeuroML v1.8.1. -->

                <!--This 'Section' has number of internal divisions (nseg) = 19-->

                <property tag="numberInternalDivisions" value="19"/>

                <member segment="24"/>

                <member segment="25"/>
            </segmentGroup>

            <segmentGroup id="comp_49" neuroLexId="sao864921383">    <!--
                This group contains an unbranched set of segments, and all of the segmentGroups marked with
                neuroLexId = sao864921383 form a non-overlapping set of all of the segments.
                These segmentGroups correspond to the 'cables' of NeuroML v1.8.1. -->

                <!--This 'Section' has number of internal divisions (nseg) = 64-->

                <property tag="numberInternalDivisions" value="64"/>

                <member segment="96"/>

                <member segment="97"/>
            </segmentGroup>

            <segmentGroup id="comp_47" neuroLexId="sao864921383">    <!--
                This group contains an unbranched set of segments, and all of the segmentGroups marked with
                neuroLexId = sao864921383 form a non-overlapping set of all of the segments.
                These segmentGroups correspond to the 'cables' of NeuroML v1.8.1. -->

                <!--This 'Section' has number of internal divisions (nseg) = 64-->

                <property tag="numberInternalDivisions" value="64"/>

                <member segment="92"/>

                <member segment="93"/>
            </segmentGroup>

            <segmentGroup id="comp_11" neuroLexId="sao864921383">    <!--
                This group contains an unbranched set of segments, and all of the segmentGroups marked with
                neuroLexId = sao864921383 form a non-overlapping set of all of the segments.
                These segmentGroups correspond to the 'cables' of NeuroML v1.8.1. -->

                <!--This 'Section' has number of internal divisions (nseg) = 22-->

                <property tag="numberInternalDivisions" value="22"/>

                <member segment="20"/>

                <member segment="21"/>
            </segmentGroup>

            <segmentGroup id="comp_8" neuroLexId="sao864921383">    <!--
                This group contains an unbranched set of segments, and all of the segmentGroups marked with
                neuroLexId = sao864921383 form a non-overlapping set of all of the segments.
                These segmentGroups correspond to the 'cables' of NeuroML v1.8.1. -->

                <!--This 'Section' has number of internal divisions (nseg) = 22-->

                <property tag="numberInternalDivisions" value="22"/>

                <member segment="14"/>

                <member segment="15"/>
            </segmentGroup>

            <segmentGroup id="comp_37" neuroLexId="sao864921383">    <!--
                This group contains an unbranched set of segments, and all of the segmentGroups marked with
                neuroLexId = sao864921383 form a non-overlapping set of all of the segments.
                These segmentGroups correspond to the 'cables' of NeuroML v1.8.1. -->

                <!--This 'Section' has number of internal divisions (nseg) = 13-->

                <property tag="numberInternalDivisions" value="13"/>

                <member segment="72"/>

                <member segment="73"/>
            </segmentGroup>

            <segmentGroup id="comp_23" neuroLexId="sao864921383">    <!--
                This group contains an unbranched set of segments, and all of the segmentGroups marked with
                neuroLexId = sao864921383 form a non-overlapping set of all of the segments.
                These segmentGroups correspond to the 'cables' of NeuroML v1.8.1. -->

                <!--This 'Section' has number of internal divisions (nseg) = 22-->

                <property tag="numberInternalDivisions" value="22"/>

                <member segment="44"/>

                <member segment="45"/>
            </segmentGroup>

            <segmentGroup id="comp_18" neuroLexId="sao864921383">    <!--
                This group contains an unbranched set of segments, and all of the segmentGroups marked with
                neuroLexId = sao864921383 form a non-overlapping set of all of the segments.
                These segmentGroups correspond to the 'cables' of NeuroML v1.8.1. -->

                <!--This 'Section' has number of internal divisions (nseg) = 22-->

                <property tag="numberInternalDivisions" value="22"/>

                <member segment="34"/>

                <member segment="35"/>
            </segmentGroup>

            <segmentGroup id="comp_28" neuroLexId="sao864921383">    <!--
                This group contains an unbranched set of segments, and all of the segmentGroups marked with
                neuroLexId = sao864921383 form a non-overlapping set of all of the segments.
                These segmentGroups correspond to the 'cables' of NeuroML v1.8.1. -->

                <!--This 'Section' has number of internal divisions (nseg) = 19-->

                <property tag="numberInternalDivisions" value="19"/>

                <member segment="54"/>

                <member segment="55"/>
            </segmentGroup>

            <segmentGroup id="comp_27" neuroLexId="sao864921383">    <!--
                This group contains an unbranched set of segments, and all of the segmentGroups marked with
                neuroLexId = sao864921383 form a non-overlapping set of all of the segments.
                These segmentGroups correspond to the 'cables' of NeuroML v1.8.1. -->

                <!--This 'Section' has number of internal divisions (nseg) = 19-->

                <property tag="numberInternalDivisions" value="19"/>

                <member segment="52"/>

                <member segment="53"/>
            </segmentGroup>

            <segmentGroup id="comp_26" neuroLexId="sao864921383">    <!--
                This group contains an unbranched set of segments, and all of the segmentGroups marked with
                neuroLexId = sao864921383 form a non-overlapping set of all of the segments.
                These segmentGroups correspond to the 'cables' of NeuroML v1.8.1. -->

                <!--This 'Section' has number of internal divisions (nseg) = 19-->

                <property tag="numberInternalDivisions" value="19"/>

                <member segment="50"/>

                <member segment="51"/>
            </segmentGroup>

            <segmentGroup id="comp_25" neuroLexId="sao864921383">    <!--
                This group contains an unbranched set of segments, and all of the segmentGroups marked with
                neuroLexId = sao864921383 form a non-overlapping set of all of the segments.
                These segmentGroups correspond to the 'cables' of NeuroML v1.8.1. -->

                <!--This 'Section' has number of internal divisions (nseg) = 19-->

                <property tag="numberInternalDivisions" value="19"/>

                <member segment="48"/>

                <member segment="49"/>
            </segmentGroup>

            <segmentGroup id="comp_24" neuroLexId="sao864921383">    <!--
                This group contains an unbranched set of segments, and all of the segmentGroups marked with
                neuroLexId = sao864921383 form a non-overlapping set of all of the segments.
                These segmentGroups correspond to the 'cables' of NeuroML v1.8.1. -->

                <!--This 'Section' has number of internal divisions (nseg) = 19-->

                <property tag="numberInternalDivisions" value="19"/>

                <member segment="46"/>

                <member segment="47"/>
            </segmentGroup>

            <segmentGroup id="comp_50" neuroLexId="sao864921383">    <!--
                This group contains an unbranched set of segments, and all of the segmentGroups marked with
                neuroLexId = sao864921383 form a non-overlapping set of all of the segments.
                These segmentGroups correspond to the 'cables' of NeuroML v1.8.1. -->

                <!--This 'Section' has number of internal divisions (nseg) = 64-->

                <property tag="numberInternalDivisions" value="64"/>

                <member segment="98"/>

                <member segment="99"/>
            </segmentGroup>

            <segmentGroup id="comp_48" neuroLexId="sao864921383">    <!--
                This group contains an unbranched set of segments, and all of the segmentGroups marked with
                neuroLexId = sao864921383 form a non-overlapping set of all of the segments.
                These segmentGroups correspond to the 'cables' of NeuroML v1.8.1. -->

                <!--This 'Section' has number of internal divisions (nseg) = 64-->

                <property tag="numberInternalDivisions" value="64"/>

                <member segment="94"/>

                <member segment="95"/>
            </segmentGroup>

            <segmentGroup id="comp_22" neuroLexId="sao864921383">    <!--
                This group contains an unbranched set of segments, and all of the segmentGroups marked with
                neuroLexId = sao864921383 form a non-overlapping set of all of the segments.
                These segmentGroups correspond to the 'cables' of NeuroML v1.8.1. -->

                <!--This 'Section' has number of internal divisions (nseg) = 22-->

                <property tag="numberInternalDivisions" value="22"/>

                <member segment="42"/>

                <member segment="43"/>
            </segmentGroup>

            <segmentGroup id="comp_19" neuroLexId="sao864921383">    <!--
                This group contains an unbranched set of segments, and all of the segmentGroups marked with
                neuroLexId = sao864921383 form a non-overlapping set of all of the segments.
                These segmentGroups correspond to the 'cables' of NeuroML v1.8.1. -->

                <!--This 'Section' has number of internal divisions (nseg) = 22-->

                <property tag="numberInternalDivisions" value="22"/>

                <member segment="36"/>

                <member segment="37"/>
            </segmentGroup>

            <segmentGroup id="comp_10" neuroLexId="sao864921383">    <!--
                This group contains an unbranched set of segments, and all of the segmentGroups marked with
                neuroLexId = sao864921383 form a non-overlapping set of all of the segments.
                These segmentGroups correspond to the 'cables' of NeuroML v1.8.1. -->

                <!--This 'Section' has number of internal divisions (nseg) = 22-->

                <property tag="numberInternalDivisions" value="22"/>

                <member segment="18"/>

                <member segment="19"/>
            </segmentGroup>

            <segmentGroup id="comp_9" neuroLexId="sao864921383">    <!--
                This group contains an unbranched set of segments, and all of the segmentGroups marked with
                neuroLexId = sao864921383 form a non-overlapping set of all of the segments.
                These segmentGroups correspond to the 'cables' of NeuroML v1.8.1. -->

                <!--This 'Section' has number of internal divisions (nseg) = 22-->

                <property tag="numberInternalDivisions" value="22"/>

                <member segment="16"/>

                <member segment="17"/>
            </segmentGroup>

            <segmentGroup id="comp_38" neuroLexId="sao864921383">    <!--
                This group contains an unbranched set of segments, and all of the segmentGroups marked with
                neuroLexId = sao864921383 form a non-overlapping set of all of the segments.
                These segmentGroups correspond to the 'cables' of NeuroML v1.8.1. -->

                <!--This 'Section' has number of internal divisions (nseg) = 13-->

                <property tag="numberInternalDivisions" value="13"/>

                <member segment="74"/>

                <member segment="75"/>
            </segmentGroup>

            <segmentGroup id="comp_34" neuroLexId="sao864921383">    <!--
                This group contains an unbranched set of segments, and all of the segmentGroups marked with
                neuroLexId = sao864921383 form a non-overlapping set of all of the segments.
                These segmentGroups correspond to the 'cables' of NeuroML v1.8.1. -->

                <!--This 'Section' has number of internal divisions (nseg) = 22-->

                <property tag="numberInternalDivisions" value="22"/>

                <member segment="66"/>

                <member segment="67"/>
            </segmentGroup>

            <segmentGroup id="comp_29" neuroLexId="sao864921383">    <!--
                This group contains an unbranched set of segments, and all of the segmentGroups marked with
                neuroLexId = sao864921383 form a non-overlapping set of all of the segments.
                These segmentGroups correspond to the 'cables' of NeuroML v1.8.1. -->

                <!--This 'Section' has number of internal divisions (nseg) = 22-->

                <property tag="numberInternalDivisions" value="22"/>

                <member segment="56"/>

                <member segment="57"/>
            </segmentGroup>

            <segmentGroup id="comp_33" neuroLexId="sao864921383">    <!--
                This group contains an unbranched set of segments, and all of the segmentGroups marked with
                neuroLexId = sao864921383 form a non-overlapping set of all of the segments.
                These segmentGroups correspond to the 'cables' of NeuroML v1.8.1. -->

                <!--This 'Section' has number of internal divisions (nseg) = 22-->

                <property tag="numberInternalDivisions" value="22"/>

                <member segment="64"/>

                <member segment="65"/>
            </segmentGroup>

            <segmentGroup id="comp_30" neuroLexId="sao864921383">    <!--
                This group contains an unbranched set of segments, and all of the segmentGroups marked with
                neuroLexId = sao864921383 form a non-overlapping set of all of the segments.
                These segmentGroups correspond to the 'cables' of NeuroML v1.8.1. -->

                <!--This 'Section' has number of internal divisions (nseg) = 22-->

                <property tag="numberInternalDivisions" value="22"/>

                <member segment="58"/>

                <member segment="59"/>
            </segmentGroup>

            <segmentGroup id="comp_21" neuroLexId="sao864921383">    <!--
                This group contains an unbranched set of segments, and all of the segmentGroups marked with
                neuroLexId = sao864921383 form a non-overlapping set of all of the segments.
                These segmentGroups correspond to the 'cables' of NeuroML v1.8.1. -->

                <!--This 'Section' has number of internal divisions (nseg) = 22-->

                <property tag="numberInternalDivisions" value="22"/>

                <member segment="40"/>

                <member segment="41"/>
            </segmentGroup>

            <segmentGroup id="comp_20" neuroLexId="sao864921383">    <!--
                This group contains an unbranched set of segments, and all of the segmentGroups marked with
                neuroLexId = sao864921383 form a non-overlapping set of all of the segments.
                These segmentGroups correspond to the 'cables' of NeuroML v1.8.1. -->

                <!--This 'Section' has number of internal divisions (nseg) = 22-->

                <property tag="numberInternalDivisions" value="22"/>

                <member segment="38"/>

                <member segment="39"/>
            </segmentGroup>

            <segmentGroup id="comp_39" neuroLexId="sao864921383">    <!--
                This group contains an unbranched set of segments, and all of the segmentGroups marked with
                neuroLexId = sao864921383 form a non-overlapping set of all of the segments.
                These segmentGroups correspond to the 'cables' of NeuroML v1.8.1. -->

                <!--This 'Section' has number of internal divisions (nseg) = 14-->

                <property tag="numberInternalDivisions" value="14"/>

                <member segment="76"/>

                <member segment="77"/>
            </segmentGroup>

            <segmentGroup id="comp_32" neuroLexId="sao864921383">    <!--
                This group contains an unbranched set of segments, and all of the segmentGroups marked with
                neuroLexId = sao864921383 form a non-overlapping set of all of the segments.
                These segmentGroups correspond to the 'cables' of NeuroML v1.8.1. -->

                <!--This 'Section' has number of internal divisions (nseg) = 22-->

                <property tag="numberInternalDivisions" value="22"/>

                <member segment="62"/>

                <member segment="63"/>
            </segmentGroup>

            <segmentGroup id="comp_31" neuroLexId="sao864921383">    <!--
                This group contains an unbranched set of segments, and all of the segmentGroups marked with
                neuroLexId = sao864921383 form a non-overlapping set of all of the segments.
                These segmentGroups correspond to the 'cables' of NeuroML v1.8.1. -->

                <!--This 'Section' has number of internal divisions (nseg) = 22-->

                <property tag="numberInternalDivisions" value="22"/>

                <member segment="60"/>

                <member segment="61"/>
            </segmentGroup>

            <segmentGroup id="comp_40" neuroLexId="sao864921383">    <!--
                This group contains an unbranched set of segments, and all of the segmentGroups marked with
                neuroLexId = sao864921383 form a non-overlapping set of all of the segments.
                These segmentGroups correspond to the 'cables' of NeuroML v1.8.1. -->

                <!--This 'Section' has number of internal divisions (nseg) = 15-->

                <property tag="numberInternalDivisions" value="15"/>

                <member segment="78"/>

                <member segment="79"/>
            </segmentGroup>

            <segmentGroup id="comp_41" neuroLexId="sao864921383">    <!--
                This group contains an unbranched set of segments, and all of the segmentGroups marked with
                neuroLexId = sao864921383 form a non-overlapping set of all of the segments.
                These segmentGroups correspond to the 'cables' of NeuroML v1.8.1. -->

                <!--This 'Section' has number of internal divisions (nseg) = 15-->

                <property tag="numberInternalDivisions" value="15"/>

                <member segment="80"/>

                <member segment="81"/>
            </segmentGroup>

            <segmentGroup id="comp_42" neuroLexId="sao864921383">    <!--
                This group contains an unbranched set of segments, and all of the segmentGroups marked with
                neuroLexId = sao864921383 form a non-overlapping set of all of the segments.
                These segmentGroups correspond to the 'cables' of NeuroML v1.8.1. -->

                <!--This 'Section' has number of internal divisions (nseg) = 16-->

                <property tag="numberInternalDivisions" value="16"/>

                <member segment="82"/>

                <member segment="83"/>
            </segmentGroup>

            <segmentGroup id="comp_43" neuroLexId="sao864921383">    <!--
                This group contains an unbranched set of segments, and all of the segmentGroups marked with
                neuroLexId = sao864921383 form a non-overlapping set of all of the segments.
                These segmentGroups correspond to the 'cables' of NeuroML v1.8.1. -->

                <!--This 'Section' has number of internal divisions (nseg) = 17-->

                <property tag="numberInternalDivisions" value="17"/>

                <member segment="84"/>

                <member segment="85"/>
            </segmentGroup>

            <segmentGroup id="comp_44" neuroLexId="sao864921383">    <!--
                This group contains an unbranched set of segments, and all of the segmentGroups marked with
                neuroLexId = sao864921383 form a non-overlapping set of all of the segments.
                These segmentGroups correspond to the 'cables' of NeuroML v1.8.1. -->

                <!--This 'Section' has number of internal divisions (nseg) = 19-->

                <property tag="numberInternalDivisions" value="19"/>

                <member segment="86"/>

                <member segment="87"/>
            </segmentGroup>

            <segmentGroup id="all">
                <include segmentGroup="comp_1"/>
                <include segmentGroup="comp_45"/>
                <include segmentGroup="comp_35"/>
                <include segmentGroup="comp_6"/>
                <include segmentGroup="comp_5"/>
                <include segmentGroup="comp_4"/>
                <include segmentGroup="comp_3"/>
                <include segmentGroup="comp_2"/>
                <include segmentGroup="comp_46"/>
                <include segmentGroup="comp_36"/>
                <include segmentGroup="comp_12"/>
                <include segmentGroup="comp_7"/>
                <include segmentGroup="comp_17"/>
                <include segmentGroup="comp_16"/>
                <include segmentGroup="comp_15"/>
                <include segmentGroup="comp_14"/>
                <include segmentGroup="comp_13"/>
                <include segmentGroup="comp_49"/>
                <include segmentGroup="comp_47"/>
                <include segmentGroup="comp_11"/>
                <include segmentGroup="comp_8"/>
                <include segmentGroup="comp_37"/>
                <include segmentGroup="comp_23"/>
                <include segmentGroup="comp_18"/>
                <include segmentGroup="comp_28"/>
                <include segmentGroup="comp_27"/>
                <include segmentGroup="comp_26"/>
                <include segmentGroup="comp_25"/>
                <include segmentGroup="comp_24"/>
                <include segmentGroup="comp_50"/>
                <include segmentGroup="comp_48"/>
                <include segmentGroup="comp_22"/>
                <include segmentGroup="comp_19"/>
                <include segmentGroup="comp_10"/>
                <include segmentGroup="comp_9"/>
                <include segmentGroup="comp_38"/>
                <include segmentGroup="comp_34"/>
                <include segmentGroup="comp_29"/>
                <include segmentGroup="comp_33"/>
                <include segmentGroup="comp_30"/>
                <include segmentGroup="comp_21"/>
                <include segmentGroup="comp_20"/>
                <include segmentGroup="comp_39"/>
                <include segmentGroup="comp_32"/>
                <include segmentGroup="comp_31"/>
                <include segmentGroup="comp_40"/>
                <include segmentGroup="comp_41"/>
                <include segmentGroup="comp_42"/>
                <include segmentGroup="comp_43"/>
                <include segmentGroup="comp_44"/>
            </segmentGroup>

            <segmentGroup id="ModelViewParmSubset_1">
                <include segmentGroup="comp_1"/>
                <include segmentGroup="comp_35"/>
                <include segmentGroup="comp_6"/>
                <include segmentGroup="comp_5"/>
                <include segmentGroup="comp_4"/>
                <include segmentGroup="comp_3"/>
                <include segmentGroup="comp_2"/>
                <include segmentGroup="comp_36"/>
                <include segmentGroup="comp_12"/>
                <include segmentGroup="comp_7"/>
                <include segmentGroup="comp_17"/>
                <include segmentGroup="comp_16"/>
                <include segmentGroup="comp_15"/>
                <include segmentGroup="comp_14"/>
                <include segmentGroup="comp_13"/>
                <include segmentGroup="comp_11"/>
                <include segmentGroup="comp_8"/>
                <include segmentGroup="comp_37"/>
                <include segmentGroup="comp_23"/>
                <include segmentGroup="comp_18"/>
                <include segmentGroup="comp_28"/>
                <include segmentGroup="comp_27"/>
                <include segmentGroup="comp_26"/>
                <include segmentGroup="comp_25"/>
                <include segmentGroup="comp_24"/>
                <include segmentGroup="comp_22"/>
                <include segmentGroup="comp_19"/>
                <include segmentGroup="comp_10"/>
                <include segmentGroup="comp_9"/>
                <include segmentGroup="comp_38"/>
                <include segmentGroup="comp_34"/>
                <include segmentGroup="comp_29"/>
                <include segmentGroup="comp_33"/>
                <include segmentGroup="comp_30"/>
                <include segmentGroup="comp_21"/>
                <include segmentGroup="comp_20"/>
                <include segmentGroup="comp_39"/>
                <include segmentGroup="comp_32"/>
                <include segmentGroup="comp_31"/>
                <include segmentGroup="comp_40"/>
                <include segmentGroup="comp_41"/>
                <include segmentGroup="comp_42"/>
                <include segmentGroup="comp_43"/>
                <include segmentGroup="comp_44"/>
            </segmentGroup>

            <segmentGroup id="ModelViewParmSubset_2">
                <include segmentGroup="comp_1"/>
                <include segmentGroup="comp_35"/>
                <include segmentGroup="comp_6"/>
                <include segmentGroup="comp_5"/>
                <include segmentGroup="comp_4"/>
                <include segmentGroup="comp_3"/>
                <include segmentGroup="comp_2"/>
                <include segmentGroup="comp_36"/>
                <include segmentGroup="comp_12"/>
                <include segmentGroup="comp_7"/>
                <include segmentGroup="comp_11"/>
                <include segmentGroup="comp_8"/>
                <include segmentGroup="comp_10"/>
                <include segmentGroup="comp_9"/>
            </segmentGroup>

            <segmentGroup id="ModelViewParmSubset_3">
                <include segmentGroup="comp_1"/>
                <include segmentGroup="comp_45"/>
                <include segmentGroup="comp_35"/>
                <include segmentGroup="comp_6"/>
                <include segmentGroup="comp_5"/>
                <include segmentGroup="comp_4"/>
                <include segmentGroup="comp_3"/>
                <include segmentGroup="comp_2"/>
                <include segmentGroup="comp_46"/>
                <include segmentGroup="comp_36"/>
                <include segmentGroup="comp_12"/>
                <include segmentGroup="comp_7"/>
                <include segmentGroup="comp_49"/>
                <include segmentGroup="comp_47"/>
                <include segmentGroup="comp_11"/>
                <include segmentGroup="comp_8"/>
                <include segmentGroup="comp_50"/>
                <include segmentGroup="comp_48"/>
                <include segmentGroup="comp_10"/>
                <include segmentGroup="comp_9"/>
            </segmentGroup>

            <segmentGroup id="ModelViewParmSubset_5">
                <include segmentGroup="comp_1"/>
                <include segmentGroup="comp_45"/>
                <include segmentGroup="comp_46"/>
                <include segmentGroup="comp_49"/>
                <include segmentGroup="comp_47"/>
                <include segmentGroup="comp_50"/>
                <include segmentGroup="comp_48"/>
            </segmentGroup>

            <segmentGroup id="OneSecGrp_SectionRef_1">
                <include segmentGroup="comp_1"/>
            </segmentGroup>

            <segmentGroup id="soma_group" neuroLexId="GO:0043025">    <!--Soma group-->

                <include segmentGroup="comp_1"/>
            </segmentGroup>

            <segmentGroup id="DeepBask_dends">
                <include segmentGroup="comp_1"/>
                <include segmentGroup="comp_35"/>
                <include segmentGroup="comp_6"/>
                <include segmentGroup="comp_5"/>
                <include segmentGroup="comp_4"/>
                <include segmentGroup="comp_3"/>
                <include segmentGroup="comp_2"/>
                <include segmentGroup="comp_36"/>
            </segmentGroup>

            <segmentGroup id="axon_group" neuroLexId="GO:0030424">    <!--Axon group-->

                <include segmentGroup="comp_45"/>
                <include segmentGroup="comp_46"/>
                <include segmentGroup="comp_49"/>
                <include segmentGroup="comp_47"/>
                <include segmentGroup="comp_50"/>
                <include segmentGroup="comp_48"/>
            </segmentGroup>

            <segmentGroup id="prox_axon">
                <include segmentGroup="comp_45"/>
            </segmentGroup>

            <segmentGroup id="dendrite_group" neuroLexId="GO:0030425">    <!--Dendrite group-->

                <include segmentGroup="comp_35"/>
                <include segmentGroup="comp_6"/>
                <include segmentGroup="comp_5"/>
                <include segmentGroup="comp_4"/>
                <include segmentGroup="comp_3"/>
                <include segmentGroup="comp_2"/>
                <include segmentGroup="comp_36"/>
                <include segmentGroup="comp_12"/>
                <include segmentGroup="comp_7"/>
                <include segmentGroup="comp_17"/>
                <include segmentGroup="comp_16"/>
                <include segmentGroup="comp_15"/>
                <include segmentGroup="comp_14"/>
                <include segmentGroup="comp_13"/>
                <include segmentGroup="comp_11"/>
                <include segmentGroup="comp_8"/>
                <include segmentGroup="comp_37"/>
                <include segmentGroup="comp_23"/>
                <include segmentGroup="comp_18"/>
                <include segmentGroup="comp_28"/>
                <include segmentGroup="comp_27"/>
                <include segmentGroup="comp_26"/>
                <include segmentGroup="comp_25"/>
                <include segmentGroup="comp_24"/>
                <include segmentGroup="comp_22"/>
                <include segmentGroup="comp_19"/>
                <include segmentGroup="comp_10"/>
                <include segmentGroup="comp_9"/>
                <include segmentGroup="comp_38"/>
                <include segmentGroup="comp_34"/>
                <include segmentGroup="comp_29"/>
                <include segmentGroup="comp_33"/>
                <include segmentGroup="comp_30"/>
                <include segmentGroup="comp_21"/>
                <include segmentGroup="comp_20"/>
                <include segmentGroup="comp_39"/>
                <include segmentGroup="comp_32"/>
                <include segmentGroup="comp_31"/>
                <include segmentGroup="comp_40"/>
                <include segmentGroup="comp_41"/>
                <include segmentGroup="comp_42"/>
                <include segmentGroup="comp_43"/>
                <include segmentGroup="comp_44"/>
            </segmentGroup>

            <segmentGroup id="ModelViewParmSubset_6">
                <include segmentGroup="comp_35"/>
                <include segmentGroup="comp_6"/>
                <include segmentGroup="comp_5"/>
                <include segmentGroup="comp_4"/>
                <include segmentGroup="comp_3"/>
                <include segmentGroup="comp_2"/>
                <include segmentGroup="comp_36"/>
                <include segmentGroup="comp_12"/>
                <include segmentGroup="comp_7"/>
                <include segmentGroup="comp_17"/>
                <include segmentGroup="comp_16"/>
                <include segmentGroup="comp_15"/>
                <include segmentGroup="comp_14"/>
                <include segmentGroup="comp_13"/>
                <include segmentGroup="comp_11"/>
                <include segmentGroup="comp_8"/>
                <include segmentGroup="comp_37"/>
                <include segmentGroup="comp_23"/>
                <include segmentGroup="comp_18"/>
                <include segmentGroup="comp_28"/>
                <include segmentGroup="comp_27"/>
                <include segmentGroup="comp_26"/>
                <include segmentGroup="comp_25"/>
                <include segmentGroup="comp_24"/>
                <include segmentGroup="comp_22"/>
                <include segmentGroup="comp_19"/>
                <include segmentGroup="comp_10"/>
                <include segmentGroup="comp_9"/>
                <include segmentGroup="comp_38"/>
                <include segmentGroup="comp_34"/>
                <include segmentGroup="comp_29"/>
                <include segmentGroup="comp_33"/>
                <include segmentGroup="comp_30"/>
                <include segmentGroup="comp_21"/>
                <include segmentGroup="comp_20"/>
                <include segmentGroup="comp_39"/>
                <include segmentGroup="comp_32"/>
                <include segmentGroup="comp_31"/>
                <include segmentGroup="comp_40"/>
                <include segmentGroup="comp_41"/>
                <include segmentGroup="comp_42"/>
                <include segmentGroup="comp_43"/>
                <include segmentGroup="comp_44"/>
            </segmentGroup>

            <segmentGroup id="ModelViewParmSubset_7">
                <include segmentGroup="comp_35"/>
                <include segmentGroup="comp_6"/>
                <include segmentGroup="comp_5"/>
                <include segmentGroup="comp_4"/>
                <include segmentGroup="comp_3"/>
                <include segmentGroup="comp_2"/>
                <include segmentGroup="comp_36"/>
                <include segmentGroup="comp_12"/>
                <include segmentGroup="comp_7"/>
                <include segmentGroup="comp_17"/>
                <include segmentGroup="comp_16"/>
                <include segmentGroup="comp_15"/>
                <include segmentGroup="comp_14"/>
                <include segmentGroup="comp_13"/>
                <include segmentGroup="comp_11"/>
                <include segmentGroup="comp_8"/>
                <include segmentGroup="comp_37"/>
                <include segmentGroup="comp_23"/>
                <include segmentGroup="comp_18"/>
                <include segmentGroup="comp_28"/>
                <include segmentGroup="comp_27"/>
                <include segmentGroup="comp_26"/>
                <include segmentGroup="comp_25"/>
                <include segmentGroup="comp_24"/>
                <include segmentGroup="comp_22"/>
                <include segmentGroup="comp_19"/>
                <include segmentGroup="comp_10"/>
                <include segmentGroup="comp_9"/>
                <include segmentGroup="comp_38"/>
                <include segmentGroup="comp_34"/>
                <include segmentGroup="comp_29"/>
                <include segmentGroup="comp_33"/>
                <include segmentGroup="comp_30"/>
                <include segmentGroup="comp_21"/>
                <include segmentGroup="comp_20"/>
                <include segmentGroup="comp_39"/>
                <include segmentGroup="comp_32"/>
                <include segmentGroup="comp_31"/>
            </segmentGroup>

            <segmentGroup id="ModelViewParmSubset_10">
                <include segmentGroup="comp_35"/>
                <include segmentGroup="comp_6"/>
                <include segmentGroup="comp_5"/>
                <include segmentGroup="comp_4"/>
                <include segmentGroup="comp_3"/>
                <include segmentGroup="comp_2"/>
                <include segmentGroup="comp_36"/>
                <include segmentGroup="comp_12"/>
                <include segmentGroup="comp_7"/>
                <include segmentGroup="comp_11"/>
                <include segmentGroup="comp_8"/>
                <include segmentGroup="comp_10"/>
                <include segmentGroup="comp_9"/>
            </segmentGroup>

            <segmentGroup id="OneSecGrp_SectionRef_3">
                <include segmentGroup="comp_35"/>
            </segmentGroup>

            <segmentGroup id="L5Pyr_dends">
                <include segmentGroup="comp_35"/>
                <include segmentGroup="comp_6"/>
                <include segmentGroup="comp_5"/>
                <include segmentGroup="comp_4"/>
                <include segmentGroup="comp_3"/>
                <include segmentGroup="comp_2"/>
                <include segmentGroup="comp_36"/>
                <include segmentGroup="comp_12"/>
                <include segmentGroup="comp_7"/>
                <include segmentGroup="comp_17"/>
                <include segmentGroup="comp_16"/>
                <include segmentGroup="comp_15"/>
                <include segmentGroup="comp_14"/>
                <include segmentGroup="comp_13"/>
                <include segmentGroup="comp_11"/>
                <include segmentGroup="comp_8"/>
                <include segmentGroup="comp_37"/>
                <include segmentGroup="comp_23"/>
                <include segmentGroup="comp_18"/>
                <include segmentGroup="comp_28"/>
                <include segmentGroup="comp_27"/>
                <include segmentGroup="comp_26"/>
                <include segmentGroup="comp_25"/>
                <include segmentGroup="comp_24"/>
                <include segmentGroup="comp_22"/>
                <include segmentGroup="comp_19"/>
                <include segmentGroup="comp_10"/>
                <include segmentGroup="comp_9"/>
                <include segmentGroup="comp_38"/>
                <include segmentGroup="comp_34"/>
                <include segmentGroup="comp_29"/>
                <include segmentGroup="comp_33"/>
                <include segmentGroup="comp_30"/>
                <include segmentGroup="comp_21"/>
                <include segmentGroup="comp_20"/>
                <include segmentGroup="comp_39"/>
                <include segmentGroup="comp_32"/>
                <include segmentGroup="comp_31"/>
                <include segmentGroup="comp_40"/>
                <include segmentGroup="comp_41"/>
                <include segmentGroup="comp_42"/>
                <include segmentGroup="comp_43"/>
                <include segmentGroup="comp_44"/>
            </segmentGroup>

            <segmentGroup id="L6Pyr_dends">
                <include segmentGroup="comp_35"/>
                <include segmentGroup="comp_6"/>
                <include segmentGroup="comp_5"/>
                <include segmentGroup="comp_4"/>
                <include segmentGroup="comp_3"/>
                <include segmentGroup="comp_2"/>
                <include segmentGroup="comp_36"/>
                <include segmentGroup="comp_12"/>
                <include segmentGroup="comp_7"/>
                <include segmentGroup="comp_17"/>
                <include segmentGroup="comp_16"/>
                <include segmentGroup="comp_15"/>
                <include segmentGroup="comp_14"/>
                <include segmentGroup="comp_13"/>
                <include segmentGroup="comp_11"/>
                <include segmentGroup="comp_8"/>
                <include segmentGroup="comp_37"/>
                <include segmentGroup="comp_23"/>
                <include segmentGroup="comp_18"/>
                <include segmentGroup="comp_28"/>
                <include segmentGroup="comp_27"/>
                <include segmentGroup="comp_26"/>
                <include segmentGroup="comp_25"/>
                <include segmentGroup="comp_24"/>
                <include segmentGroup="comp_22"/>
                <include segmentGroup="comp_19"/>
                <include segmentGroup="comp_10"/>
                <include segmentGroup="comp_9"/>
                <include segmentGroup="comp_38"/>
                <include segmentGroup="comp_34"/>
                <include segmentGroup="comp_29"/>
                <include segmentGroup="comp_33"/>
                <include segmentGroup="comp_30"/>
                <include segmentGroup="comp_21"/>
                <include segmentGroup="comp_20"/>
                <include segmentGroup="comp_39"/>
                <include segmentGroup="comp_32"/>
                <include segmentGroup="comp_31"/>
                <include segmentGroup="comp_40"/>
                <include segmentGroup="comp_41"/>
                <include segmentGroup="comp_42"/>
                <include segmentGroup="comp_43"/>
                <include segmentGroup="comp_44"/>
            </segmentGroup>

            <segmentGroup id="ModelViewParmSubset_9">
                <include segmentGroup="comp_6"/>
                <include segmentGroup="comp_5"/>
                <include segmentGroup="comp_4"/>
                <include segmentGroup="comp_3"/>
                <include segmentGroup="comp_2"/>
                <include segmentGroup="comp_36"/>
                <include segmentGroup="comp_12"/>
                <include segmentGroup="comp_7"/>
                <include segmentGroup="comp_17"/>
                <include segmentGroup="comp_16"/>
                <include segmentGroup="comp_15"/>
                <include segmentGroup="comp_14"/>
                <include segmentGroup="comp_13"/>
                <include segmentGroup="comp_11"/>
                <include segmentGroup="comp_8"/>
                <include segmentGroup="comp_37"/>
                <include segmentGroup="comp_23"/>
                <include segmentGroup="comp_18"/>
                <include segmentGroup="comp_28"/>
                <include segmentGroup="comp_27"/>
                <include segmentGroup="comp_26"/>
                <include segmentGroup="comp_25"/>
                <include segmentGroup="comp_24"/>
                <include segmentGroup="comp_22"/>
                <include segmentGroup="comp_19"/>
                <include segmentGroup="comp_10"/>
                <include segmentGroup="comp_9"/>
                <include segmentGroup="comp_38"/>
                <include segmentGroup="comp_34"/>
                <include segmentGroup="comp_29"/>
                <include segmentGroup="comp_33"/>
                <include segmentGroup="comp_30"/>
                <include segmentGroup="comp_21"/>
                <include segmentGroup="comp_20"/>
                <include segmentGroup="comp_39"/>
                <include segmentGroup="comp_32"/>
                <include segmentGroup="comp_31"/>
                <include segmentGroup="comp_40"/>
                <include segmentGroup="comp_41"/>
                <include segmentGroup="comp_42"/>
                <include segmentGroup="comp_43"/>
                <include segmentGroup="comp_44"/>
            </segmentGroup>

            <segmentGroup id="ModelViewParmSubset_11">
                <include segmentGroup="comp_6"/>
                <include segmentGroup="comp_5"/>
                <include segmentGroup="comp_4"/>
                <include segmentGroup="comp_3"/>
                <include segmentGroup="comp_2"/>
                <include segmentGroup="comp_36"/>
                <include segmentGroup="comp_12"/>
                <include segmentGroup="comp_7"/>
                <include segmentGroup="comp_11"/>
                <include segmentGroup="comp_8"/>
                <include segmentGroup="comp_10"/>
                <include segmentGroup="comp_9"/>
            </segmentGroup>

            <segmentGroup id="ModelViewParmSubset_12">
                <include segmentGroup="comp_17"/>
                <include segmentGroup="comp_16"/>
                <include segmentGroup="comp_15"/>
                <include segmentGroup="comp_14"/>
                <include segmentGroup="comp_13"/>
                <include segmentGroup="comp_37"/>
                <include segmentGroup="comp_23"/>
                <include segmentGroup="comp_18"/>
                <include segmentGroup="comp_28"/>
                <include segmentGroup="comp_27"/>
                <include segmentGroup="comp_26"/>
                <include segmentGroup="comp_25"/>
                <include segmentGroup="comp_24"/>
                <include segmentGroup="comp_22"/>
                <include segmentGroup="comp_19"/>
                <include segmentGroup="comp_38"/>
                <include segmentGroup="comp_34"/>
                <include segmentGroup="comp_29"/>
                <include segmentGroup="comp_33"/>
                <include segmentGroup="comp_30"/>
                <include segmentGroup="comp_21"/>
                <include segmentGroup="comp_20"/>
                <include segmentGroup="comp_39"/>
                <include segmentGroup="comp_32"/>
                <include segmentGroup="comp_31"/>
                <include segmentGroup="comp_40"/>
                <include segmentGroup="comp_41"/>
                <include segmentGroup="comp_42"/>
                <include segmentGroup="comp_43"/>
                <include segmentGroup="comp_44"/>
            </segmentGroup>

            <segmentGroup id="LTS_dends">
                <include segmentGroup="comp_17"/>
                <include segmentGroup="comp_16"/>
                <include segmentGroup="comp_15"/>
                <include segmentGroup="comp_14"/>
                <include segmentGroup="comp_13"/>
                <include segmentGroup="comp_23"/>
                <include segmentGroup="comp_18"/>
                <include segmentGroup="comp_28"/>
                <include segmentGroup="comp_27"/>
                <include segmentGroup="comp_26"/>
                <include segmentGroup="comp_25"/>
                <include segmentGroup="comp_24"/>
                <include segmentGroup="comp_22"/>
                <include segmentGroup="comp_19"/>
                <include segmentGroup="comp_34"/>
                <include segmentGroup="comp_29"/>
                <include segmentGroup="comp_33"/>
                <include segmentGroup="comp_30"/>
                <include segmentGroup="comp_21"/>
                <include segmentGroup="comp_20"/>
                <include segmentGroup="comp_39"/>
                <include segmentGroup="comp_32"/>
                <include segmentGroup="comp_31"/>
                <include segmentGroup="comp_40"/>
                <include segmentGroup="comp_41"/>
                <include segmentGroup="comp_42"/>
                <include segmentGroup="comp_43"/>
                <include segmentGroup="comp_44"/>
            </segmentGroup>

            <segmentGroup id="L4SS_dends">
                <include segmentGroup="comp_37"/>
                <include segmentGroup="comp_38"/>
                <include segmentGroup="comp_39"/>
                <include segmentGroup="comp_40"/>
                <include segmentGroup="comp_41"/>
            </segmentGroup>

            <segmentGroup id="distal_axon">
                <include segmentGroup="comp_50"/>
                <include segmentGroup="comp_48"/>
            </segmentGroup>

            <segmentGroup id="distal_dends">
                <include segmentGroup="comp_39"/>
                <include segmentGroup="comp_40"/>
                <include segmentGroup="comp_41"/>
                <include segmentGroup="comp_42"/>
                <include segmentGroup="comp_43"/>
                <include segmentGroup="comp_44"/>
            </segmentGroup>

            <segmentGroup id="apical_dend">
                <include segmentGroup="comp_39"/>
                <include segmentGroup="comp_40"/>
                <include segmentGroup="comp_41"/>
                <include segmentGroup="comp_42"/>
                <include segmentGroup="comp_43"/>
                <include segmentGroup="comp_44"/>
            </segmentGroup>

            <segmentGroup id="ModelViewParmSubset_8">
                <include segmentGroup="comp_40"/>
                <include segmentGroup="comp_41"/>
                <include segmentGroup="comp_42"/>
                <include segmentGroup="comp_43"/>
                <include segmentGroup="comp_44"/>
            </segmentGroup>

            <segmentGroup id="TCR_dends">
                <include segmentGroup="comp_40"/>
                <include segmentGroup="comp_41"/>
                <include segmentGroup="comp_42"/>
                <include segmentGroup="comp_43"/>
                <include segmentGroup="comp_44"/>
            </segmentGroup>

        </morphology>

            <!--Adding the biophysical parameters-->

        <biophysicalProperties id="biophys">

            <membraneProperties>

                <channelDensity condDensity="0.25 mS_per_cm2" id="ar_OneSecGrp_SectionRef_1" ionChannel="ar__m00_25" segmentGroup="OneSecGrp_SectionRef_1" erev="-35.0 mV" ion="ar"/>

                <channelDensity condDensity="0.5 mS_per_cm2" id="ar_ModelViewParmSubset_6" ionChannel="ar__m00_25" segmentGroup="ModelViewParmSubset_6" erev="-35.0 mV" ion="ar"/>

                <channelDensity condDensity="0.2 mS_per_cm2" id="cal_OneSecGrp_SectionRef_1" ionChannel="cal" segmentGroup="OneSecGrp_SectionRef_1" ion="ca" erev="125.0 mV"/>

                <channelDensity condDensity="4.0 mS_per_cm2" id="cal_ModelViewParmSubset_8" ionChannel="cal" segmentGroup="ModelViewParmSubset_8" ion="ca" erev="125.0 mV"/>

                <channelDensity condDensity="0.4 mS_per_cm2" id="cal_ModelViewParmSubset_7" ionChannel="cal" segmentGroup="ModelViewParmSubset_7" ion="ca" erev="125.0 mV"/>

                <channelDensity condDensity="0.1 mS_per_cm2" id="cat_OneSecGrp_SectionRef_1" ionChannel="cat" segmentGroup="OneSecGrp_SectionRef_1" ion="cat" erev="125.0 mV"/>

                <channelDensity condDensity="0.2 mS_per_cm2" id="cat_ModelViewParmSubset_6" ionChannel="cat" segmentGroup="ModelViewParmSubset_6" ion="cat" erev="125.0 mV"/>

                <channelDensity condDensity="0.1 mS_per_cm2" id="k2_ModelViewParmSubset_5" ionChannel="k2" segmentGroup="ModelViewParmSubset_5" ion="k" erev="-95.0 mV"/>

                <channelDensity condDensity="0.2 mS_per_cm2" id="k2_ModelViewParmSubset_6" ionChannel="k2" segmentGroup="ModelViewParmSubset_6" ion="k" erev="-95.0 mV"/>

                <channelDensity condDensity="119.0 mS_per_cm2" id="ka_OneSecGrp_SectionRef_1" ionChannel="ka" segmentGroup="OneSecGrp_SectionRef_1" ion="k" erev="-95.0 mV"/>

                <channelDensity condDensity="238.0 mS_per_cm2" id="ka_OneSecGrp_SectionRef_3" ionChannel="ka" segmentGroup="OneSecGrp_SectionRef_3" ion="k" erev="-95.0 mV"/>

                <channelDensity condDensity="27.2 mS_per_cm2" id="ka_ModelViewParmSubset_9" ionChannel="ka" segmentGroup="ModelViewParmSubset_9" ion="k" erev="-95.0 mV"/>

                <channelDensity condDensity="4.0 mS_per_cm2" id="ka_axon_group" ionChannel="ka" segmentGroup="axon_group" ion="k" erev="-95.0 mV"/>

                <channelDensity condDensity="0.2 mS_per_cm2" id="kahp_deeppyr_OneSecGrp_SectionRef_1" ionChannel="kahp_deeppyr" segmentGroup="OneSecGrp_SectionRef_1" ion="k" erev="-95.0 mV"/>

                <channelDensity condDensity="0.4 mS_per_cm2" id="kahp_deeppyr_ModelViewParmSubset_6" ionChannel="kahp_deeppyr" segmentGroup="ModelViewParmSubset_6" ion="k" erev="-95.0 mV"/>

                <channelDensity condDensity="15.0 mS_per_cm2" id="kc_OneSecGrp_SectionRef_1" ionChannel="kc" segmentGroup="OneSecGrp_SectionRef_1" ion="k" erev="-95.0 mV"/>

                <channelDensity condDensity="30.0 mS_per_cm2" id="kc_ModelViewParmSubset_10" ionChannel="kc" segmentGroup="ModelViewParmSubset_10" ion="k" erev="-95.0 mV"/>

                <channelDensity condDensity="150.0 mS_per_cm2" id="kdr_ModelViewParmSubset_11" ionChannel="kdr" segmentGroup="ModelViewParmSubset_11" ion="k" erev="-95.0 mV"/>

                <channelDensity condDensity="170.0 mS_per_cm2" id="kdr_OneSecGrp_SectionRef_1" ionChannel="kdr" segmentGroup="OneSecGrp_SectionRef_1" ion="k" erev="-95.0 mV"/>

                <channelDensity condDensity="240.0 mS_per_cm2" id="kdr_OneSecGrp_SectionRef_3" ionChannel="kdr" segmentGroup="OneSecGrp_SectionRef_3" ion="k" erev="-95.0 mV"/>

                <channelDensity condDensity="450.0 mS_per_cm2" id="kdr_axon_group" ionChannel="kdr" segmentGroup="axon_group" ion="k" erev="-95.0 mV"/>

                <channelDensity condDensity="4.2 mS_per_cm2" id="km_OneSecGrp_SectionRef_1" ionChannel="km" segmentGroup="OneSecGrp_SectionRef_1" ion="k" erev="-95.0 mV"/>

                <channelDensity condDensity="8.4 mS_per_cm2" id="km_ModelViewParmSubset_6" ionChannel="km" segmentGroup="ModelViewParmSubset_6" ion="k" erev="-95.0 mV"/>

                <channelDensity condDensity="10.0 mS_per_cm2" id="naf_ModelViewParmSubset_12" ionChannel="naf__a0__b0__c0__d0__fastNa_shiftmin3_5" segmentGroup="ModelViewParmSubset_12" ion="na" erev="50.0 mV"/>

                <channelDensity condDensity="150.0 mS_per_cm2" id="naf_ModelViewParmSubset_11" ionChannel="naf__a0__b0__c0__d0__fastNa_shiftmin3_5" segmentGroup="ModelViewParmSubset_11" ion="na" erev="50.0 mV"/>

                <channelDensity condDensity="200.0 mS_per_cm2" id="naf_OneSecGrp_SectionRef_1" ionChannel="naf__a0__b0__c0__d0__fastNa_shiftmin3_5" segmentGroup="OneSecGrp_SectionRef_1" ion="na" erev="50.0 mV"/>

                <channelDensity condDensity="300.0 mS_per_cm2" id="naf_OneSecGrp_SectionRef_3" ionChannel="naf__a0__b0__c0__d0__fastNa_shiftmin3_5" segmentGroup="OneSecGrp_SectionRef_3" ion="na" erev="50.0 mV"/>

                <channelDensity condDensity="450.0 mS_per_cm2" id="naf_axon_group" ionChannel="naf__a0__b0__c0__d0__fastNa_shiftmin3_5" segmentGroup="axon_group" ion="na" erev="50.0 mV"/>

                <channelDensity condDensity="0.12 mS_per_cm2" id="nap_OneSecGrp_SectionRef_3" ionChannel="nap" segmentGroup="OneSecGrp_SectionRef_3" ion="na" erev="50.0 mV"/>

                <channelDensity condDensity="0.004 mS_per_cm2" id="nap_ModelViewParmSubset_12" ionChannel="nap" segmentGroup="ModelViewParmSubset_12" ion="na" erev="50.0 mV"/>

                <channelDensity condDensity="0.06 mS_per_cm2" id="nap_ModelViewParmSubset_11" ionChannel="nap" segmentGroup="ModelViewParmSubset_11" ion="na" erev="50.0 mV"/>

                <channelDensity condDensity="0.08 mS_per_cm2" id="nap_OneSecGrp_SectionRef_1" ionChannel="nap" segmentGroup="OneSecGrp_SectionRef_1" ion="na" erev="50.0 mV"/>

                <channelDensity condDensity="1.0 mS_per_cm2" id="pas_axon_group" ionChannel="pas" segmentGroup="axon_group" erev="-70.0 mV" ion="non_specific"/>

                <channelDensity condDensity="0.02 mS_per_cm2" id="pas_OneSecGrp_SectionRef_1" ionChannel="pas" segmentGroup="OneSecGrp_SectionRef_1" erev="-70.0 mV" ion="non_specific"/>

                <channelDensity condDensity="0.04 mS_per_cm2" id="pas_ModelViewParmSubset_6" ionChannel="pas" segmentGroup="ModelViewParmSubset_6" erev="-70.0 mV" ion="non_specific"/>

                <spikeThresh value="0.0 mV"/>

                <specificCapacitance segmentGroup="ModelViewParmSubset_6" value="1.8 uF_per_cm2"/>

                <specificCapacitance segmentGroup="ModelViewParmSubset_5" value="0.9 uF_per_cm2"/>

                <initMembPotential value="-70.0 mV"/>

            </membraneProperties>

            <intracellularProperties>

                <species segmentGroup="ModelViewParmSubset_6" id="ca" ion="ca" concentrationModel="cad__beta0_05__phi65000" initialConcentration="1.0E-8 mol_per_cm3" initialExtConcentration="2.0E-6 mol_per_cm3"/>

                <species segmentGroup="OneSecGrp_SectionRef_1" id="ca" ion="ca" concentrationModel="cad__beta0_01__phi13000" initialConcentration="1.0E-8 mol_per_cm3" initialExtConcentration="2.0E-6 mol_per_cm3"/>

                <resistivity segmentGroup="axon_group" value="0.1 kohm_cm"/>

                <resistivity segmentGroup="ModelViewParmSubset_1" value="0.25 kohm_cm"/>

            </intracellularProperties>

        </biophysicalProperties>

    </cell>

</neuroml>
