<?xml version="1.0" encoding="UTF-8"?>
<neuroml xmlns="http://www.neuroml.org/schema/neuroml2" xmlns:xsi="http://www.w3.org/2001/XMLSchema-instance" xsi:schemaLocation="http://www.neuroml.org/schema/neuroml2  https://raw.githubusercontent.com/NeuroML/NeuroML2/development/Schemas/NeuroML2/NeuroML_v2beta5.xsd" id="TCR">

    <include href="../channels/ar__m00_25.channel.nml"/>

    <include href="../channels/cad__beta0_02__phi52000.nml"/>

    <include href="../channels/cad__beta0_05__phi104000.nml"/>

    <include href="../channels/cal.channel.nml"/>

    <include href="../channels/cat.channel.nml"/>

    <include href="../channels/k2.channel.nml"/>

    <include href="../channels/ka.channel.nml"/>

    <include href="../channels/kahp_slower.channel.nml"/>

    <include href="../channels/kc.channel.nml"/>

    <include href="../channels/kdr.channel.nml"/>

    <include href="../channels/km.channel.nml"/>

    <include href="../channels/naf_tcr__sh_hmin7__sh_m_imin3__sh_m_rmin2_5.channel.nml"/>

    <include href="../channels/napf_tcr__a0__b0__c0__d0__fastNa_shift7.channel.nml"/>

    <include href="../channels/pas.channel.nml"/>

    <cell id="TCR">

        <notes>Cell: TCR_0 exported from NEURON ModelView. Note parameters were renamed from shift_mnaf_init etc. to sh_m_i etc. as these long names
resulted in a very long file/mechanism name in NML2, causing trouble for NEURON</notes>

        <morphology id="morphology_TCR">

            <segment id="0" name="Seg0_comp_1">
                <proximal x="0.0" y="0.0" z="0.0" diameter="20.0"/>
                <distal x="0.0" y="21.0" z="0.0" diameter="20.0"/>
            </segment>

            <segment id="1" name="Seg1_comp_1">
                <parent segment="0"/>
                <distal x="-9.179392E-7" y="42.0" z="0.0" diameter="20.0"/>
            </segment>

            <segment id="262" name="Seg0_comp_132">
                <parent segment="0" fractionAlong="0.0"/>
                <proximal x="9.179392E-7" y="0.0" z="0.0" diameter="1.6"/>
                <distal x="-1.7484616E-7" y="-25.0" z="0.0" diameter="1.6"/>
            </segment>

            <segment id="263" name="Seg1_comp_132">
                <parent segment="262"/>
                <distal x="-1.2676315E-6" y="-50.0" z="0.0" diameter="1.6"/>
            </segment>

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
            <segmentGroup id="comp_1" neuroLexId="sao864921383">    <!--
                This group contains an unbranched set of segments, and all of the segmentGroups marked with
                neuroLexId = sao864921383 form a non-overlapping set of all of the segments.
                These segmentGroups correspond to the 'cables' of NeuroML v1.8.1. -->

                <!--This 'Section' has number of internal divisions (nseg) = 2-->

                <property tag="numberInternalDivisions" value="2"/>

                <member segment="0"/>

                <member segment="1"/>
            </segmentGroup>

            <segmentGroup id="comp_132" neuroLexId="sao864921383">    <!--
                This group contains an unbranched set of segments, and all of the segmentGroups marked with
                neuroLexId = sao864921383 form a non-overlapping set of all of the segments.
                These segmentGroups correspond to the 'cables' of NeuroML v1.8.1. -->

                <!--This 'Section' has number of internal divisions (nseg) = 25-->

                <property tag="numberInternalDivisions" value="25"/>

                <member segment="262"/>

                <member segment="263"/>
            </segmentGroup>

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
            <segmentGroup id="ModelViewParmSubset_1">
                <include segmentGroup="comp_1"/>
                <include segmentGroup="comp_119"/>
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            </segmentGroup>

            <segmentGroup id="ModelViewParmSubset_2">
                <include segmentGroup="comp_1"/>
                <include segmentGroup="comp_132"/>
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            </segmentGroup>

            <segmentGroup id="OneSecGrp_SectionRef_1">
                <include segmentGroup="comp_1"/>
            </segmentGroup>

            <segmentGroup id="soma_group" neuroLexId="GO:0043025">    <!--Soma group-->

                <include segmentGroup="comp_1"/>
            </segmentGroup>

            <segmentGroup id="ModelViewParmSubset_8">
                <include segmentGroup="comp_1"/>
                <include segmentGroup="comp_131"/>
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            </segmentGroup>

            <segmentGroup id="soma_prox_dends">
                <include segmentGroup="comp_1"/>
                <include segmentGroup="comp_119"/>
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            </segmentGroup>

            <segmentGroup id="ModelViewParmSubset_3">
                <include segmentGroup="comp_132"/>
                <include segmentGroup="comp_133"/>
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            </segmentGroup>

            <segmentGroup id="ModelViewParmSubset_10">
                <include segmentGroup="comp_132"/>
                <include segmentGroup="comp_133"/>
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            </segmentGroup>

            <segmentGroup id="axon_group" neuroLexId="GO:0030424">    <!--Axon group-->

                <include segmentGroup="comp_132"/>
                <include segmentGroup="comp_133"/>
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            </segmentGroup>

            <segmentGroup id="dendrite_group" neuroLexId="GO:0030425">    <!--Dendrite group-->

                <include segmentGroup="comp_119"/>
                <include segmentGroup="comp_106"/>
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            </segmentGroup>

            <segmentGroup id="ModelViewParmSubset_6">
                <include segmentGroup="comp_119"/>
                <include segmentGroup="comp_106"/>
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            </segmentGroup>

            <segmentGroup id="prox_dends">
                <include segmentGroup="comp_119"/>
                <include segmentGroup="comp_106"/>
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            </segmentGroup>

            <segmentGroup id="ModelViewParmSubset_4">
                <include segmentGroup="comp_122"/>
                <include segmentGroup="comp_121"/>
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            </segmentGroup>

            <segmentGroup id="ModelViewParmSubset_9">
                <include segmentGroup="comp_122"/>
                <include segmentGroup="comp_121"/>
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            </segmentGroup>

            <segmentGroup id="distal_dends">
                <include segmentGroup="comp_131"/>
                <include segmentGroup="comp_130"/>
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            </segmentGroup>

            <segmentGroup id="distal_axon">
                <include segmentGroup="comp_137"/>
                <include segmentGroup="comp_135"/>
            </segmentGroup>

        </morphology>

            <!--Adding the biophysical parameters-->

        <biophysicalProperties id="biophys">

            <membraneProperties>

                <channelDensity condDensity="0.25 mS_per_cm2" id="ar_OneSecGrp_SectionRef_1" ionChannel="ar__m00_25" segmentGroup="OneSecGrp_SectionRef_1" erev="-35.0 mV" ion="ar"/>

                <channelDensity condDensity="0.3 mS_per_cm2" id="ar_ModelViewParmSubset_4" ionChannel="ar__m00_25" segmentGroup="ModelViewParmSubset_4" erev="-35.0 mV" ion="ar"/>

                <channelDensity condDensity="0.5 mS_per_cm2" id="ar_prox_dends" ionChannel="ar__m00_25" segmentGroup="prox_dends" erev="-35.0 mV" ion="ar"/>

                <channelDensity condDensity="0.25 mS_per_cm2" id="cal_ModelViewParmSubset_4" ionChannel="cal" segmentGroup="ModelViewParmSubset_4" ion="ca" erev="125.0 mV"/>

                <channelDensity condDensity="0.5 mS_per_cm2" id="cal_soma_prox_dends" ionChannel="cal" segmentGroup="soma_prox_dends" ion="ca" erev="125.0 mV"/>

                <channelDensity condDensity="3.0 mS_per_cm2" id="cat_ModelViewParmSubset_9" ionChannel="cat" segmentGroup="ModelViewParmSubset_9" ion="cat" erev="125.0 mV"/>

                <channelDensity condDensity="0.5 mS_per_cm2" id="cat_ModelViewParmSubset_8" ionChannel="cat" segmentGroup="ModelViewParmSubset_8" ion="cat" erev="125.0 mV"/>

                <channelDensity condDensity="2.0 mS_per_cm2" id="k2_ModelViewParmSubset_1" ionChannel="k2" segmentGroup="ModelViewParmSubset_1" ion="k" erev="-95.0 mV"/>

                <channelDensity condDensity="0.5 mS_per_cm2" id="k2_ModelViewParmSubset_3" ionChannel="k2" segmentGroup="ModelViewParmSubset_3" ion="k" erev="-95.0 mV"/>

                <channelDensity condDensity="0.2 mS_per_cm2" id="ka_ModelViewParmSubset_10" ionChannel="ka" segmentGroup="ModelViewParmSubset_10" ion="k" erev="-95.0 mV"/>

                <channelDensity condDensity="6.0 mS_per_cm2" id="ka_soma_prox_dends" ionChannel="ka" segmentGroup="soma_prox_dends" ion="k" erev="-95.0 mV"/>

                <channelDensity condDensity="0.05 mS_per_cm2" id="kahp_slower_ModelViewParmSubset_1" ionChannel="kahp_slower" segmentGroup="ModelViewParmSubset_1" ion="k" erev="-95.0 mV"/>

                <channelDensity condDensity="12.0 mS_per_cm2" id="kc_soma_prox_dends" ionChannel="kc" segmentGroup="soma_prox_dends" ion="k" erev="-95.0 mV"/>

                <channelDensity condDensity="20.0 mS_per_cm2" id="kc_ModelViewParmSubset_4" ionChannel="kc" segmentGroup="ModelViewParmSubset_4" ion="k" erev="-95.0 mV"/>

                <channelDensity condDensity="180.0 mS_per_cm2" id="kdr_ModelViewParmSubset_3" ionChannel="kdr" segmentGroup="ModelViewParmSubset_3" ion="k" erev="-95.0 mV"/>

                <channelDensity condDensity="22.5 mS_per_cm2" id="kdr_prox_dends" ionChannel="kdr" segmentGroup="prox_dends" ion="k" erev="-95.0 mV"/>

                <channelDensity condDensity="33.75 mS_per_cm2" id="kdr_OneSecGrp_SectionRef_1" ionChannel="kdr" segmentGroup="OneSecGrp_SectionRef_1" ion="k" erev="-95.0 mV"/>

                <channelDensity condDensity="0.5 mS_per_cm2" id="km_ModelViewParmSubset_1" ionChannel="km" segmentGroup="ModelViewParmSubset_1" ion="k" erev="-95.0 mV"/>

                <channelDensity condDensity="100.0 mS_per_cm2" id="naf_tcr_soma_prox_dends" ionChannel="naf_tcr__sh_hmin7__sh_m_imin3__sh_m_rmin2_5" segmentGroup="soma_prox_dends" ion="na" erev="50.0 mV"/>

                <channelDensity condDensity="400.0 mS_per_cm2" id="naf_tcr_ModelViewParmSubset_3" ionChannel="naf_tcr__sh_hmin7__sh_m_imin3__sh_m_rmin2_5" segmentGroup="ModelViewParmSubset_3" ion="na" erev="50.0 mV"/>

                <channelDensity condDensity="5.0 mS_per_cm2" id="naf_tcr_ModelViewParmSubset_4" ionChannel="naf_tcr__sh_hmin7__sh_m_imin3__sh_m_rmin2_5" segmentGroup="ModelViewParmSubset_4" ion="na" erev="50.0 mV"/>

                <channelDensity condDensity="0.01 mS_per_cm2" id="napf_tcr_ModelViewParmSubset_4" ionChannel="napf_tcr__a0__b0__c0__d0__fastNa_shift7" segmentGroup="ModelViewParmSubset_4" ion="na" erev="50.0 mV"/>

                <channelDensity condDensity="0.2 mS_per_cm2" id="napf_tcr_soma_prox_dends" ionChannel="napf_tcr__a0__b0__c0__d0__fastNa_shift7" segmentGroup="soma_prox_dends" ion="na" erev="50.0 mV"/>

                <channelDensity condDensity="1.0 mS_per_cm2" id="pas_ModelViewParmSubset_3" ionChannel="pas" segmentGroup="ModelViewParmSubset_3" erev="-70.0 mV" ion="non_specific"/>

                <channelDensity condDensity="0.0378788 mS_per_cm2" id="pas_ModelViewParmSubset_1" ionChannel="pas" segmentGroup="ModelViewParmSubset_1" erev="-70.0 mV" ion="non_specific"/>

                <spikeThresh value="0.0 mV"/>

                <specificCapacitance value="0.9 uF_per_cm2"/>

                <initMembPotential value="-70.0 mV"/>

            </membraneProperties>

            <intracellularProperties>

                <species segmentGroup="ModelViewParmSubset_6" id="ca" ion="ca" concentrationModel="cad__beta0_05__phi104000" initialConcentration="1.0E-8 mol_per_cm3" initialExtConcentration="2.0E-6 mol_per_cm3"/>

                <species segmentGroup="OneSecGrp_SectionRef_1" id="ca" ion="ca" concentrationModel="cad__beta0_02__phi52000" initialConcentration="1.0E-8 mol_per_cm3" initialExtConcentration="2.0E-6 mol_per_cm3"/>

                <resistivity segmentGroup="ModelViewParmSubset_3" value="0.1 kohm_cm"/>

                <resistivity segmentGroup="ModelViewParmSubset_1" value="0.175 kohm_cm"/>

            </intracellularProperties>

        </biophysicalProperties>

    </cell>

</neuroml>
