<?xml version="1.0" encoding="UTF-8"?>
<neuroml xmlns="http://www.neuroml.org/schema/neuroml2" xmlns:xsi="http://www.w3.org/2001/XMLSchema-instance" xsi:schemaLocation="http://www.neuroml.org/schema/neuroml2  https://raw.githubusercontent.com/NeuroML/NeuroML2/development/Schemas/NeuroML2/NeuroML_v2beta5.xsd" id="nRT">

    <include href="../channels/ar__m00.channel.nml"/>

    <include href="../channels/cad__beta0_02__phi10400.nml"/>

    <include href="../channels/cad__beta0_05__phi260000.nml"/>

    <include href="../channels/cal.channel.nml"/>

    <include href="../channels/cat_a.channel.nml"/>

    <include href="../channels/k2.channel.nml"/>

    <include href="../channels/ka.channel.nml"/>

    <include href="../channels/kahp_slower.channel.nml"/>

    <include href="../channels/kc.channel.nml"/>

    <include href="../channels/kdr_fs.channel.nml"/>

    <include href="../channels/km.channel.nml"/>

    <include href="../channels/naf2__a0__b0__c0__d0__fastNa_shift0.channel.nml"/>

    <include href="../channels/napf__a0__b0__c0__d0__fastNa_shift0.channel.nml"/>

    <include href="../channels/pas.channel.nml"/>

    <cell id="nRT">

        <notes>Cell: nRT_0 exported from NEURON ModelView</notes>

        <morphology id="morphology_nRT">

            <segment id="0" name="Seg0_comp_1">
                <proximal x="0.0" y="0.0" z="0.0" diameter="18.68"/>
                <distal x="0.0" y="15.0" z="0.0" diameter="18.68"/>
            </segment>

            <segment id="1" name="Seg1_comp_1">
                <parent segment="0"/>
                <distal x="-0.0" y="30.0" z="0.0" diameter="18.68"/>
            </segment>

            <segment id="106" name="Seg0_comp_54">
                <parent segment="0" fractionAlong="0.0"/>
                <proximal x="0.0" y="0.0" z="0.0" diameter="1.6"/>
                <distal x="-0.0" y="-25.0" z="0.0" diameter="1.6"/>
            </segment>

            <segment id="107" name="Seg1_comp_54">
                <parent segment="106"/>
                <distal x="-0.0" y="-50.0" z="0.0" diameter="1.6"/>
            </segment>

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
            <segmentGroup id="comp_1" neuroLexId="sao864921383">    <!--
                This group contains an unbranched set of segments, and all of the segmentGroups marked with
                neuroLexId = sao864921383 form a non-overlapping set of all of the segments.
                These segmentGroups correspond to the 'cables' of NeuroML v1.8.1. -->

                <!--This 'Section' has number of internal divisions (nseg) = 2-->

                <property tag="numberInternalDivisions" value="2"/>

                <member segment="0"/>

                <member segment="1"/>
            </segmentGroup>

            <segmentGroup id="comp_54" neuroLexId="sao864921383">    <!--
                This group contains an unbranched set of segments, and all of the segmentGroups marked with
                neuroLexId = sao864921383 form a non-overlapping set of all of the segments.
                These segmentGroups correspond to the 'cables' of NeuroML v1.8.1. -->

                <!--This 'Section' has number of internal divisions (nseg) = 25-->

                <property tag="numberInternalDivisions" value="25"/>

                <member segment="106"/>

                <member segment="107"/>
            </segmentGroup>

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
            <segmentGroup id="ModelViewParmSubset_4">
                <include segmentGroup="comp_1"/>
                <include segmentGroup="comp_41"/>
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            </segmentGroup>

            <segmentGroup id="OneSecGrp_SectionRef_1">
                <include segmentGroup="comp_1"/>
            </segmentGroup>

            <segmentGroup id="soma_group" neuroLexId="GO:0043025">    <!--Soma group-->

                <include segmentGroup="comp_1"/>
            </segmentGroup>

            <segmentGroup id="soma_dends">
                <include segmentGroup="comp_1"/>
                <include segmentGroup="comp_41"/>
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            </segmentGroup>

            <segmentGroup id="ModelViewParmSubset_6">
                <include segmentGroup="comp_54"/>
                <include segmentGroup="comp_55"/>
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            </segmentGroup>

            <segmentGroup id="axon_group" neuroLexId="GO:0030424">    <!--Axon group-->

                <include segmentGroup="comp_54"/>
                <include segmentGroup="comp_55"/>
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            </segmentGroup>

            <segmentGroup id="dendrite_group" neuroLexId="GO:0030425">    <!--Dendrite group-->

                <include segmentGroup="comp_41"/>
                <include segmentGroup="comp_28"/>
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            </segmentGroup>

            <segmentGroup id="ModelViewParmSubset_3">
                <include segmentGroup="comp_41"/>
                <include segmentGroup="comp_28"/>
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            </segmentGroup>

            <segmentGroup id="proximal_dends">
                <include segmentGroup="comp_41"/>
                <include segmentGroup="comp_28"/>
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            </segmentGroup>

            <segmentGroup id="ModelViewParmSubset_5">
                <include segmentGroup="comp_46"/>
                <include segmentGroup="comp_45"/>
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            </segmentGroup>

            <segmentGroup id="distal_axon">
                <include segmentGroup="comp_59"/>
                <include segmentGroup="comp_57"/>
            </segmentGroup>

        </morphology>

            <!--Adding the biophysical parameters-->

        <biophysicalProperties id="biophys">

            <membraneProperties>

                <channelDensity condDensity="0.025 mS_per_cm2" id="ar_soma_dends" ionChannel="ar__m00" segmentGroup="soma_dends" erev="-40.0 mV" ion="ar"/>

                <channelDensity condDensity="0.5 mS_per_cm2" id="cal_soma_dends" ionChannel="cal" segmentGroup="soma_dends" ion="ca" erev="125.0 mV"/>

                <channelDensity condDensity="2.0 mS_per_cm2" id="cat_a_ModelViewParmSubset_5" ionChannel="cat_a" segmentGroup="ModelViewParmSubset_5" ion="cat_a" erev="125.0 mV"/>

                <channelDensity condDensity="0.05 mS_per_cm2" id="cat_a_ModelViewParmSubset_4" ionChannel="cat_a" segmentGroup="ModelViewParmSubset_4" ion="cat_a" erev="125.0 mV"/>

                <channelDensity condDensity="0.5 mS_per_cm2" id="k2_all" ionChannel="k2" ion="k" erev="-100.0 mV"/>

                <channelDensity condDensity="1.0 mS_per_cm2" id="ka_ModelViewParmSubset_6" ionChannel="ka" segmentGroup="ModelViewParmSubset_6" ion="k" erev="-100.0 mV"/>

                <channelDensity condDensity="5.0 mS_per_cm2" id="ka_ModelViewParmSubset_4" ionChannel="ka" segmentGroup="ModelViewParmSubset_4" ion="k" erev="-100.0 mV"/>

                <channelDensity condDensity="0.1 mS_per_cm2" id="kahp_slower_soma_dends" ionChannel="kahp_slower" segmentGroup="soma_dends" ion="k" erev="-100.0 mV"/>

                <channelDensity condDensity="10.0 mS_per_cm2" id="kc_soma_dends" ionChannel="kc" segmentGroup="soma_dends" ion="k" erev="-100.0 mV"/>

                <channelDensity condDensity="10.0 mS_per_cm2" id="kdr_fs_ModelViewParmSubset_5" ionChannel="kdr_fs" segmentGroup="ModelViewParmSubset_5" ion="k" erev="-100.0 mV"/>

                <channelDensity condDensity="400.0 mS_per_cm2" id="kdr_fs_axon_group" ionChannel="kdr_fs" segmentGroup="axon_group" ion="k" erev="-100.0 mV"/>

                <channelDensity condDensity="60.0 mS_per_cm2" id="kdr_fs_ModelViewParmSubset_4" ionChannel="kdr_fs" segmentGroup="ModelViewParmSubset_4" ion="k" erev="-100.0 mV"/>

                <channelDensity condDensity="0.5 mS_per_cm2" id="km_soma_dends" ionChannel="km" segmentGroup="soma_dends" ion="k" erev="-100.0 mV"/>

                <channelDensity condDensity="10.0 mS_per_cm2" id="naf2_ModelViewParmSubset_5" ionChannel="naf2__a0__b0__c0__d0__fastNa_shift0" segmentGroup="ModelViewParmSubset_5" ion="na" erev="50.0 mV"/>

                <channelDensity condDensity="400.0 mS_per_cm2" id="naf2_axon_group" ionChannel="naf2__a0__b0__c0__d0__fastNa_shift0" segmentGroup="axon_group" ion="na" erev="50.0 mV"/>

                <channelDensity condDensity="60.0 mS_per_cm2" id="naf2_ModelViewParmSubset_4" ionChannel="naf2__a0__b0__c0__d0__fastNa_shift0" segmentGroup="ModelViewParmSubset_4" ion="na" erev="50.0 mV"/>

                <channelDensity condDensity="0.1 mS_per_cm2" id="napf_ModelViewParmSubset_5" ionChannel="napf__a0__b0__c0__d0__fastNa_shift0" segmentGroup="ModelViewParmSubset_5" ion="na" erev="50.0 mV"/>

                <channelDensity condDensity="0.6 mS_per_cm2" id="napf_ModelViewParmSubset_4" ionChannel="napf__a0__b0__c0__d0__fastNa_shift0" segmentGroup="ModelViewParmSubset_4" ion="na" erev="50.0 mV"/>

                <channelDensity condDensity="1.0 mS_per_cm2" id="pas_axon_group" ionChannel="pas" segmentGroup="axon_group" erev="-75.0 mV" ion="non_specific"/>

                <channelDensity condDensity="0.05 mS_per_cm2" id="pas_soma_dends" ionChannel="pas" segmentGroup="soma_dends" erev="-75.0 mV" ion="non_specific"/>

                <spikeThresh value="0.0 mV"/>

                <specificCapacitance value="1.0 uF_per_cm2"/>

                <initMembPotential value="-88.0 mV"/>

            </membraneProperties>

            <intracellularProperties>

                <species segmentGroup="ModelViewParmSubset_3" id="ca" ion="ca" concentrationModel="cad__beta0_05__phi260000" initialConcentration="1.0E-8 mol_per_cm3" initialExtConcentration="2.0E-6 mol_per_cm3"/>

                <species segmentGroup="OneSecGrp_SectionRef_1" id="ca" ion="ca" concentrationModel="cad__beta0_02__phi10400" initialConcentration="1.0E-8 mol_per_cm3" initialExtConcentration="2.0E-6 mol_per_cm3"/>

                <resistivity segmentGroup="axon_group" value="0.1 kohm_cm"/>

                <resistivity segmentGroup="soma_dends" value="0.25 kohm_cm"/>

            </intracellularProperties>

        </biophysicalProperties>

    </cell>

</neuroml>
