<Lems>

    <!--

        This LEMS file has been automatically generated using PyNeuroML v0.1.13 (libNeuroML v0.2.17)

     -->

    <!-- Specify which component to run -->
    <Target component="Sim_TestRunColumn"/>

    <!-- Include core NeuroML2 ComponentType definitions -->
    <Include file="Cells.xml"/>
    <Include file="Networks.xml"/>
    <Include file="Simulation.xml"/>

    <Include file="TestRunColumn/Syn_AMPA_SupPyr_SupFS.synapse.nml"/>
    <Include file="TestRunColumn/Syn_AMPA_SupPyr_SupPyr.synapse.nml"/>
    <Include file="TestRunColumn/Syn_Elect_CortIN_CortIN.synapse.nml"/>
    <Include file="TestRunColumn/Syn_Elect_SupPyr_SupPyr.synapse.nml"/>
    <Include file="TestRunColumn/Syn_GABAA_SupBask_SupBask.synapse.nml"/>
    <Include file="TestRunColumn/Syn_GABAA_SupBask_SupPyr.synapse.nml"/>
    <Include file="TestRunColumn/Syn_NMDA_RSPyr_SupFS.synapse.nml"/>
    <Include file="TestRunColumn/Syn_NMDA_SupPyr_SupPyr.synapse.nml"/>
    <Include file="TestRunColumn/L23PyrRS.cell.nml"/>
    <Include file="TestRunColumn/ar__m00_25.channel.nml"/>
    <Include file="TestRunColumn/cad__beta0_01__phi26000.nml"/>
    <Include file="TestRunColumn/cad__beta0_05__phi52000.nml"/>
    <Include file="TestRunColumn/cal.channel.nml"/>
    <Include file="TestRunColumn/cat.channel.nml"/>
    <Include file="TestRunColumn/k2.channel.nml"/>
    <Include file="TestRunColumn/ka.channel.nml"/>
    <Include file="TestRunColumn/kahp.channel.nml"/>
    <Include file="TestRunColumn/kc.channel.nml"/>
    <Include file="TestRunColumn/kdr.channel.nml"/>
    <Include file="TestRunColumn/km.channel.nml"/>
    <Include file="TestRunColumn/naf__a0__b0__c0__d0__fastNa_shiftmin3_5.channel.nml"/>
    <Include file="TestRunColumn/nap.channel.nml"/>
    <Include file="TestRunColumn/pas.channel.nml"/>
    <Include file="TestRunColumn/SupBasket.cell.nml"/>
    <Include file="TestRunColumn/cad__beta0_02__phi260000.nml"/>
    <Include file="TestRunColumn/cad__beta0_05__phi520000.nml"/>
    <Include file="TestRunColumn/kahp_slower.channel.nml"/>
    <Include file="TestRunColumn/kc_fast.channel.nml"/>
    <Include file="TestRunColumn/kdr_fs.channel.nml"/>
    <Include file="TestRunColumn/naf2__a0__b0__c0__d0__fastNa_shiftmin2_5.channel.nml"/>
    <Include file="TestRunColumn.net.nml"/>

    <Simulation id="Sim_TestRunColumn" length="300ms" step="0.025ms" target="TestRunColumn" seed="12345">  <!-- Note seed: ensures same random numbers used every run -->

        <Display id="DispPop__SupBasket_L23" title="Membrane potentials of cells in SupBasket_L23" timeScale="1ms" xmin="-30.0" xmax="330.0" ymin="-90" ymax="50">
            <Line id="SupBasket_L23[0]: v" quantity="SupBasket_L23/0/SupBasket/v" scale="1mV" color="#6aa799" timeScale="1ms"/>
            <Line id="SupBasket_L23[1]: v" quantity="SupBasket_L23/1/SupBasket/v" scale="1mV" color="#029a72" timeScale="1ms"/>
            <Line id="SupBasket_L23[2]: v" quantity="SupBasket_L23/2/SupBasket/v" scale="1mV" color="#d340bb" timeScale="1ms"/>
            <Line id="SupBasket_L23[3]: v" quantity="SupBasket_L23/3/SupBasket/v" scale="1mV" color="#4c73a9" timeScale="1ms"/>
            <Line id="SupBasket_L23[4]: v" quantity="SupBasket_L23/4/SupBasket/v" scale="1mV" color="#5e503a" timeScale="1ms"/>
            <Line id="SupBasket_L23[5]: v" quantity="SupBasket_L23/5/SupBasket/v" scale="1mV" color="#3193ca" timeScale="1ms"/>
            <Line id="SupBasket_L23[6]: v" quantity="SupBasket_L23/6/SupBasket/v" scale="1mV" color="#90e5e9" timeScale="1ms"/>
            <Line id="SupBasket_L23[7]: v" quantity="SupBasket_L23/7/SupBasket/v" scale="1mV" color="#29645f" timeScale="1ms"/>
            <Line id="SupBasket_L23[8]: v" quantity="SupBasket_L23/8/SupBasket/v" scale="1mV" color="#1fcff4" timeScale="1ms"/>
        </Display>

        <Display id="DispPop__L23PyrRS_L23" title="Membrane potentials of cells in L23PyrRS_L23" timeScale="1ms" xmin="-30.0" xmax="330.0" ymin="-90" ymax="50">
            <Line id="L23PyrRS_L23[0]: v" quantity="L23PyrRS_L23/0/L23PyrRS/v" scale="1mV" color="#6ed4e9" timeScale="1ms"/>
            <Line id="L23PyrRS_L23[1]: v" quantity="L23PyrRS_L23/1/L23PyrRS/v" scale="1mV" color="#8fe460" timeScale="1ms"/>
            <Line id="L23PyrRS_L23[2]: v" quantity="L23PyrRS_L23/2/L23PyrRS/v" scale="1mV" color="#2ca1c7" timeScale="1ms"/>
            <Line id="L23PyrRS_L23[3]: v" quantity="L23PyrRS_L23/3/L23PyrRS/v" scale="1mV" color="#8d9fe5" timeScale="1ms"/>
            <Line id="L23PyrRS_L23[4]: v" quantity="L23PyrRS_L23/4/L23PyrRS/v" scale="1mV" color="#5adad1" timeScale="1ms"/>
            <Line id="L23PyrRS_L23[5]: v" quantity="L23PyrRS_L23/5/L23PyrRS/v" scale="1mV" color="#f543bb" timeScale="1ms"/>
            <Line id="L23PyrRS_L23[6]: v" quantity="L23PyrRS_L23/6/L23PyrRS/v" scale="1mV" color="#175f0c" timeScale="1ms"/>
            <Line id="L23PyrRS_L23[7]: v" quantity="L23PyrRS_L23/7/L23PyrRS/v" scale="1mV" color="#fa8826" timeScale="1ms"/>
            <Line id="L23PyrRS_L23[8]: v" quantity="L23PyrRS_L23/8/L23PyrRS/v" scale="1mV" color="#6980a8" timeScale="1ms"/>
            <Line id="L23PyrRS_L23[9]: v" quantity="L23PyrRS_L23/9/L23PyrRS/v" scale="1mV" color="#8101e8" timeScale="1ms"/>
            <Line id="L23PyrRS_L23[10]: v" quantity="L23PyrRS_L23/10/L23PyrRS/v" scale="1mV" color="#25ece8" timeScale="1ms"/>
            <Line id="L23PyrRS_L23[11]: v" quantity="L23PyrRS_L23/11/L23PyrRS/v" scale="1mV" color="#b80e3b" timeScale="1ms"/>
            <Line id="L23PyrRS_L23[12]: v" quantity="L23PyrRS_L23/12/L23PyrRS/v" scale="1mV" color="#30a1f6" timeScale="1ms"/>
            <Line id="L23PyrRS_L23[13]: v" quantity="L23PyrRS_L23/13/L23PyrRS/v" scale="1mV" color="#577081" timeScale="1ms"/>
            <Line id="L23PyrRS_L23[14]: v" quantity="L23PyrRS_L23/14/L23PyrRS/v" scale="1mV" color="#06057c" timeScale="1ms"/>
            <Line id="L23PyrRS_L23[15]: v" quantity="L23PyrRS_L23/15/L23PyrRS/v" scale="1mV" color="#56eaa3" timeScale="1ms"/>
            <Line id="L23PyrRS_L23[16]: v" quantity="L23PyrRS_L23/16/L23PyrRS/v" scale="1mV" color="#f7acee" timeScale="1ms"/>
            <Line id="L23PyrRS_L23[17]: v" quantity="L23PyrRS_L23/17/L23PyrRS/v" scale="1mV" color="#fa9289" timeScale="1ms"/>
            <Line id="L23PyrRS_L23[18]: v" quantity="L23PyrRS_L23/18/L23PyrRS/v" scale="1mV" color="#be9985" timeScale="1ms"/>
            <Line id="L23PyrRS_L23[19]: v" quantity="L23PyrRS_L23/19/L23PyrRS/v" scale="1mV" color="#00e266" timeScale="1ms"/>
            <Line id="L23PyrRS_L23[20]: v" quantity="L23PyrRS_L23/20/L23PyrRS/v" scale="1mV" color="#f0b378" timeScale="1ms"/>
            <Line id="L23PyrRS_L23[21]: v" quantity="L23PyrRS_L23/21/L23PyrRS/v" scale="1mV" color="#deea95" timeScale="1ms"/>
            <Line id="L23PyrRS_L23[22]: v" quantity="L23PyrRS_L23/22/L23PyrRS/v" scale="1mV" color="#c55566" timeScale="1ms"/>
            <Line id="L23PyrRS_L23[23]: v" quantity="L23PyrRS_L23/23/L23PyrRS/v" scale="1mV" color="#2dcaab" timeScale="1ms"/>
            <Line id="L23PyrRS_L23[24]: v" quantity="L23PyrRS_L23/24/L23PyrRS/v" scale="1mV" color="#1978ce" timeScale="1ms"/>
            <Line id="L23PyrRS_L23[25]: v" quantity="L23PyrRS_L23/25/L23PyrRS/v" scale="1mV" color="#6a1ecc" timeScale="1ms"/>
            <Line id="L23PyrRS_L23[26]: v" quantity="L23PyrRS_L23/26/L23PyrRS/v" scale="1mV" color="#e2b284" timeScale="1ms"/>
            <Line id="L23PyrRS_L23[27]: v" quantity="L23PyrRS_L23/27/L23PyrRS/v" scale="1mV" color="#93fd72" timeScale="1ms"/>
            <Line id="L23PyrRS_L23[28]: v" quantity="L23PyrRS_L23/28/L23PyrRS/v" scale="1mV" color="#bc90a6" timeScale="1ms"/>
            <Line id="L23PyrRS_L23[29]: v" quantity="L23PyrRS_L23/29/L23PyrRS/v" scale="1mV" color="#3b8d0e" timeScale="1ms"/>
            <Line id="L23PyrRS_L23[30]: v" quantity="L23PyrRS_L23/30/L23PyrRS/v" scale="1mV" color="#860a7d" timeScale="1ms"/>
            <Line id="L23PyrRS_L23[31]: v" quantity="L23PyrRS_L23/31/L23PyrRS/v" scale="1mV" color="#b59a59" timeScale="1ms"/>
            <Line id="L23PyrRS_L23[32]: v" quantity="L23PyrRS_L23/32/L23PyrRS/v" scale="1mV" color="#d32851" timeScale="1ms"/>
            <Line id="L23PyrRS_L23[33]: v" quantity="L23PyrRS_L23/33/L23PyrRS/v" scale="1mV" color="#ce9fb6" timeScale="1ms"/>
            <Line id="L23PyrRS_L23[34]: v" quantity="L23PyrRS_L23/34/L23PyrRS/v" scale="1mV" color="#3b788b" timeScale="1ms"/>
            <Line id="L23PyrRS_L23[35]: v" quantity="L23PyrRS_L23/35/L23PyrRS/v" scale="1mV" color="#df8960" timeScale="1ms"/>
            <Line id="L23PyrRS_L23[36]: v" quantity="L23PyrRS_L23/36/L23PyrRS/v" scale="1mV" color="#3764b5" timeScale="1ms"/>
            <Line id="L23PyrRS_L23[37]: v" quantity="L23PyrRS_L23/37/L23PyrRS/v" scale="1mV" color="#cd4944" timeScale="1ms"/>
            <Line id="L23PyrRS_L23[38]: v" quantity="L23PyrRS_L23/38/L23PyrRS/v" scale="1mV" color="#8e1a11" timeScale="1ms"/>
            <Line id="L23PyrRS_L23[39]: v" quantity="L23PyrRS_L23/39/L23PyrRS/v" scale="1mV" color="#2f9272" timeScale="1ms"/>
            <Line id="L23PyrRS_L23[40]: v" quantity="L23PyrRS_L23/40/L23PyrRS/v" scale="1mV" color="#96af0d" timeScale="1ms"/>
            <Line id="L23PyrRS_L23[41]: v" quantity="L23PyrRS_L23/41/L23PyrRS/v" scale="1mV" color="#84ab56" timeScale="1ms"/>
            <Line id="L23PyrRS_L23[42]: v" quantity="L23PyrRS_L23/42/L23PyrRS/v" scale="1mV" color="#f56ae7" timeScale="1ms"/>
            <Line id="L23PyrRS_L23[43]: v" quantity="L23PyrRS_L23/43/L23PyrRS/v" scale="1mV" color="#0aa250" timeScale="1ms"/>
            <Line id="L23PyrRS_L23[44]: v" quantity="L23PyrRS_L23/44/L23PyrRS/v" scale="1mV" color="#2a04f7" timeScale="1ms"/>
            <Line id="L23PyrRS_L23[45]: v" quantity="L23PyrRS_L23/45/L23PyrRS/v" scale="1mV" color="#fbb911" timeScale="1ms"/>
            <Line id="L23PyrRS_L23[46]: v" quantity="L23PyrRS_L23/46/L23PyrRS/v" scale="1mV" color="#d50b61" timeScale="1ms"/>
            <Line id="L23PyrRS_L23[47]: v" quantity="L23PyrRS_L23/47/L23PyrRS/v" scale="1mV" color="#267841" timeScale="1ms"/>
            <Line id="L23PyrRS_L23[48]: v" quantity="L23PyrRS_L23/48/L23PyrRS/v" scale="1mV" color="#3aa725" timeScale="1ms"/>
            <Line id="L23PyrRS_L23[49]: v" quantity="L23PyrRS_L23/49/L23PyrRS/v" scale="1mV" color="#8a04f7" timeScale="1ms"/>
            <Line id="L23PyrRS_L23[50]: v" quantity="L23PyrRS_L23/50/L23PyrRS/v" scale="1mV" color="#282fe5" timeScale="1ms"/>
            <Line id="L23PyrRS_L23[51]: v" quantity="L23PyrRS_L23/51/L23PyrRS/v" scale="1mV" color="#52e1fb" timeScale="1ms"/>
            <Line id="L23PyrRS_L23[52]: v" quantity="L23PyrRS_L23/52/L23PyrRS/v" scale="1mV" color="#0ca02f" timeScale="1ms"/>
            <Line id="L23PyrRS_L23[53]: v" quantity="L23PyrRS_L23/53/L23PyrRS/v" scale="1mV" color="#b6307b" timeScale="1ms"/>
            <Line id="L23PyrRS_L23[54]: v" quantity="L23PyrRS_L23/54/L23PyrRS/v" scale="1mV" color="#141cb0" timeScale="1ms"/>
            <Line id="L23PyrRS_L23[55]: v" quantity="L23PyrRS_L23/55/L23PyrRS/v" scale="1mV" color="#fe9e62" timeScale="1ms"/>
            <Line id="L23PyrRS_L23[56]: v" quantity="L23PyrRS_L23/56/L23PyrRS/v" scale="1mV" color="#ebaa77" timeScale="1ms"/>
            <Line id="L23PyrRS_L23[57]: v" quantity="L23PyrRS_L23/57/L23PyrRS/v" scale="1mV" color="#c9f0b0" timeScale="1ms"/>
            <Line id="L23PyrRS_L23[58]: v" quantity="L23PyrRS_L23/58/L23PyrRS/v" scale="1mV" color="#c5bc64" timeScale="1ms"/>
            <Line id="L23PyrRS_L23[59]: v" quantity="L23PyrRS_L23/59/L23PyrRS/v" scale="1mV" color="#5e2503" timeScale="1ms"/>
            <Line id="L23PyrRS_L23[60]: v" quantity="L23PyrRS_L23/60/L23PyrRS/v" scale="1mV" color="#adbfb0" timeScale="1ms"/>
            <Line id="L23PyrRS_L23[61]: v" quantity="L23PyrRS_L23/61/L23PyrRS/v" scale="1mV" color="#c2e1da" timeScale="1ms"/>
            <Line id="L23PyrRS_L23[62]: v" quantity="L23PyrRS_L23/62/L23PyrRS/v" scale="1mV" color="#7b1427" timeScale="1ms"/>
            <Line id="L23PyrRS_L23[63]: v" quantity="L23PyrRS_L23/63/L23PyrRS/v" scale="1mV" color="#0fc01b" timeScale="1ms"/>
            <Line id="L23PyrRS_L23[64]: v" quantity="L23PyrRS_L23/64/L23PyrRS/v" scale="1mV" color="#a04859" timeScale="1ms"/>
            <Line id="L23PyrRS_L23[65]: v" quantity="L23PyrRS_L23/65/L23PyrRS/v" scale="1mV" color="#53650f" timeScale="1ms"/>
            <Line id="L23PyrRS_L23[66]: v" quantity="L23PyrRS_L23/66/L23PyrRS/v" scale="1mV" color="#9c2ecc" timeScale="1ms"/>
            <Line id="L23PyrRS_L23[67]: v" quantity="L23PyrRS_L23/67/L23PyrRS/v" scale="1mV" color="#6bbb69" timeScale="1ms"/>
            <Line id="L23PyrRS_L23[68]: v" quantity="L23PyrRS_L23/68/L23PyrRS/v" scale="1mV" color="#f3d90e" timeScale="1ms"/>
            <Line id="L23PyrRS_L23[69]: v" quantity="L23PyrRS_L23/69/L23PyrRS/v" scale="1mV" color="#339bb4" timeScale="1ms"/>
            <Line id="L23PyrRS_L23[70]: v" quantity="L23PyrRS_L23/70/L23PyrRS/v" scale="1mV" color="#c4d3c5" timeScale="1ms"/>
            <Line id="L23PyrRS_L23[71]: v" quantity="L23PyrRS_L23/71/L23PyrRS/v" scale="1mV" color="#b2d4f3" timeScale="1ms"/>
            <Line id="L23PyrRS_L23[72]: v" quantity="L23PyrRS_L23/72/L23PyrRS/v" scale="1mV" color="#8e7ae9" timeScale="1ms"/>
            <Line id="L23PyrRS_L23[73]: v" quantity="L23PyrRS_L23/73/L23PyrRS/v" scale="1mV" color="#147de9" timeScale="1ms"/>
            <Line id="L23PyrRS_L23[74]: v" quantity="L23PyrRS_L23/74/L23PyrRS/v" scale="1mV" color="#2a3a46" timeScale="1ms"/>
            <Line id="L23PyrRS_L23[75]: v" quantity="L23PyrRS_L23/75/L23PyrRS/v" scale="1mV" color="#f79fca" timeScale="1ms"/>
            <Line id="L23PyrRS_L23[76]: v" quantity="L23PyrRS_L23/76/L23PyrRS/v" scale="1mV" color="#3b0b63" timeScale="1ms"/>
            <Line id="L23PyrRS_L23[77]: v" quantity="L23PyrRS_L23/77/L23PyrRS/v" scale="1mV" color="#29ddf4" timeScale="1ms"/>
            <Line id="L23PyrRS_L23[78]: v" quantity="L23PyrRS_L23/78/L23PyrRS/v" scale="1mV" color="#49cdbe" timeScale="1ms"/>
            <Line id="L23PyrRS_L23[79]: v" quantity="L23PyrRS_L23/79/L23PyrRS/v" scale="1mV" color="#8980bb" timeScale="1ms"/>
            <Line id="L23PyrRS_L23[80]: v" quantity="L23PyrRS_L23/80/L23PyrRS/v" scale="1mV" color="#850561" timeScale="1ms"/>
            <Line id="L23PyrRS_L23[81]: v" quantity="L23PyrRS_L23/81/L23PyrRS/v" scale="1mV" color="#00da5a" timeScale="1ms"/>
            <Line id="L23PyrRS_L23[82]: v" quantity="L23PyrRS_L23/82/L23PyrRS/v" scale="1mV" color="#00d0ba" timeScale="1ms"/>
            <Line id="L23PyrRS_L23[83]: v" quantity="L23PyrRS_L23/83/L23PyrRS/v" scale="1mV" color="#7efe36" timeScale="1ms"/>
            <Line id="L23PyrRS_L23[84]: v" quantity="L23PyrRS_L23/84/L23PyrRS/v" scale="1mV" color="#2f529f" timeScale="1ms"/>
            <Line id="L23PyrRS_L23[85]: v" quantity="L23PyrRS_L23/85/L23PyrRS/v" scale="1mV" color="#9b852c" timeScale="1ms"/>
            <Line id="L23PyrRS_L23[86]: v" quantity="L23PyrRS_L23/86/L23PyrRS/v" scale="1mV" color="#cc6812" timeScale="1ms"/>
            <Line id="L23PyrRS_L23[87]: v" quantity="L23PyrRS_L23/87/L23PyrRS/v" scale="1mV" color="#188b26" timeScale="1ms"/>
            <Line id="L23PyrRS_L23[88]: v" quantity="L23PyrRS_L23/88/L23PyrRS/v" scale="1mV" color="#8152a2" timeScale="1ms"/>
            <Line id="L23PyrRS_L23[89]: v" quantity="L23PyrRS_L23/89/L23PyrRS/v" scale="1mV" color="#67f8ab" timeScale="1ms"/>
            <Line id="L23PyrRS_L23[90]: v" quantity="L23PyrRS_L23/90/L23PyrRS/v" scale="1mV" color="#ca5b25" timeScale="1ms"/>
            <Line id="L23PyrRS_L23[91]: v" quantity="L23PyrRS_L23/91/L23PyrRS/v" scale="1mV" color="#f46d4e" timeScale="1ms"/>
            <Line id="L23PyrRS_L23[92]: v" quantity="L23PyrRS_L23/92/L23PyrRS/v" scale="1mV" color="#6aae0b" timeScale="1ms"/>
            <Line id="L23PyrRS_L23[93]: v" quantity="L23PyrRS_L23/93/L23PyrRS/v" scale="1mV" color="#3e46cc" timeScale="1ms"/>
            <Line id="L23PyrRS_L23[94]: v" quantity="L23PyrRS_L23/94/L23PyrRS/v" scale="1mV" color="#e0e3a1" timeScale="1ms"/>
            <Line id="L23PyrRS_L23[95]: v" quantity="L23PyrRS_L23/95/L23PyrRS/v" scale="1mV" color="#06fb8a" timeScale="1ms"/>
            <Line id="L23PyrRS_L23[96]: v" quantity="L23PyrRS_L23/96/L23PyrRS/v" scale="1mV" color="#549968" timeScale="1ms"/>
            <Line id="L23PyrRS_L23[97]: v" quantity="L23PyrRS_L23/97/L23PyrRS/v" scale="1mV" color="#650ffb" timeScale="1ms"/>
            <Line id="L23PyrRS_L23[98]: v" quantity="L23PyrRS_L23/98/L23PyrRS/v" scale="1mV" color="#2d9059" timeScale="1ms"/>
            <Line id="L23PyrRS_L23[99]: v" quantity="L23PyrRS_L23/99/L23PyrRS/v" scale="1mV" color="#ae1036" timeScale="1ms"/>
        </Display>

        <OutputFile id="Volts_file__SupBasket_L23" fileName="Sim_TestRunColumn.SupBasket_L23.v.dat">
            <OutputColumn id="v_SupBasket_L23_0_SupBasket_v" quantity="SupBasket_L23/0/SupBasket/v"/>
            <OutputColumn id="v_SupBasket_L23_1_SupBasket_v" quantity="SupBasket_L23/1/SupBasket/v"/>
            <OutputColumn id="v_SupBasket_L23_2_SupBasket_v" quantity="SupBasket_L23/2/SupBasket/v"/>
            <OutputColumn id="v_SupBasket_L23_3_SupBasket_v" quantity="SupBasket_L23/3/SupBasket/v"/>
            <OutputColumn id="v_SupBasket_L23_4_SupBasket_v" quantity="SupBasket_L23/4/SupBasket/v"/>
            <OutputColumn id="v_SupBasket_L23_5_SupBasket_v" quantity="SupBasket_L23/5/SupBasket/v"/>
            <OutputColumn id="v_SupBasket_L23_6_SupBasket_v" quantity="SupBasket_L23/6/SupBasket/v"/>
            <OutputColumn id="v_SupBasket_L23_7_SupBasket_v" quantity="SupBasket_L23/7/SupBasket/v"/>
            <OutputColumn id="v_SupBasket_L23_8_SupBasket_v" quantity="SupBasket_L23/8/SupBasket/v"/>
        </OutputFile>

        <OutputFile id="Volts_file__L23PyrRS_L23" fileName="Sim_TestRunColumn.L23PyrRS_L23.v.dat">
            <OutputColumn id="v_L23PyrRS_L23_0_L23PyrRS_v" quantity="L23PyrRS_L23/0/L23PyrRS/v"/>
            <OutputColumn id="v_L23PyrRS_L23_1_L23PyrRS_v" quantity="L23PyrRS_L23/1/L23PyrRS/v"/>
            <OutputColumn id="v_L23PyrRS_L23_2_L23PyrRS_v" quantity="L23PyrRS_L23/2/L23PyrRS/v"/>
            <OutputColumn id="v_L23PyrRS_L23_3_L23PyrRS_v" quantity="L23PyrRS_L23/3/L23PyrRS/v"/>
            <OutputColumn id="v_L23PyrRS_L23_4_L23PyrRS_v" quantity="L23PyrRS_L23/4/L23PyrRS/v"/>
            <OutputColumn id="v_L23PyrRS_L23_5_L23PyrRS_v" quantity="L23PyrRS_L23/5/L23PyrRS/v"/>
            <OutputColumn id="v_L23PyrRS_L23_6_L23PyrRS_v" quantity="L23PyrRS_L23/6/L23PyrRS/v"/>
            <OutputColumn id="v_L23PyrRS_L23_7_L23PyrRS_v" quantity="L23PyrRS_L23/7/L23PyrRS/v"/>
            <OutputColumn id="v_L23PyrRS_L23_8_L23PyrRS_v" quantity="L23PyrRS_L23/8/L23PyrRS/v"/>
            <OutputColumn id="v_L23PyrRS_L23_9_L23PyrRS_v" quantity="L23PyrRS_L23/9/L23PyrRS/v"/>
            <OutputColumn id="v_L23PyrRS_L23_10_L23PyrRS_v" quantity="L23PyrRS_L23/10/L23PyrRS/v"/>
            <OutputColumn id="v_L23PyrRS_L23_11_L23PyrRS_v" quantity="L23PyrRS_L23/11/L23PyrRS/v"/>
            <OutputColumn id="v_L23PyrRS_L23_12_L23PyrRS_v" quantity="L23PyrRS_L23/12/L23PyrRS/v"/>
            <OutputColumn id="v_L23PyrRS_L23_13_L23PyrRS_v" quantity="L23PyrRS_L23/13/L23PyrRS/v"/>
            <OutputColumn id="v_L23PyrRS_L23_14_L23PyrRS_v" quantity="L23PyrRS_L23/14/L23PyrRS/v"/>
            <OutputColumn id="v_L23PyrRS_L23_15_L23PyrRS_v" quantity="L23PyrRS_L23/15/L23PyrRS/v"/>
            <OutputColumn id="v_L23PyrRS_L23_16_L23PyrRS_v" quantity="L23PyrRS_L23/16/L23PyrRS/v"/>
            <OutputColumn id="v_L23PyrRS_L23_17_L23PyrRS_v" quantity="L23PyrRS_L23/17/L23PyrRS/v"/>
            <OutputColumn id="v_L23PyrRS_L23_18_L23PyrRS_v" quantity="L23PyrRS_L23/18/L23PyrRS/v"/>
            <OutputColumn id="v_L23PyrRS_L23_19_L23PyrRS_v" quantity="L23PyrRS_L23/19/L23PyrRS/v"/>
            <OutputColumn id="v_L23PyrRS_L23_20_L23PyrRS_v" quantity="L23PyrRS_L23/20/L23PyrRS/v"/>
            <OutputColumn id="v_L23PyrRS_L23_21_L23PyrRS_v" quantity="L23PyrRS_L23/21/L23PyrRS/v"/>
            <OutputColumn id="v_L23PyrRS_L23_22_L23PyrRS_v" quantity="L23PyrRS_L23/22/L23PyrRS/v"/>
            <OutputColumn id="v_L23PyrRS_L23_23_L23PyrRS_v" quantity="L23PyrRS_L23/23/L23PyrRS/v"/>
            <OutputColumn id="v_L23PyrRS_L23_24_L23PyrRS_v" quantity="L23PyrRS_L23/24/L23PyrRS/v"/>
            <OutputColumn id="v_L23PyrRS_L23_25_L23PyrRS_v" quantity="L23PyrRS_L23/25/L23PyrRS/v"/>
            <OutputColumn id="v_L23PyrRS_L23_26_L23PyrRS_v" quantity="L23PyrRS_L23/26/L23PyrRS/v"/>
            <OutputColumn id="v_L23PyrRS_L23_27_L23PyrRS_v" quantity="L23PyrRS_L23/27/L23PyrRS/v"/>
            <OutputColumn id="v_L23PyrRS_L23_28_L23PyrRS_v" quantity="L23PyrRS_L23/28/L23PyrRS/v"/>
            <OutputColumn id="v_L23PyrRS_L23_29_L23PyrRS_v" quantity="L23PyrRS_L23/29/L23PyrRS/v"/>
            <OutputColumn id="v_L23PyrRS_L23_30_L23PyrRS_v" quantity="L23PyrRS_L23/30/L23PyrRS/v"/>
            <OutputColumn id="v_L23PyrRS_L23_31_L23PyrRS_v" quantity="L23PyrRS_L23/31/L23PyrRS/v"/>
            <OutputColumn id="v_L23PyrRS_L23_32_L23PyrRS_v" quantity="L23PyrRS_L23/32/L23PyrRS/v"/>
            <OutputColumn id="v_L23PyrRS_L23_33_L23PyrRS_v" quantity="L23PyrRS_L23/33/L23PyrRS/v"/>
            <OutputColumn id="v_L23PyrRS_L23_34_L23PyrRS_v" quantity="L23PyrRS_L23/34/L23PyrRS/v"/>
            <OutputColumn id="v_L23PyrRS_L23_35_L23PyrRS_v" quantity="L23PyrRS_L23/35/L23PyrRS/v"/>
            <OutputColumn id="v_L23PyrRS_L23_36_L23PyrRS_v" quantity="L23PyrRS_L23/36/L23PyrRS/v"/>
            <OutputColumn id="v_L23PyrRS_L23_37_L23PyrRS_v" quantity="L23PyrRS_L23/37/L23PyrRS/v"/>
            <OutputColumn id="v_L23PyrRS_L23_38_L23PyrRS_v" quantity="L23PyrRS_L23/38/L23PyrRS/v"/>
            <OutputColumn id="v_L23PyrRS_L23_39_L23PyrRS_v" quantity="L23PyrRS_L23/39/L23PyrRS/v"/>
            <OutputColumn id="v_L23PyrRS_L23_40_L23PyrRS_v" quantity="L23PyrRS_L23/40/L23PyrRS/v"/>
            <OutputColumn id="v_L23PyrRS_L23_41_L23PyrRS_v" quantity="L23PyrRS_L23/41/L23PyrRS/v"/>
            <OutputColumn id="v_L23PyrRS_L23_42_L23PyrRS_v" quantity="L23PyrRS_L23/42/L23PyrRS/v"/>
            <OutputColumn id="v_L23PyrRS_L23_43_L23PyrRS_v" quantity="L23PyrRS_L23/43/L23PyrRS/v"/>
            <OutputColumn id="v_L23PyrRS_L23_44_L23PyrRS_v" quantity="L23PyrRS_L23/44/L23PyrRS/v"/>
            <OutputColumn id="v_L23PyrRS_L23_45_L23PyrRS_v" quantity="L23PyrRS_L23/45/L23PyrRS/v"/>
            <OutputColumn id="v_L23PyrRS_L23_46_L23PyrRS_v" quantity="L23PyrRS_L23/46/L23PyrRS/v"/>
            <OutputColumn id="v_L23PyrRS_L23_47_L23PyrRS_v" quantity="L23PyrRS_L23/47/L23PyrRS/v"/>
            <OutputColumn id="v_L23PyrRS_L23_48_L23PyrRS_v" quantity="L23PyrRS_L23/48/L23PyrRS/v"/>
            <OutputColumn id="v_L23PyrRS_L23_49_L23PyrRS_v" quantity="L23PyrRS_L23/49/L23PyrRS/v"/>
            <OutputColumn id="v_L23PyrRS_L23_50_L23PyrRS_v" quantity="L23PyrRS_L23/50/L23PyrRS/v"/>
            <OutputColumn id="v_L23PyrRS_L23_51_L23PyrRS_v" quantity="L23PyrRS_L23/51/L23PyrRS/v"/>
            <OutputColumn id="v_L23PyrRS_L23_52_L23PyrRS_v" quantity="L23PyrRS_L23/52/L23PyrRS/v"/>
            <OutputColumn id="v_L23PyrRS_L23_53_L23PyrRS_v" quantity="L23PyrRS_L23/53/L23PyrRS/v"/>
            <OutputColumn id="v_L23PyrRS_L23_54_L23PyrRS_v" quantity="L23PyrRS_L23/54/L23PyrRS/v"/>
            <OutputColumn id="v_L23PyrRS_L23_55_L23PyrRS_v" quantity="L23PyrRS_L23/55/L23PyrRS/v"/>
            <OutputColumn id="v_L23PyrRS_L23_56_L23PyrRS_v" quantity="L23PyrRS_L23/56/L23PyrRS/v"/>
            <OutputColumn id="v_L23PyrRS_L23_57_L23PyrRS_v" quantity="L23PyrRS_L23/57/L23PyrRS/v"/>
            <OutputColumn id="v_L23PyrRS_L23_58_L23PyrRS_v" quantity="L23PyrRS_L23/58/L23PyrRS/v"/>
            <OutputColumn id="v_L23PyrRS_L23_59_L23PyrRS_v" quantity="L23PyrRS_L23/59/L23PyrRS/v"/>
            <OutputColumn id="v_L23PyrRS_L23_60_L23PyrRS_v" quantity="L23PyrRS_L23/60/L23PyrRS/v"/>
            <OutputColumn id="v_L23PyrRS_L23_61_L23PyrRS_v" quantity="L23PyrRS_L23/61/L23PyrRS/v"/>
            <OutputColumn id="v_L23PyrRS_L23_62_L23PyrRS_v" quantity="L23PyrRS_L23/62/L23PyrRS/v"/>
            <OutputColumn id="v_L23PyrRS_L23_63_L23PyrRS_v" quantity="L23PyrRS_L23/63/L23PyrRS/v"/>
            <OutputColumn id="v_L23PyrRS_L23_64_L23PyrRS_v" quantity="L23PyrRS_L23/64/L23PyrRS/v"/>
            <OutputColumn id="v_L23PyrRS_L23_65_L23PyrRS_v" quantity="L23PyrRS_L23/65/L23PyrRS/v"/>
            <OutputColumn id="v_L23PyrRS_L23_66_L23PyrRS_v" quantity="L23PyrRS_L23/66/L23PyrRS/v"/>
            <OutputColumn id="v_L23PyrRS_L23_67_L23PyrRS_v" quantity="L23PyrRS_L23/67/L23PyrRS/v"/>
            <OutputColumn id="v_L23PyrRS_L23_68_L23PyrRS_v" quantity="L23PyrRS_L23/68/L23PyrRS/v"/>
            <OutputColumn id="v_L23PyrRS_L23_69_L23PyrRS_v" quantity="L23PyrRS_L23/69/L23PyrRS/v"/>
            <OutputColumn id="v_L23PyrRS_L23_70_L23PyrRS_v" quantity="L23PyrRS_L23/70/L23PyrRS/v"/>
            <OutputColumn id="v_L23PyrRS_L23_71_L23PyrRS_v" quantity="L23PyrRS_L23/71/L23PyrRS/v"/>
            <OutputColumn id="v_L23PyrRS_L23_72_L23PyrRS_v" quantity="L23PyrRS_L23/72/L23PyrRS/v"/>
            <OutputColumn id="v_L23PyrRS_L23_73_L23PyrRS_v" quantity="L23PyrRS_L23/73/L23PyrRS/v"/>
            <OutputColumn id="v_L23PyrRS_L23_74_L23PyrRS_v" quantity="L23PyrRS_L23/74/L23PyrRS/v"/>
            <OutputColumn id="v_L23PyrRS_L23_75_L23PyrRS_v" quantity="L23PyrRS_L23/75/L23PyrRS/v"/>
            <OutputColumn id="v_L23PyrRS_L23_76_L23PyrRS_v" quantity="L23PyrRS_L23/76/L23PyrRS/v"/>
            <OutputColumn id="v_L23PyrRS_L23_77_L23PyrRS_v" quantity="L23PyrRS_L23/77/L23PyrRS/v"/>
            <OutputColumn id="v_L23PyrRS_L23_78_L23PyrRS_v" quantity="L23PyrRS_L23/78/L23PyrRS/v"/>
            <OutputColumn id="v_L23PyrRS_L23_79_L23PyrRS_v" quantity="L23PyrRS_L23/79/L23PyrRS/v"/>
            <OutputColumn id="v_L23PyrRS_L23_80_L23PyrRS_v" quantity="L23PyrRS_L23/80/L23PyrRS/v"/>
            <OutputColumn id="v_L23PyrRS_L23_81_L23PyrRS_v" quantity="L23PyrRS_L23/81/L23PyrRS/v"/>
            <OutputColumn id="v_L23PyrRS_L23_82_L23PyrRS_v" quantity="L23PyrRS_L23/82/L23PyrRS/v"/>
            <OutputColumn id="v_L23PyrRS_L23_83_L23PyrRS_v" quantity="L23PyrRS_L23/83/L23PyrRS/v"/>
            <OutputColumn id="v_L23PyrRS_L23_84_L23PyrRS_v" quantity="L23PyrRS_L23/84/L23PyrRS/v"/>
            <OutputColumn id="v_L23PyrRS_L23_85_L23PyrRS_v" quantity="L23PyrRS_L23/85/L23PyrRS/v"/>
            <OutputColumn id="v_L23PyrRS_L23_86_L23PyrRS_v" quantity="L23PyrRS_L23/86/L23PyrRS/v"/>
            <OutputColumn id="v_L23PyrRS_L23_87_L23PyrRS_v" quantity="L23PyrRS_L23/87/L23PyrRS/v"/>
            <OutputColumn id="v_L23PyrRS_L23_88_L23PyrRS_v" quantity="L23PyrRS_L23/88/L23PyrRS/v"/>
            <OutputColumn id="v_L23PyrRS_L23_89_L23PyrRS_v" quantity="L23PyrRS_L23/89/L23PyrRS/v"/>
            <OutputColumn id="v_L23PyrRS_L23_90_L23PyrRS_v" quantity="L23PyrRS_L23/90/L23PyrRS/v"/>
            <OutputColumn id="v_L23PyrRS_L23_91_L23PyrRS_v" quantity="L23PyrRS_L23/91/L23PyrRS/v"/>
            <OutputColumn id="v_L23PyrRS_L23_92_L23PyrRS_v" quantity="L23PyrRS_L23/92/L23PyrRS/v"/>
            <OutputColumn id="v_L23PyrRS_L23_93_L23PyrRS_v" quantity="L23PyrRS_L23/93/L23PyrRS/v"/>
            <OutputColumn id="v_L23PyrRS_L23_94_L23PyrRS_v" quantity="L23PyrRS_L23/94/L23PyrRS/v"/>
            <OutputColumn id="v_L23PyrRS_L23_95_L23PyrRS_v" quantity="L23PyrRS_L23/95/L23PyrRS/v"/>
            <OutputColumn id="v_L23PyrRS_L23_96_L23PyrRS_v" quantity="L23PyrRS_L23/96/L23PyrRS/v"/>
            <OutputColumn id="v_L23PyrRS_L23_97_L23PyrRS_v" quantity="L23PyrRS_L23/97/L23PyrRS/v"/>
            <OutputColumn id="v_L23PyrRS_L23_98_L23PyrRS_v" quantity="L23PyrRS_L23/98/L23PyrRS/v"/>
            <OutputColumn id="v_L23PyrRS_L23_99_L23PyrRS_v" quantity="L23PyrRS_L23/99/L23PyrRS/v"/>
        </OutputFile>

    </Simulation>

</Lems>
