<neuroml xmlns="http://www.neuroml.org/schema/neuroml2"  xmlns:xs="http://www.w3.org/2001/XMLSchema" xmlns:xsi="http://www.w3.org/2001/XMLSchema-instance" xsi:schemaLocation="http://www.neuroml.org/schema/neuroml2 https://raw.github.com/NeuroML/NeuroML2/development/Schemas/NeuroML2/NeuroML_v2beta5.xsd" id="TestGap">
    <notes>

This NeuroML 2 file was generated by OpenCortex v0.1.10 using:
    libNeuroML v0.2.39
    pyNeuroML v0.3.11

    </notes>
    <property tag="Network seed" value="134344"/>
    <include href="TestGap/L23PyrRS.cell.nml"></include>
    <include href="TestGap/ar__m00_25.channel.nml"></include>
    <include href="TestGap/cad__beta0_01__phi26000.nml"></include>
    <include href="TestGap/cad__beta0_05__phi52000.nml"></include>
    <include href="TestGap/cal.channel.nml"></include>
    <include href="TestGap/cat.channel.nml"></include>
    <include href="TestGap/k2.channel.nml"></include>
    <include href="TestGap/ka.channel.nml"></include>
    <include href="TestGap/kahp.channel.nml"></include>
    <include href="TestGap/kc.channel.nml"></include>
    <include href="TestGap/kdr.channel.nml"></include>
    <include href="TestGap/km.channel.nml"></include>
    <include href="TestGap/naf__a0__b0__c0__d0__fastNa_shiftmin3_5.channel.nml"></include>
    <include href="TestGap/nap.channel.nml"></include>
    <include href="TestGap/pas.channel.nml"></include>
    <include href="TestGap/Syn_AMPA_SupPyr_SupPyr.synapse.nml"></include>
    <include href="TestGap/Syn_NMDA_SupPyr_SupPyr.synapse.nml"></include>
    <include href="TestGap/SynForEctStim.synapse.nml"></include>
    <include href="TestGap/Syn_Elect_SupPyr_SupPyr.nml"></include>
    <pulseGenerator id="DepCurr_L23RS_TO_CG3D_L23PyrRS_Pulse" delay="0.0 ms" duration="20000.0 ms" amplitude="1 uA"/>
    <poissonFiringSynapse id="BackgroundL23RS_TO_CG3D_L23PyrRS_PoiSyn0" averageRate="100.000000 Hz" synapse="Syn_AMPA_SupPyr_SupPyr" spikeTarget="./Syn_AMPA_SupPyr_SupPyr"/>
    <poissonFiringSynapse id="EctopicStimL23RS_TO_CG3D_L23PyrRS_PoiSyn0" averageRate="0.100000 Hz" synapse="SynForEctStim" spikeTarget="./SynForEctStim"/>
    <network id="TestGap" type="networkWithTemperature" temperature="32degC">
        <population id="CG3D_L23PyrRS" component="L23PyrRS" size="20" type="populationList">
            <instance id="0">
                <location x="-158.841310297000007" y="-430.118999579999979" z="10.9331207863"/>
            </instance>
            <instance id="1">
                <location x="141.792475313000011" y="-291.860215211000025" z="151.145387168000013"/>
            </instance>
            <instance id="2">
                <location x="-97.095312510799999" y="-478.58514186299999" z="201.078817444999999"/>
            </instance>
            <instance id="3">
                <location x="-143.090450519000001" y="-348.643492587000026" z="-9.63519612084"/>
            </instance>
            <instance id="4">
                <location x="61.440847859400002" y="-184.8606336" z="135.961968380000002"/>
            </instance>
            <instance id="5">
                <location x="-16.360709678500001" y="-297.179410757000028" z="68.076998188100006"/>
            </instance>
            <instance id="6">
                <location x="162.030723585999993" y="-241.849860095999986" z="16.7264562748"/>
            </instance>
            <instance id="7">
                <location x="38.544948929" y="-318.042282290999992" z="180.780087866000002"/>
            </instance>
            <instance id="8">
                <location x="153.102393696999997" y="-390.971665221000023" z="-136.505549086999991"/>
            </instance>
            <instance id="9">
                <location x="-79.770593936599994" y="-206.511810927999989" z="-228.659888058000007"/>
            </instance>
            <instance id="10">
                <location x="117.369245014000001" y="-140.674613141999998" z="-26.669326248099999"/>
            </instance>
            <instance id="11">
                <location x="135.939205221000009" y="-205.774491216999991" z="-41.391158938700002"/>
            </instance>
            <instance id="12">
                <location x="-69.673970340300002" y="-474.283611356999984" z="-108.914323581999994"/>
            </instance>
            <instance id="13">
                <location x="82.642052868899995" y="-316.514315335999981" z="-61.751059725300003"/>
            </instance>
            <instance id="14">
                <location x="121.831003608000003" y="-164.887776518999999" z="-54.942374477800001"/>
            </instance>
            <instance id="15">
                <location x="83.1578171811" y="-168.771043942000006" z="-144.000044236000008"/>
            </instance>
            <instance id="16">
                <location x="16.537236630300001" y="-105.819840808999999" z="247.222239338999998"/>
            </instance>
            <instance id="17">
                <location x="80.602885311500003" y="-236.991443755000006" z="-202.421203668000004"/>
            </instance>
            <instance id="18">
                <location x="174.863527169000008" y="-87.959801836300002" z="-77.199821601500005"/>
            </instance>
            <instance id="19">
                <location x="-3.7172103294" y="-263.769193340000015" z="-59.610652127900003"/>
            </instance>
        </population>
        <projection id="Proj0syn0_CG3D_L23PyrRS_CG3D_L23PyrRS" presynapticPopulation="CG3D_L23PyrRS" postsynapticPopulation="CG3D_L23PyrRS" synapse="Syn_AMPA_SupPyr_SupPyr">
            <connectionWD id="0" preCellId="../CG3D_L23PyrRS/3/L23PyrRS" preSegmentId="143" preFractionAlong="0.0542441809162" postCellId="../CG3D_L23PyrRS/0/L23PyrRS" postSegmentId="19" postFractionAlong="0.175659728575" weight="1." delay="0.05 ms"/>
            <connectionWD id="1" preCellId="../CG3D_L23PyrRS/18/L23PyrRS" preSegmentId="143" preFractionAlong="0.324225141696" postCellId="../CG3D_L23PyrRS/0/L23PyrRS" postSegmentId="8" postFractionAlong="0.0841567521046" weight="1." delay="0.05 ms"/>
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        </projection>
        <projection id="Proj0syn1_CG3D_L23PyrRS_CG3D_L23PyrRS" presynapticPopulation="CG3D_L23PyrRS" postsynapticPopulation="CG3D_L23PyrRS" synapse="Syn_NMDA_SupPyr_SupPyr">
            <connectionWD id="0" preCellId="../CG3D_L23PyrRS/3/L23PyrRS" preSegmentId="143" preFractionAlong="0.0542441809162" postCellId="../CG3D_L23PyrRS/0/L23PyrRS" postSegmentId="19" postFractionAlong="0.175659728575" weight="1." delay="0.05 ms"/>
            <connectionWD id="1" preCellId="../CG3D_L23PyrRS/18/L23PyrRS" preSegmentId="143" preFractionAlong="0.324225141696" postCellId="../CG3D_L23PyrRS/0/L23PyrRS" postSegmentId="8" postFractionAlong="0.0841567521046" weight="1." delay="0.05 ms"/>
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        </projection>
        <electricalProjection id="Proj1syn0_CG3D_L23PyrRS_CG3D_L23PyrRS" presynapticPopulation="CG3D_L23PyrRS" postsynapticPopulation="CG3D_L23PyrRS">
            <electricalConnectionInstance id="0" preCell="../CG3D_L23PyrRS/9/L23PyrRS" preSegment="147" preFractionAlong="0.207918527932" postCell="../CG3D_L23PyrRS/0/L23PyrRS" postSegment="143" postFractionAlong="0.799938303431" synapse="Syn_Elect_SupPyr_SupPyr"/>
            <electricalConnectionInstance id="1" preCell="../CG3D_L23PyrRS/15/L23PyrRS" preSegment="147" preFractionAlong="0.149154470359" postCell="../CG3D_L23PyrRS/3/L23PyrRS" postSegment="139" postFractionAlong="0.136469753512" synapse="Syn_Elect_SupPyr_SupPyr"/>
            <electricalConnectionInstance id="2" preCell="../CG3D_L23PyrRS/5/L23PyrRS" preSegment="143" preFractionAlong="0.381695250018" postCell="../CG3D_L23PyrRS/4/L23PyrRS" postSegment="144" postFractionAlong="0.875890310694" synapse="Syn_Elect_SupPyr_SupPyr"/>
            <electricalConnectionInstance id="3" preCell="../CG3D_L23PyrRS/13/L23PyrRS" preSegment="144" preFractionAlong="0.853179199316" postCell="../CG3D_L23PyrRS/5/L23PyrRS" postSegment="141" postFractionAlong="0.389439212012" synapse="Syn_Elect_SupPyr_SupPyr"/>
            <electricalConnectionInstance id="4" preCell="../CG3D_L23PyrRS/3/L23PyrRS" preSegment="145" preFractionAlong="0.608662477525" postCell="../CG3D_L23PyrRS/6/L23PyrRS" postSegment="146" postFractionAlong="0.833264247573" synapse="Syn_Elect_SupPyr_SupPyr"/>
            <electricalConnectionInstance id="5" preCell="../CG3D_L23PyrRS/11/L23PyrRS" preSegment="138" preFractionAlong="0.425562515546" postCell="../CG3D_L23PyrRS/7/L23PyrRS" postSegment="136" postFractionAlong="0.0597779576497" synapse="Syn_Elect_SupPyr_SupPyr"/>
            <electricalConnectionInstance id="6" preCell="../CG3D_L23PyrRS/14/L23PyrRS" preSegment="140" preFractionAlong="0.603425251711" postCell="../CG3D_L23PyrRS/8/L23PyrRS" postSegment="143" postFractionAlong="0.320357966723" synapse="Syn_Elect_SupPyr_SupPyr"/>
            <electricalConnectionInstance id="7" preCell="../CG3D_L23PyrRS/19/L23PyrRS" preSegment="141" preFractionAlong="0.647188449472" postCell="../CG3D_L23PyrRS/9/L23PyrRS" postSegment="139" postFractionAlong="0.209284135984" synapse="Syn_Elect_SupPyr_SupPyr"/>
            <electricalConnectionInstance id="8" preCell="../CG3D_L23PyrRS/3/L23PyrRS" preSegment="142" preFractionAlong="0.591192742876" postCell="../CG3D_L23PyrRS/10/L23PyrRS" postSegment="147" postFractionAlong="0.763096583941" synapse="Syn_Elect_SupPyr_SupPyr"/>
            <electricalConnectionInstance id="9" preCell="../CG3D_L23PyrRS/19/L23PyrRS" preSegment="144" preFractionAlong="0.531350527594" postCell="../CG3D_L23PyrRS/11/L23PyrRS" postSegment="142" postFractionAlong="0.502022937904" synapse="Syn_Elect_SupPyr_SupPyr"/>
            <electricalConnectionInstance id="10" preCell="../CG3D_L23PyrRS/3/L23PyrRS" preSegment="147" preFractionAlong="0.675008381729" postCell="../CG3D_L23PyrRS/12/L23PyrRS" postSegment="147" postFractionAlong="0.768816112477" synapse="Syn_Elect_SupPyr_SupPyr"/>
            <electricalConnectionInstance id="11" preCell="../CG3D_L23PyrRS/12/L23PyrRS" preSegment="147" preFractionAlong="0.0642676956112" postCell="../CG3D_L23PyrRS/14/L23PyrRS" postSegment="138" postFractionAlong="0.455495699655" synapse="Syn_Elect_SupPyr_SupPyr"/>
            <electricalConnectionInstance id="12" preCell="../CG3D_L23PyrRS/4/L23PyrRS" preSegment="143" preFractionAlong="0.516021235144" postCell="../CG3D_L23PyrRS/15/L23PyrRS" postSegment="144" postFractionAlong="0.699872004077" synapse="Syn_Elect_SupPyr_SupPyr"/>
            <electricalConnectionInstance id="13" preCell="../CG3D_L23PyrRS/4/L23PyrRS" preSegment="143" preFractionAlong="0.857779888332" postCell="../CG3D_L23PyrRS/16/L23PyrRS" postSegment="145" postFractionAlong="0.676430370559" synapse="Syn_Elect_SupPyr_SupPyr"/>
            <electricalConnectionInstance id="14" preCell="../CG3D_L23PyrRS/10/L23PyrRS" preSegment="143" preFractionAlong="0.0996374341153" postCell="../CG3D_L23PyrRS/19/L23PyrRS" postSegment="142" postFractionAlong="0.476500232925" synapse="Syn_Elect_SupPyr_SupPyr"/>
        </electricalProjection>
        <inputList id="DepCurr_L23RS_TO_CG3D_L23PyrRS_0_0" population="CG3D_L23PyrRS" component="DepCurr_L23RS_TO_CG3D_L23PyrRS_Pulse">
            <inputW id="0" target="../CG3D_L23PyrRS/4/L23PyrRS" destination="synapses" segmentId="0" fractionAlong="0.500000" weight="0.000052915510937"/>
            <inputW id="1" target="../CG3D_L23PyrRS/11/L23PyrRS" destination="synapses" segmentId="0" fractionAlong="0.500000" weight="0.000071103410481"/>
            <inputW id="2" target="../CG3D_L23PyrRS/0/L23PyrRS" destination="synapses" segmentId="0" fractionAlong="0.500000" weight="0.000062062042176"/>
            <inputW id="3" target="../CG3D_L23PyrRS/16/L23PyrRS" destination="synapses" segmentId="0" fractionAlong="0.500000" weight="0.000074593258826"/>
            <inputW id="4" target="../CG3D_L23PyrRS/6/L23PyrRS" destination="synapses" segmentId="0" fractionAlong="0.500000" weight="0.00009799469036"/>
            <inputW id="5" target="../CG3D_L23PyrRS/1/L23PyrRS" destination="synapses" segmentId="0" fractionAlong="0.500000" weight="0.000068165395595"/>
            <inputW id="6" target="../CG3D_L23PyrRS/17/L23PyrRS" destination="synapses" segmentId="0" fractionAlong="0.500000" weight="0.000056893724121"/>
            <inputW id="7" target="../CG3D_L23PyrRS/14/L23PyrRS" destination="synapses" segmentId="0" fractionAlong="0.500000" weight="0.000099119054298"/>
            <inputW id="8" target="../CG3D_L23PyrRS/18/L23PyrRS" destination="synapses" segmentId="0" fractionAlong="0.500000" weight="0.000052812912155"/>
            <inputW id="9" target="../CG3D_L23PyrRS/19/L23PyrRS" destination="synapses" segmentId="0" fractionAlong="0.500000" weight="0.000093412094495"/>
            <inputW id="10" target="../CG3D_L23PyrRS/8/L23PyrRS" destination="synapses" segmentId="0" fractionAlong="0.500000" weight="0.000094206703268"/>
            <inputW id="11" target="../CG3D_L23PyrRS/13/L23PyrRS" destination="synapses" segmentId="0" fractionAlong="0.500000" weight="0.000065536868509"/>
            <inputW id="12" target="../CG3D_L23PyrRS/5/L23PyrRS" destination="synapses" segmentId="0" fractionAlong="0.500000" weight="0.000057803051219"/>
            <inputW id="13" target="../CG3D_L23PyrRS/7/L23PyrRS" destination="synapses" segmentId="0" fractionAlong="0.500000" weight="0.000052526583722"/>
            <inputW id="14" target="../CG3D_L23PyrRS/9/L23PyrRS" destination="synapses" segmentId="0" fractionAlong="0.500000" weight="0.000051544726792"/>
            <inputW id="15" target="../CG3D_L23PyrRS/15/L23PyrRS" destination="synapses" segmentId="0" fractionAlong="0.500000" weight="0.000054362762068"/>
            <inputW id="16" target="../CG3D_L23PyrRS/3/L23PyrRS" destination="synapses" segmentId="0" fractionAlong="0.500000" weight="0.00007326689665"/>
            <inputW id="17" target="../CG3D_L23PyrRS/10/L23PyrRS" destination="synapses" segmentId="0" fractionAlong="0.500000" weight="0.000080924065012"/>
            <inputW id="18" target="../CG3D_L23PyrRS/2/L23PyrRS" destination="synapses" segmentId="0" fractionAlong="0.500000" weight="0.000087914407878"/>
            <inputW id="19" target="../CG3D_L23PyrRS/12/L23PyrRS" destination="synapses" segmentId="0" fractionAlong="0.500000" weight="0.000090990887196"/>
        </inputList>
        <inputList id="BackgroundL23RS_TO_CG3D_L23PyrRS_0_0" population="CG3D_L23PyrRS" component="BackgroundL23RS_TO_CG3D_L23PyrRS_PoiSyn0">
            <input id="0" target="../CG3D_L23PyrRS/15/L23PyrRS" destination="synapses" segmentId="34" fractionAlong="0.935203"/>
            <input id="1" target="../CG3D_L23PyrRS/15/L23PyrRS" destination="synapses" segmentId="68" fractionAlong="0.711681"/>
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        </inputList>
        <inputList id="EctopicStimL23RS_TO_CG3D_L23PyrRS_0_0" population="CG3D_L23PyrRS" component="EctopicStimL23RS_TO_CG3D_L23PyrRS_PoiSyn0">
            <input id="0" target="../CG3D_L23PyrRS/14/L23PyrRS" destination="synapses" segmentId="143" fractionAlong="0.500000"/>
            <input id="1" target="../CG3D_L23PyrRS/19/L23PyrRS" destination="synapses" segmentId="143" fractionAlong="0.500000"/>
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        </inputList>
    </network>
</neuroml>
