<neuroml xmlns="http://www.neuroml.org/schema/neuroml2"  xmlns:xs="http://www.w3.org/2001/XMLSchema" xmlns:xsi="http://www.w3.org/2001/XMLSchema-instance" xsi:schemaLocation="http://www.neuroml.org/schema/neuroml2 https://raw.github.com/NeuroML/NeuroML2/development/Schemas/NeuroML2/NeuroML_v2beta5.xsd" id="TestL23">
    <notes>

This NeuroML 2 file was generated by OpenCortex v0.0.8 using:
    libNeuroML v0.2.28
    pyNeuroML v0.2.8

    </notes>
    <property tag="Python random seed" value="134344"/>
    <include href="TestL23/SupLTSInter.cell.nml"></include>
    <include href="TestL23/ar__m00_25.channel.nml"></include>
    <include href="TestL23/cad__beta0_02__phi260000.nml"></include>
    <include href="TestL23/cad__beta0_05__phi520000.nml"></include>
    <include href="TestL23/cal.channel.nml"></include>
    <include href="TestL23/cat_a.channel.nml"></include>
    <include href="TestL23/k2.channel.nml"></include>
    <include href="TestL23/ka.channel.nml"></include>
    <include href="TestL23/kahp_slower.channel.nml"></include>
    <include href="TestL23/kc_fast.channel.nml"></include>
    <include href="TestL23/kdr_fs.channel.nml"></include>
    <include href="TestL23/km.channel.nml"></include>
    <include href="TestL23/naf2__a0__b0__c0__d0__fastNa_shiftmin2_5.channel.nml"></include>
    <include href="TestL23/nap.channel.nml"></include>
    <include href="TestL23/pas.channel.nml"></include>
    <include href="TestL23/SupAxAx.cell.nml"></include>
    <include href="TestL23/ar__m00_25.channel.nml"></include>
    <include href="TestL23/cad__beta0_02__phi260000.nml"></include>
    <include href="TestL23/cad__beta0_05__phi520000.nml"></include>
    <include href="TestL23/cal.channel.nml"></include>
    <include href="TestL23/cat.channel.nml"></include>
    <include href="TestL23/k2.channel.nml"></include>
    <include href="TestL23/ka.channel.nml"></include>
    <include href="TestL23/kahp_slower.channel.nml"></include>
    <include href="TestL23/kc_fast.channel.nml"></include>
    <include href="TestL23/kdr_fs.channel.nml"></include>
    <include href="TestL23/km.channel.nml"></include>
    <include href="TestL23/naf2__a0__b0__c0__d0__fastNa_shiftmin2_5.channel.nml"></include>
    <include href="TestL23/nap.channel.nml"></include>
    <include href="TestL23/pas.channel.nml"></include>
    <include href="TestL23/SupBasket.cell.nml"></include>
    <include href="TestL23/ar__m00_25.channel.nml"></include>
    <include href="TestL23/cad__beta0_02__phi260000.nml"></include>
    <include href="TestL23/cad__beta0_05__phi520000.nml"></include>
    <include href="TestL23/cal.channel.nml"></include>
    <include href="TestL23/cat.channel.nml"></include>
    <include href="TestL23/k2.channel.nml"></include>
    <include href="TestL23/ka.channel.nml"></include>
    <include href="TestL23/kahp_slower.channel.nml"></include>
    <include href="TestL23/kc_fast.channel.nml"></include>
    <include href="TestL23/kdr_fs.channel.nml"></include>
    <include href="TestL23/km.channel.nml"></include>
    <include href="TestL23/naf2__a0__b0__c0__d0__fastNa_shiftmin2_5.channel.nml"></include>
    <include href="TestL23/nap.channel.nml"></include>
    <include href="TestL23/pas.channel.nml"></include>
    <include href="TestL23/L23PyrRS.cell.nml"></include>
    <include href="TestL23/ar__m00_25.channel.nml"></include>
    <include href="TestL23/cad__beta0_01__phi26000.nml"></include>
    <include href="TestL23/cad__beta0_05__phi52000.nml"></include>
    <include href="TestL23/cal.channel.nml"></include>
    <include href="TestL23/cat.channel.nml"></include>
    <include href="TestL23/k2.channel.nml"></include>
    <include href="TestL23/ka.channel.nml"></include>
    <include href="TestL23/kahp.channel.nml"></include>
    <include href="TestL23/kc.channel.nml"></include>
    <include href="TestL23/kdr.channel.nml"></include>
    <include href="TestL23/km.channel.nml"></include>
    <include href="TestL23/naf__a0__b0__c0__d0__fastNa_shiftmin3_5.channel.nml"></include>
    <include href="TestL23/nap.channel.nml"></include>
    <include href="TestL23/pas.channel.nml"></include>
    <include href="TestL23/Syn_AMPA_SupPyr_SupFS.synapse.nml"></include>
    <include href="TestL23/Syn_AMPA_SupPyr_SupLTS.synapse.nml"></include>
    <include href="TestL23/Syn_AMPA_SupPyr_SupPyr.synapse.nml"></include>
    <include href="TestL23/Syn_GABAA_SupAxAx_SupPyr.synapse.nml"></include>
    <include href="TestL23/Syn_GABAA_SupBask_SupAxAx.synapse.nml"></include>
    <include href="TestL23/Syn_GABAA_SupBask_SupBask.synapse.nml"></include>
    <include href="TestL23/Syn_GABAA_SupBask_SupLTS.synapse.nml"></include>
    <include href="TestL23/Syn_GABAA_SupBask_SupPyr.synapse.nml"></include>
    <include href="TestL23/Syn_GABAA_SupLTS_FS.synapse.nml"></include>
    <include href="TestL23/Syn_GABAA_SupLTS_LTS.synapse.nml"></include>
    <include href="TestL23/Syn_GABAA_SupLTS_SupPyr.synapse.nml"></include>
    <include href="TestL23/Syn_NMDA_RSPyr_SupFS.synapse.nml"></include>
    <include href="TestL23/Syn_NMDA_RSPyr_SupLTS.synapse.nml"></include>
    <include href="TestL23/Syn_NMDA_SupPyr_SupPyr.synapse.nml"></include>
    <include href="TestL23/SynForEctStim.synapse.nml"></include>
    <pulseGenerator id="DepCurr_L23RS_TO_CG3D_L23PyrRS_Pulse0_Cell49" delay="0.000000 ms" duration="20000.000000 ms" amplitude="0.000079 uA"/>
    <pulseGenerator id="DepCurr_L23RS_TO_CG3D_L23PyrRS_Pulse0_Cell37" delay="0.000000 ms" duration="20000.000000 ms" amplitude="0.000099 uA"/>
    <pulseGenerator id="DepCurr_L23RS_TO_CG3D_L23PyrRS_Pulse0_Cell19" delay="0.000000 ms" duration="20000.000000 ms" amplitude="0.000088 uA"/>
    <pulseGenerator id="DepCurr_L23RS_TO_CG3D_L23PyrRS_Pulse0_Cell9" delay="0.000000 ms" duration="20000.000000 ms" amplitude="0.000088 uA"/>
    <pulseGenerator id="DepCurr_L23RS_TO_CG3D_L23PyrRS_Pulse0_Cell33" delay="0.000000 ms" duration="20000.000000 ms" amplitude="0.000063 uA"/>
    <pulseGenerator id="DepCurr_L23RS_TO_CG3D_L23PyrRS_Pulse0_Cell44" delay="0.000000 ms" duration="20000.000000 ms" amplitude="0.000080 uA"/>
    <pulseGenerator id="DepCurr_L23RS_TO_CG3D_L23PyrRS_Pulse0_Cell7" delay="0.000000 ms" duration="20000.000000 ms" amplitude="0.000092 uA"/>
    <pulseGenerator id="DepCurr_L23RS_TO_CG3D_L23PyrRS_Pulse0_Cell20" delay="0.000000 ms" duration="20000.000000 ms" amplitude="0.000076 uA"/>
    <pulseGenerator id="DepCurr_L23RS_TO_CG3D_L23PyrRS_Pulse0_Cell41" delay="0.000000 ms" duration="20000.000000 ms" amplitude="0.000066 uA"/>
    <pulseGenerator id="DepCurr_L23RS_TO_CG3D_L23PyrRS_Pulse0_Cell18" delay="0.000000 ms" duration="20000.000000 ms" amplitude="0.000058 uA"/>
    <pulseGenerator id="DepCurr_L23RS_TO_CG3D_L23PyrRS_Pulse0_Cell26" delay="0.000000 ms" duration="20000.000000 ms" amplitude="0.000066 uA"/>
    <pulseGenerator id="DepCurr_L23RS_TO_CG3D_L23PyrRS_Pulse0_Cell23" delay="0.000000 ms" duration="20000.000000 ms" amplitude="0.000098 uA"/>
    <pulseGenerator id="DepCurr_L23RS_TO_CG3D_L23PyrRS_Pulse0_Cell16" delay="0.000000 ms" duration="20000.000000 ms" amplitude="0.000059 uA"/>
    <pulseGenerator id="DepCurr_L23RS_TO_CG3D_L23PyrRS_Pulse0_Cell22" delay="0.000000 ms" duration="20000.000000 ms" amplitude="0.000092 uA"/>
    <pulseGenerator id="DepCurr_L23RS_TO_CG3D_L23PyrRS_Pulse0_Cell11" delay="0.000000 ms" duration="20000.000000 ms" amplitude="0.000095 uA"/>
    <pulseGenerator id="DepCurr_L23RS_TO_CG3D_L23PyrRS_Pulse0_Cell17" delay="0.000000 ms" duration="20000.000000 ms" amplitude="0.000095 uA"/>
    <pulseGenerator id="DepCurr_L23RS_TO_CG3D_L23PyrRS_Pulse0_Cell3" delay="0.000000 ms" duration="20000.000000 ms" amplitude="0.000063 uA"/>
    <pulseGenerator id="DepCurr_L23RS_TO_CG3D_L23PyrRS_Pulse0_Cell35" delay="0.000000 ms" duration="20000.000000 ms" amplitude="0.000096 uA"/>
    <pulseGenerator id="DepCurr_L23RS_TO_CG3D_L23PyrRS_Pulse0_Cell15" delay="0.000000 ms" duration="20000.000000 ms" amplitude="0.000059 uA"/>
    <pulseGenerator id="DepCurr_L23RS_TO_CG3D_L23PyrRS_Pulse0_Cell46" delay="0.000000 ms" duration="20000.000000 ms" amplitude="0.000080 uA"/>
    <pulseGenerator id="DepCurr_L23RS_TO_CG3D_L23PyrRS_Pulse0_Cell0" delay="0.000000 ms" duration="20000.000000 ms" amplitude="0.000086 uA"/>
    <pulseGenerator id="DepCurr_L23RS_TO_CG3D_L23PyrRS_Pulse0_Cell21" delay="0.000000 ms" duration="20000.000000 ms" amplitude="0.000058 uA"/>
    <pulseGenerator id="DepCurr_L23RS_TO_CG3D_L23PyrRS_Pulse0_Cell34" delay="0.000000 ms" duration="20000.000000 ms" amplitude="0.000072 uA"/>
    <pulseGenerator id="DepCurr_L23RS_TO_CG3D_L23PyrRS_Pulse0_Cell14" delay="0.000000 ms" duration="20000.000000 ms" amplitude="0.000089 uA"/>
    <pulseGenerator id="DepCurr_L23RS_TO_CG3D_L23PyrRS_Pulse0_Cell1" delay="0.000000 ms" duration="20000.000000 ms" amplitude="0.000099 uA"/>
    <pulseGenerator id="DepCurr_L23RS_TO_CG3D_L23PyrRS_Pulse0_Cell8" delay="0.000000 ms" duration="20000.000000 ms" amplitude="0.000057 uA"/>
    <pulseGenerator id="DepCurr_L23RS_TO_CG3D_L23PyrRS_Pulse0_Cell2" delay="0.000000 ms" duration="20000.000000 ms" amplitude="0.000092 uA"/>
    <pulseGenerator id="DepCurr_L23RS_TO_CG3D_L23PyrRS_Pulse0_Cell42" delay="0.000000 ms" duration="20000.000000 ms" amplitude="0.000075 uA"/>
    <pulseGenerator id="DepCurr_L23RS_TO_CG3D_L23PyrRS_Pulse0_Cell38" delay="0.000000 ms" duration="20000.000000 ms" amplitude="0.000088 uA"/>
    <pulseGenerator id="DepCurr_L23RS_TO_CG3D_L23PyrRS_Pulse0_Cell43" delay="0.000000 ms" duration="20000.000000 ms" amplitude="0.000086 uA"/>
    <pulseGenerator id="DepCurr_L23RS_TO_CG3D_L23PyrRS_Pulse0_Cell36" delay="0.000000 ms" duration="20000.000000 ms" amplitude="0.000067 uA"/>
    <pulseGenerator id="DepCurr_L23RS_TO_CG3D_L23PyrRS_Pulse0_Cell48" delay="0.000000 ms" duration="20000.000000 ms" amplitude="0.000055 uA"/>
    <pulseGenerator id="DepCurr_L23RS_TO_CG3D_L23PyrRS_Pulse0_Cell12" delay="0.000000 ms" duration="20000.000000 ms" amplitude="0.000061 uA"/>
    <pulseGenerator id="DepCurr_L23RS_TO_CG3D_L23PyrRS_Pulse0_Cell27" delay="0.000000 ms" duration="20000.000000 ms" amplitude="0.000099 uA"/>
    <pulseGenerator id="DepCurr_L23RS_TO_CG3D_L23PyrRS_Pulse0_Cell31" delay="0.000000 ms" duration="20000.000000 ms" amplitude="0.000088 uA"/>
    <pulseGenerator id="DepCurr_L23RS_TO_CG3D_L23PyrRS_Pulse0_Cell4" delay="0.000000 ms" duration="20000.000000 ms" amplitude="0.000094 uA"/>
    <pulseGenerator id="DepCurr_L23RS_TO_CG3D_L23PyrRS_Pulse0_Cell28" delay="0.000000 ms" duration="20000.000000 ms" amplitude="0.000052 uA"/>
    <pulseGenerator id="DepCurr_L23RS_TO_CG3D_L23PyrRS_Pulse0_Cell40" delay="0.000000 ms" duration="20000.000000 ms" amplitude="0.000063 uA"/>
    <pulseGenerator id="DepCurr_L23RS_TO_CG3D_L23PyrRS_Pulse0_Cell6" delay="0.000000 ms" duration="20000.000000 ms" amplitude="0.000099 uA"/>
    <pulseGenerator id="DepCurr_L23RS_TO_CG3D_L23PyrRS_Pulse0_Cell29" delay="0.000000 ms" duration="20000.000000 ms" amplitude="0.000069 uA"/>
    <pulseGenerator id="DepCurr_L23RS_TO_CG3D_L23PyrRS_Pulse0_Cell47" delay="0.000000 ms" duration="20000.000000 ms" amplitude="0.000095 uA"/>
    <pulseGenerator id="DepCurr_L23RS_TO_CG3D_L23PyrRS_Pulse0_Cell45" delay="0.000000 ms" duration="20000.000000 ms" amplitude="0.000059 uA"/>
    <pulseGenerator id="DepCurr_L23RS_TO_CG3D_L23PyrRS_Pulse0_Cell30" delay="0.000000 ms" duration="20000.000000 ms" amplitude="0.000083 uA"/>
    <pulseGenerator id="DepCurr_L23RS_TO_CG3D_L23PyrRS_Pulse0_Cell24" delay="0.000000 ms" duration="20000.000000 ms" amplitude="0.000072 uA"/>
    <pulseGenerator id="DepCurr_L23RS_TO_CG3D_L23PyrRS_Pulse0_Cell39" delay="0.000000 ms" duration="20000.000000 ms" amplitude="0.000082 uA"/>
    <pulseGenerator id="DepCurr_L23RS_TO_CG3D_L23PyrRS_Pulse0_Cell10" delay="0.000000 ms" duration="20000.000000 ms" amplitude="0.000080 uA"/>
    <pulseGenerator id="DepCurr_L23RS_TO_CG3D_L23PyrRS_Pulse0_Cell5" delay="0.000000 ms" duration="20000.000000 ms" amplitude="0.000100 uA"/>
    <pulseGenerator id="DepCurr_L23RS_TO_CG3D_L23PyrRS_Pulse0_Cell25" delay="0.000000 ms" duration="20000.000000 ms" amplitude="0.000069 uA"/>
    <pulseGenerator id="DepCurr_L23RS_TO_CG3D_L23PyrRS_Pulse0_Cell32" delay="0.000000 ms" duration="20000.000000 ms" amplitude="0.000088 uA"/>
    <pulseGenerator id="DepCurr_L23RS_TO_CG3D_L23PyrRS_Pulse0_Cell13" delay="0.000000 ms" duration="20000.000000 ms" amplitude="0.000076 uA"/>
    <poissonFiringSynapse id="BackgroundL23RS_TO_CG3D_L23PyrRS_PoiSyn0" averageRate="100.000000 Hz" synapse="Syn_AMPA_SupPyr_SupPyr" spikeTarget="./Syn_AMPA_SupPyr_SupPyr"/>
    <poissonFiringSynapse id="EctopicStimL23RS_TO_CG3D_L23PyrRS_PoiSyn0" averageRate="0.100000 Hz" synapse="SynForEctStim" spikeTarget="./SynForEctStim"/>
    <network id="TestL23" type="networkWithTemperature" temperature="32degC">
        <population id="CG3D_L23PyrRS" component="L23PyrRS" size="50" type="populationList">
            <instance id="0">
                <location x="-158.841310297000007" y="-430.118999579999979" z="10.9331207863"/>
            </instance>
            <instance id="1">
                <location x="141.792475313000011" y="-291.860215211000025" z="151.145387168000013"/>
            </instance>
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        </population>
        <population id="CG3D_SupAxAx" component="SupAxAx" size="5" type="populationList">
            <instance id="0">
                <location x="-29.054746185799999" y="-20.440150602999999" z="97.451226030800001"/>
            </instance>
            <instance id="1">
                <location x="72.1296041911" y="-246.025888455" z="42.704133150899999"/>
            </instance>
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        </population>
        <population id="CG3D_SupLTS" component="SupLTSInter" size="5" type="populationList">
            <instance id="0">
                <location x="-43.811865240000003" y="-142.403264766000007" z="-83.074437155699997"/>
            </instance>
            <instance id="1">
                <location x="-35.612914633700001" y="-483.729153037999993" z="194.109146857000013"/>
            </instance>
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        </population>
        <population id="CG3D_SupBask" component="SupBasket" size="5" type="populationList">
            <instance id="0">
                <location x="-32.728382592300001" y="-88.560442139499997" z="237.958732344999987"/>
            </instance>
            <instance id="1">
                <location x="-207.194149600000003" y="-467.721533908000026" z="73.273682016500004"/>
            </instance>
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        </population>
        <projection id="Proj0syn0_CG3D_L23PyrRS_CG3D_L23PyrRS" presynapticPopulation="CG3D_L23PyrRS" postsynapticPopulation="CG3D_L23PyrRS" synapse="Syn_AMPA_SupPyr_SupPyr">
            <connectionWD id="0" preCellId="../CG3D_L23PyrRS/9/L23PyrRS" preSegmentId="142" preFractionAlong="0.460150762419" postCellId="../CG3D_L23PyrRS/0/L23PyrRS" postSegmentId="30" postFractionAlong="0.605912819252" weight="1." delay="0.05 ms"/>
            <connectionWD id="1" preCellId="../CG3D_L23PyrRS/37/L23PyrRS" preSegmentId="142" preFractionAlong="0.706576391356" postCellId="../CG3D_L23PyrRS/0/L23PyrRS" postSegmentId="9" postFractionAlong="0.0527187084845" weight="1." delay="0.05 ms"/>
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        </projection>
        <projection id="Proj0syn1_CG3D_L23PyrRS_CG3D_L23PyrRS" presynapticPopulation="CG3D_L23PyrRS" postsynapticPopulation="CG3D_L23PyrRS" synapse="Syn_NMDA_SupPyr_SupPyr">
            <connectionWD id="0" preCellId="../CG3D_L23PyrRS/9/L23PyrRS" preSegmentId="142" preFractionAlong="0.460150762419" postCellId="../CG3D_L23PyrRS/0/L23PyrRS" postSegmentId="30" postFractionAlong="0.605912819252" weight="1." delay="0.05 ms"/>
            <connectionWD id="1" preCellId="../CG3D_L23PyrRS/37/L23PyrRS" preSegmentId="142" preFractionAlong="0.706576391356" postCellId="../CG3D_L23PyrRS/0/L23PyrRS" postSegmentId="9" postFractionAlong="0.0527187084845" weight="1." delay="0.05 ms"/>
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        </projection>
        <projection id="Proj2syn0_CG3D_L23PyrRS_CG3D_SupAxAx" presynapticPopulation="CG3D_L23PyrRS" postsynapticPopulation="CG3D_SupAxAx" synapse="Syn_NMDA_RSPyr_SupFS">
            <connectionWD id="0" preCellId="../CG3D_L23PyrRS/37/L23PyrRS" preSegmentId="142" preFractionAlong="0.766082275206" postCellId="../CG3D_SupAxAx/0/SupAxAx" postSegmentId="16" postFractionAlong="0.0485899310343" weight="2.5" delay="0.05 ms"/>
            <connectionWD id="1" preCellId="../CG3D_L23PyrRS/6/L23PyrRS" preSegmentId="143" preFractionAlong="0.670070236686" postCellId="../CG3D_SupAxAx/0/SupAxAx" postSegmentId="69" postFractionAlong="0.396952147226" weight="2.5" delay="0.05 ms"/>
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        </projection>
        <projection id="Proj2syn1_CG3D_L23PyrRS_CG3D_SupAxAx" presynapticPopulation="CG3D_L23PyrRS" postsynapticPopulation="CG3D_SupAxAx" synapse="Syn_AMPA_SupPyr_SupFS">
            <connectionWD id="0" preCellId="../CG3D_L23PyrRS/37/L23PyrRS" preSegmentId="142" preFractionAlong="0.766082275206" postCellId="../CG3D_SupAxAx/0/SupAxAx" postSegmentId="16" postFractionAlong="0.0485899310343" weight="1." delay="0.05 ms"/>
            <connectionWD id="1" preCellId="../CG3D_L23PyrRS/6/L23PyrRS" preSegmentId="143" preFractionAlong="0.670070236686" postCellId="../CG3D_SupAxAx/0/SupAxAx" postSegmentId="69" postFractionAlong="0.396952147226" weight="1." delay="0.05 ms"/>
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        </projection>
        <projection id="Proj3syn0_CG3D_L23PyrRS_CG3D_SupLTS" presynapticPopulation="CG3D_L23PyrRS" postsynapticPopulation="CG3D_SupLTS" synapse="Syn_NMDA_RSPyr_SupLTS">
            <connectionWD id="0" preCellId="../CG3D_L23PyrRS/21/L23PyrRS" preSegmentId="146" preFractionAlong="0.966639084979" postCellId="../CG3D_SupLTS/0/SupLTSInter" postSegmentId="15" postFractionAlong="0.181274712169" weight="2.5" delay="0.05 ms"/>
            <connectionWD id="1" preCellId="../CG3D_L23PyrRS/6/L23PyrRS" preSegmentId="142" preFractionAlong="0.870911353608" postCellId="../CG3D_SupLTS/0/SupLTSInter" postSegmentId="16" postFractionAlong="0.861707250138" weight="2.5" delay="0.05 ms"/>
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        </projection>
        <projection id="Proj3syn1_CG3D_L23PyrRS_CG3D_SupLTS" presynapticPopulation="CG3D_L23PyrRS" postsynapticPopulation="CG3D_SupLTS" synapse="Syn_AMPA_SupPyr_SupLTS">
            <connectionWD id="0" preCellId="../CG3D_L23PyrRS/21/L23PyrRS" preSegmentId="146" preFractionAlong="0.966639084979" postCellId="../CG3D_SupLTS/0/SupLTSInter" postSegmentId="15" postFractionAlong="0.181274712169" weight="1." delay="0.05 ms"/>
            <connectionWD id="1" preCellId="../CG3D_L23PyrRS/6/L23PyrRS" preSegmentId="142" preFractionAlong="0.870911353608" postCellId="../CG3D_SupLTS/0/SupLTSInter" postSegmentId="16" postFractionAlong="0.861707250138" weight="1." delay="0.05 ms"/>
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        </projection>
        <projection id="Proj4syn0_CG3D_L23PyrRS_CG3D_SupBask" presynapticPopulation="CG3D_L23PyrRS" postsynapticPopulation="CG3D_SupBask" synapse="Syn_NMDA_RSPyr_SupFS">
            <connectionWD id="0" preCellId="../CG3D_L23PyrRS/39/L23PyrRS" preSegmentId="147" preFractionAlong="0.625909458236" postCellId="../CG3D_SupBask/0/SupBasket" postSegmentId="61" postFractionAlong="0.746708590109" weight="2.5" delay="0.05 ms"/>
            <connectionWD id="1" preCellId="../CG3D_L23PyrRS/23/L23PyrRS" preSegmentId="146" preFractionAlong="0.821241642535" postCellId="../CG3D_SupBask/0/SupBasket" postSegmentId="12" postFractionAlong="0.627308974388" weight="2.5" delay="0.05 ms"/>
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        </projection>
        <projection id="Proj4syn1_CG3D_L23PyrRS_CG3D_SupBask" presynapticPopulation="CG3D_L23PyrRS" postsynapticPopulation="CG3D_SupBask" synapse="Syn_AMPA_SupPyr_SupFS">
            <connectionWD id="0" preCellId="../CG3D_L23PyrRS/39/L23PyrRS" preSegmentId="147" preFractionAlong="0.625909458236" postCellId="../CG3D_SupBask/0/SupBasket" postSegmentId="61" postFractionAlong="0.746708590109" weight="1." delay="0.05 ms"/>
            <connectionWD id="1" preCellId="../CG3D_L23PyrRS/23/L23PyrRS" preSegmentId="146" preFractionAlong="0.821241642535" postCellId="../CG3D_SupBask/0/SupBasket" postSegmentId="12" postFractionAlong="0.627308974388" weight="1." delay="0.05 ms"/>
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        </projection>
        <projection id="Proj5syn0_CG3D_SupAxAx_CG3D_L23PyrRS" presynapticPopulation="CG3D_SupAxAx" postsynapticPopulation="CG3D_L23PyrRS" synapse="Syn_GABAA_SupAxAx_SupPyr">
            <connectionWD id="0" preCellId="../CG3D_SupAxAx/2/SupAxAx" preSegmentId="116" preFractionAlong="0.339776510781" postCellId="../CG3D_L23PyrRS/0/L23PyrRS" postSegmentId="137" postFractionAlong="0.683643880428" weight="1." delay="0.05 ms"/>
            <connectionWD id="1" preCellId="../CG3D_SupAxAx/1/SupAxAx" preSegmentId="113" preFractionAlong="0.572645480747" postCellId="../CG3D_L23PyrRS/0/L23PyrRS" postSegmentId="136" postFractionAlong="0.781519148963" weight="1." delay="0.05 ms"/>
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        </projection>
        <projection id="Proj6syn0_CG3D_SupLTS_CG3D_L23PyrRS" presynapticPopulation="CG3D_SupLTS" postsynapticPopulation="CG3D_L23PyrRS" synapse="Syn_GABAA_SupLTS_SupPyr">
            <connectionWD id="0" preCellId="../CG3D_SupLTS/1/SupLTSInter" preSegmentId="112" preFractionAlong="0.129925465798" postCellId="../CG3D_L23PyrRS/0/L23PyrRS" postSegmentId="129" postFractionAlong="0.510243853014" weight="1." delay="0.05 ms"/>
            <connectionWD id="1" preCellId="../CG3D_SupLTS/0/SupLTSInter" preSegmentId="112" preFractionAlong="0.137610875436" postCellId="../CG3D_L23PyrRS/0/L23PyrRS" postSegmentId="93" postFractionAlong="0.676066823792" weight="1." delay="0.05 ms"/>
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        </projection>
        <projection id="Proj7syn0_CG3D_SupLTS_CG3D_SupAxAx" presynapticPopulation="CG3D_SupLTS" postsynapticPopulation="CG3D_SupAxAx" synapse="Syn_GABAA_SupLTS_FS">
            <connectionWD id="0" preCellId="../CG3D_SupLTS/4/SupLTSInter" preSegmentId="112" preFractionAlong="0.644407535425" postCellId="../CG3D_SupAxAx/0/SupAxAx" postSegmentId="99" postFractionAlong="0.609900498491" weight="1." delay="0.05 ms"/>
            <connectionWD id="1" preCellId="../CG3D_SupLTS/3/SupLTSInter" preSegmentId="112" preFractionAlong="0.878932465325" postCellId="../CG3D_SupAxAx/0/SupAxAx" postSegmentId="92" postFractionAlong="0.497871026183" weight="1." delay="0.05 ms"/>
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        </projection>
        <projection id="Proj8syn0_CG3D_SupLTS_CG3D_SupLTS" presynapticPopulation="CG3D_SupLTS" postsynapticPopulation="CG3D_SupLTS" synapse="Syn_GABAA_SupLTS_LTS">
            <connectionWD id="0" preCellId="../CG3D_SupLTS/2/SupLTSInter" preSegmentId="112" preFractionAlong="0.34918570365" postCellId="../CG3D_SupLTS/0/SupLTSInter" postSegmentId="93" postFractionAlong="0.404102945738" weight="1." delay="0.05 ms"/>
            <connectionWD id="1" preCellId="../CG3D_SupLTS/2/SupLTSInter" preSegmentId="112" preFractionAlong="0.778252780052" postCellId="../CG3D_SupLTS/0/SupLTSInter" postSegmentId="47" postFractionAlong="0.985312792586" weight="1." delay="0.05 ms"/>
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        </projection>
        <projection id="Proj10syn0_CG3D_SupLTS_CG3D_SupBask" presynapticPopulation="CG3D_SupLTS" postsynapticPopulation="CG3D_SupBask" synapse="Syn_GABAA_SupLTS_FS">
            <connectionWD id="0" preCellId="../CG3D_SupLTS/2/SupLTSInter" preSegmentId="116" preFractionAlong="0.887116114708" postCellId="../CG3D_SupBask/0/SupBasket" postSegmentId="90" postFractionAlong="0.19619126404" weight="1." delay="0.05 ms"/>
            <connectionWD id="1" preCellId="../CG3D_SupLTS/0/SupLTSInter" preSegmentId="113" preFractionAlong="0.600305744906" postCellId="../CG3D_SupBask/0/SupBasket" postSegmentId="36" postFractionAlong="0.42471108183" weight="1." delay="0.05 ms"/>
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        </projection>
        <projection id="Proj11syn0_CG3D_SupBask_CG3D_L23PyrRS" presynapticPopulation="CG3D_SupBask" postsynapticPopulation="CG3D_L23PyrRS" synapse="Syn_GABAA_SupBask_SupPyr">
            <connectionWD id="0" preCellId="../CG3D_SupBask/3/SupBasket" preSegmentId="113" preFractionAlong="0.961541164684" postCellId="../CG3D_L23PyrRS/0/L23PyrRS" postSegmentId="9" postFractionAlong="0.509313902533" weight="1." delay="0.05 ms"/>
            <connectionWD id="1" preCellId="../CG3D_SupBask/2/SupBasket" preSegmentId="112" preFractionAlong="0.838983116642" postCellId="../CG3D_L23PyrRS/0/L23PyrRS" postSegmentId="77" postFractionAlong="0.531491381424" weight="1." delay="0.05 ms"/>
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        </projection>
        <projection id="Proj12syn0_CG3D_SupBask_CG3D_SupAxAx" presynapticPopulation="CG3D_SupBask" postsynapticPopulation="CG3D_SupAxAx" synapse="Syn_GABAA_SupBask_SupAxAx">
            <connectionWD id="0" preCellId="../CG3D_SupBask/4/SupBasket" preSegmentId="112" preFractionAlong="0.474529244076" postCellId="../CG3D_SupAxAx/0/SupAxAx" postSegmentId="16" postFractionAlong="0.00563964490042" weight="1." delay="0.05 ms"/>
            <connectionWD id="1" preCellId="../CG3D_SupBask/4/SupBasket" preSegmentId="117" preFractionAlong="0.211456031694" postCellId="../CG3D_SupAxAx/0/SupAxAx" postSegmentId="18" postFractionAlong="0.645442730384" weight="1." delay="0.05 ms"/>
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        </projection>
        <projection id="Proj13syn0_CG3D_SupBask_CG3D_SupLTS" presynapticPopulation="CG3D_SupBask" postsynapticPopulation="CG3D_SupLTS" synapse="Syn_GABAA_SupBask_SupLTS">
            <connectionWD id="0" preCellId="../CG3D_SupBask/1/SupBasket" preSegmentId="112" preFractionAlong="0.41608718385" postCellId="../CG3D_SupLTS/0/SupLTSInter" postSegmentId="92" postFractionAlong="0.724024996033" weight="1." delay="0.05 ms"/>
            <connectionWD id="1" preCellId="../CG3D_SupBask/0/SupBasket" preSegmentId="117" preFractionAlong="0.744066043147" postCellId="../CG3D_SupLTS/0/SupLTSInter" postSegmentId="41" postFractionAlong="0.560954830574" weight="1." delay="0.05 ms"/>
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        </projection>
        <projection id="Proj14syn0_CG3D_SupBask_CG3D_SupBask" presynapticPopulation="CG3D_SupBask" postsynapticPopulation="CG3D_SupBask" synapse="Syn_GABAA_SupBask_SupBask">
            <connectionWD id="0" preCellId="../CG3D_SupBask/4/SupBasket" preSegmentId="112" preFractionAlong="0.803090642654" postCellId="../CG3D_SupBask/0/SupBasket" postSegmentId="41" postFractionAlong="0.789892192192" weight="1." delay="0.05 ms"/>
            <connectionWD id="1" preCellId="../CG3D_SupBask/2/SupBasket" preSegmentId="112" preFractionAlong="0.630951181039" postCellId="../CG3D_SupBask/0/SupBasket" postSegmentId="13" postFractionAlong="0.57175132434" weight="1." delay="0.05 ms"/>
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        </projection>
        <inputList id="DepCurr_L23RS_TO_CG3D_L23PyrRS_0_0" population="CG3D_L23PyrRS" component="DepCurr_L23RS_TO_CG3D_L23PyrRS_Pulse0_Cell49">
            <input id="0" target="../CG3D_L23PyrRS/49/L23PyrRS" destination="synapses" segmentId="0" fractionAlong="0.500000"/>
        </inputList>
        <inputList id="DepCurr_L23RS_TO_CG3D_L23PyrRS_1_0" population="CG3D_L23PyrRS" component="DepCurr_L23RS_TO_CG3D_L23PyrRS_Pulse0_Cell37">
            <input id="0" target="../CG3D_L23PyrRS/37/L23PyrRS" destination="synapses" segmentId="0" fractionAlong="0.500000"/>
        </inputList>
        <inputList id="DepCurr_L23RS_TO_CG3D_L23PyrRS_2_0" population="CG3D_L23PyrRS" component="DepCurr_L23RS_TO_CG3D_L23PyrRS_Pulse0_Cell19">
            <input id="0" target="../CG3D_L23PyrRS/19/L23PyrRS" destination="synapses" segmentId="0" fractionAlong="0.500000"/>
        </inputList>
        <inputList id="DepCurr_L23RS_TO_CG3D_L23PyrRS_3_0" population="CG3D_L23PyrRS" component="DepCurr_L23RS_TO_CG3D_L23PyrRS_Pulse0_Cell9">
            <input id="0" target="../CG3D_L23PyrRS/9/L23PyrRS" destination="synapses" segmentId="0" fractionAlong="0.500000"/>
        </inputList>
        <inputList id="DepCurr_L23RS_TO_CG3D_L23PyrRS_4_0" population="CG3D_L23PyrRS" component="DepCurr_L23RS_TO_CG3D_L23PyrRS_Pulse0_Cell33">
            <input id="0" target="../CG3D_L23PyrRS/33/L23PyrRS" destination="synapses" segmentId="0" fractionAlong="0.500000"/>
        </inputList>
        <inputList id="DepCurr_L23RS_TO_CG3D_L23PyrRS_5_0" population="CG3D_L23PyrRS" component="DepCurr_L23RS_TO_CG3D_L23PyrRS_Pulse0_Cell44">
            <input id="0" target="../CG3D_L23PyrRS/44/L23PyrRS" destination="synapses" segmentId="0" fractionAlong="0.500000"/>
        </inputList>
        <inputList id="DepCurr_L23RS_TO_CG3D_L23PyrRS_6_0" population="CG3D_L23PyrRS" component="DepCurr_L23RS_TO_CG3D_L23PyrRS_Pulse0_Cell7">
            <input id="0" target="../CG3D_L23PyrRS/7/L23PyrRS" destination="synapses" segmentId="0" fractionAlong="0.500000"/>
        </inputList>
        <inputList id="DepCurr_L23RS_TO_CG3D_L23PyrRS_7_0" population="CG3D_L23PyrRS" component="DepCurr_L23RS_TO_CG3D_L23PyrRS_Pulse0_Cell20">
            <input id="0" target="../CG3D_L23PyrRS/20/L23PyrRS" destination="synapses" segmentId="0" fractionAlong="0.500000"/>
        </inputList>
        <inputList id="DepCurr_L23RS_TO_CG3D_L23PyrRS_8_0" population="CG3D_L23PyrRS" component="DepCurr_L23RS_TO_CG3D_L23PyrRS_Pulse0_Cell41">
            <input id="0" target="../CG3D_L23PyrRS/41/L23PyrRS" destination="synapses" segmentId="0" fractionAlong="0.500000"/>
        </inputList>
        <inputList id="DepCurr_L23RS_TO_CG3D_L23PyrRS_9_0" population="CG3D_L23PyrRS" component="DepCurr_L23RS_TO_CG3D_L23PyrRS_Pulse0_Cell18">
            <input id="0" target="../CG3D_L23PyrRS/18/L23PyrRS" destination="synapses" segmentId="0" fractionAlong="0.500000"/>
        </inputList>
        <inputList id="DepCurr_L23RS_TO_CG3D_L23PyrRS_10_0" population="CG3D_L23PyrRS" component="DepCurr_L23RS_TO_CG3D_L23PyrRS_Pulse0_Cell26">
            <input id="0" target="../CG3D_L23PyrRS/26/L23PyrRS" destination="synapses" segmentId="0" fractionAlong="0.500000"/>
        </inputList>
        <inputList id="DepCurr_L23RS_TO_CG3D_L23PyrRS_11_0" population="CG3D_L23PyrRS" component="DepCurr_L23RS_TO_CG3D_L23PyrRS_Pulse0_Cell23">
            <input id="0" target="../CG3D_L23PyrRS/23/L23PyrRS" destination="synapses" segmentId="0" fractionAlong="0.500000"/>
        </inputList>
        <inputList id="DepCurr_L23RS_TO_CG3D_L23PyrRS_12_0" population="CG3D_L23PyrRS" component="DepCurr_L23RS_TO_CG3D_L23PyrRS_Pulse0_Cell16">
            <input id="0" target="../CG3D_L23PyrRS/16/L23PyrRS" destination="synapses" segmentId="0" fractionAlong="0.500000"/>
        </inputList>
        <inputList id="DepCurr_L23RS_TO_CG3D_L23PyrRS_13_0" population="CG3D_L23PyrRS" component="DepCurr_L23RS_TO_CG3D_L23PyrRS_Pulse0_Cell22">
            <input id="0" target="../CG3D_L23PyrRS/22/L23PyrRS" destination="synapses" segmentId="0" fractionAlong="0.500000"/>
        </inputList>
        <inputList id="DepCurr_L23RS_TO_CG3D_L23PyrRS_14_0" population="CG3D_L23PyrRS" component="DepCurr_L23RS_TO_CG3D_L23PyrRS_Pulse0_Cell11">
            <input id="0" target="../CG3D_L23PyrRS/11/L23PyrRS" destination="synapses" segmentId="0" fractionAlong="0.500000"/>
        </inputList>
        <inputList id="DepCurr_L23RS_TO_CG3D_L23PyrRS_15_0" population="CG3D_L23PyrRS" component="DepCurr_L23RS_TO_CG3D_L23PyrRS_Pulse0_Cell17">
            <input id="0" target="../CG3D_L23PyrRS/17/L23PyrRS" destination="synapses" segmentId="0" fractionAlong="0.500000"/>
        </inputList>
        <inputList id="DepCurr_L23RS_TO_CG3D_L23PyrRS_16_0" population="CG3D_L23PyrRS" component="DepCurr_L23RS_TO_CG3D_L23PyrRS_Pulse0_Cell3">
            <input id="0" target="../CG3D_L23PyrRS/3/L23PyrRS" destination="synapses" segmentId="0" fractionAlong="0.500000"/>
        </inputList>
        <inputList id="DepCurr_L23RS_TO_CG3D_L23PyrRS_17_0" population="CG3D_L23PyrRS" component="DepCurr_L23RS_TO_CG3D_L23PyrRS_Pulse0_Cell35">
            <input id="0" target="../CG3D_L23PyrRS/35/L23PyrRS" destination="synapses" segmentId="0" fractionAlong="0.500000"/>
        </inputList>
        <inputList id="DepCurr_L23RS_TO_CG3D_L23PyrRS_18_0" population="CG3D_L23PyrRS" component="DepCurr_L23RS_TO_CG3D_L23PyrRS_Pulse0_Cell15">
            <input id="0" target="../CG3D_L23PyrRS/15/L23PyrRS" destination="synapses" segmentId="0" fractionAlong="0.500000"/>
        </inputList>
        <inputList id="DepCurr_L23RS_TO_CG3D_L23PyrRS_19_0" population="CG3D_L23PyrRS" component="DepCurr_L23RS_TO_CG3D_L23PyrRS_Pulse0_Cell46">
            <input id="0" target="../CG3D_L23PyrRS/46/L23PyrRS" destination="synapses" segmentId="0" fractionAlong="0.500000"/>
        </inputList>
        <inputList id="DepCurr_L23RS_TO_CG3D_L23PyrRS_20_0" population="CG3D_L23PyrRS" component="DepCurr_L23RS_TO_CG3D_L23PyrRS_Pulse0_Cell0">
            <input id="0" target="../CG3D_L23PyrRS/0/L23PyrRS" destination="synapses" segmentId="0" fractionAlong="0.500000"/>
        </inputList>
        <inputList id="DepCurr_L23RS_TO_CG3D_L23PyrRS_21_0" population="CG3D_L23PyrRS" component="DepCurr_L23RS_TO_CG3D_L23PyrRS_Pulse0_Cell21">
            <input id="0" target="../CG3D_L23PyrRS/21/L23PyrRS" destination="synapses" segmentId="0" fractionAlong="0.500000"/>
        </inputList>
        <inputList id="DepCurr_L23RS_TO_CG3D_L23PyrRS_22_0" population="CG3D_L23PyrRS" component="DepCurr_L23RS_TO_CG3D_L23PyrRS_Pulse0_Cell34">
            <input id="0" target="../CG3D_L23PyrRS/34/L23PyrRS" destination="synapses" segmentId="0" fractionAlong="0.500000"/>
        </inputList>
        <inputList id="DepCurr_L23RS_TO_CG3D_L23PyrRS_23_0" population="CG3D_L23PyrRS" component="DepCurr_L23RS_TO_CG3D_L23PyrRS_Pulse0_Cell14">
            <input id="0" target="../CG3D_L23PyrRS/14/L23PyrRS" destination="synapses" segmentId="0" fractionAlong="0.500000"/>
        </inputList>
        <inputList id="DepCurr_L23RS_TO_CG3D_L23PyrRS_24_0" population="CG3D_L23PyrRS" component="DepCurr_L23RS_TO_CG3D_L23PyrRS_Pulse0_Cell1">
            <input id="0" target="../CG3D_L23PyrRS/1/L23PyrRS" destination="synapses" segmentId="0" fractionAlong="0.500000"/>
        </inputList>
        <inputList id="DepCurr_L23RS_TO_CG3D_L23PyrRS_25_0" population="CG3D_L23PyrRS" component="DepCurr_L23RS_TO_CG3D_L23PyrRS_Pulse0_Cell8">
            <input id="0" target="../CG3D_L23PyrRS/8/L23PyrRS" destination="synapses" segmentId="0" fractionAlong="0.500000"/>
        </inputList>
        <inputList id="DepCurr_L23RS_TO_CG3D_L23PyrRS_26_0" population="CG3D_L23PyrRS" component="DepCurr_L23RS_TO_CG3D_L23PyrRS_Pulse0_Cell2">
            <input id="0" target="../CG3D_L23PyrRS/2/L23PyrRS" destination="synapses" segmentId="0" fractionAlong="0.500000"/>
        </inputList>
        <inputList id="DepCurr_L23RS_TO_CG3D_L23PyrRS_27_0" population="CG3D_L23PyrRS" component="DepCurr_L23RS_TO_CG3D_L23PyrRS_Pulse0_Cell42">
            <input id="0" target="../CG3D_L23PyrRS/42/L23PyrRS" destination="synapses" segmentId="0" fractionAlong="0.500000"/>
        </inputList>
        <inputList id="DepCurr_L23RS_TO_CG3D_L23PyrRS_28_0" population="CG3D_L23PyrRS" component="DepCurr_L23RS_TO_CG3D_L23PyrRS_Pulse0_Cell38">
            <input id="0" target="../CG3D_L23PyrRS/38/L23PyrRS" destination="synapses" segmentId="0" fractionAlong="0.500000"/>
        </inputList>
        <inputList id="DepCurr_L23RS_TO_CG3D_L23PyrRS_29_0" population="CG3D_L23PyrRS" component="DepCurr_L23RS_TO_CG3D_L23PyrRS_Pulse0_Cell43">
            <input id="0" target="../CG3D_L23PyrRS/43/L23PyrRS" destination="synapses" segmentId="0" fractionAlong="0.500000"/>
        </inputList>
        <inputList id="DepCurr_L23RS_TO_CG3D_L23PyrRS_30_0" population="CG3D_L23PyrRS" component="DepCurr_L23RS_TO_CG3D_L23PyrRS_Pulse0_Cell36">
            <input id="0" target="../CG3D_L23PyrRS/36/L23PyrRS" destination="synapses" segmentId="0" fractionAlong="0.500000"/>
        </inputList>
        <inputList id="DepCurr_L23RS_TO_CG3D_L23PyrRS_31_0" population="CG3D_L23PyrRS" component="DepCurr_L23RS_TO_CG3D_L23PyrRS_Pulse0_Cell48">
            <input id="0" target="../CG3D_L23PyrRS/48/L23PyrRS" destination="synapses" segmentId="0" fractionAlong="0.500000"/>
        </inputList>
        <inputList id="DepCurr_L23RS_TO_CG3D_L23PyrRS_32_0" population="CG3D_L23PyrRS" component="DepCurr_L23RS_TO_CG3D_L23PyrRS_Pulse0_Cell12">
            <input id="0" target="../CG3D_L23PyrRS/12/L23PyrRS" destination="synapses" segmentId="0" fractionAlong="0.500000"/>
        </inputList>
        <inputList id="DepCurr_L23RS_TO_CG3D_L23PyrRS_33_0" population="CG3D_L23PyrRS" component="DepCurr_L23RS_TO_CG3D_L23PyrRS_Pulse0_Cell27">
            <input id="0" target="../CG3D_L23PyrRS/27/L23PyrRS" destination="synapses" segmentId="0" fractionAlong="0.500000"/>
        </inputList>
        <inputList id="DepCurr_L23RS_TO_CG3D_L23PyrRS_34_0" population="CG3D_L23PyrRS" component="DepCurr_L23RS_TO_CG3D_L23PyrRS_Pulse0_Cell31">
            <input id="0" target="../CG3D_L23PyrRS/31/L23PyrRS" destination="synapses" segmentId="0" fractionAlong="0.500000"/>
        </inputList>
        <inputList id="DepCurr_L23RS_TO_CG3D_L23PyrRS_35_0" population="CG3D_L23PyrRS" component="DepCurr_L23RS_TO_CG3D_L23PyrRS_Pulse0_Cell4">
            <input id="0" target="../CG3D_L23PyrRS/4/L23PyrRS" destination="synapses" segmentId="0" fractionAlong="0.500000"/>
        </inputList>
        <inputList id="DepCurr_L23RS_TO_CG3D_L23PyrRS_36_0" population="CG3D_L23PyrRS" component="DepCurr_L23RS_TO_CG3D_L23PyrRS_Pulse0_Cell28">
            <input id="0" target="../CG3D_L23PyrRS/28/L23PyrRS" destination="synapses" segmentId="0" fractionAlong="0.500000"/>
        </inputList>
        <inputList id="DepCurr_L23RS_TO_CG3D_L23PyrRS_37_0" population="CG3D_L23PyrRS" component="DepCurr_L23RS_TO_CG3D_L23PyrRS_Pulse0_Cell40">
            <input id="0" target="../CG3D_L23PyrRS/40/L23PyrRS" destination="synapses" segmentId="0" fractionAlong="0.500000"/>
        </inputList>
        <inputList id="DepCurr_L23RS_TO_CG3D_L23PyrRS_38_0" population="CG3D_L23PyrRS" component="DepCurr_L23RS_TO_CG3D_L23PyrRS_Pulse0_Cell6">
            <input id="0" target="../CG3D_L23PyrRS/6/L23PyrRS" destination="synapses" segmentId="0" fractionAlong="0.500000"/>
        </inputList>
        <inputList id="DepCurr_L23RS_TO_CG3D_L23PyrRS_39_0" population="CG3D_L23PyrRS" component="DepCurr_L23RS_TO_CG3D_L23PyrRS_Pulse0_Cell29">
            <input id="0" target="../CG3D_L23PyrRS/29/L23PyrRS" destination="synapses" segmentId="0" fractionAlong="0.500000"/>
        </inputList>
        <inputList id="DepCurr_L23RS_TO_CG3D_L23PyrRS_40_0" population="CG3D_L23PyrRS" component="DepCurr_L23RS_TO_CG3D_L23PyrRS_Pulse0_Cell47">
            <input id="0" target="../CG3D_L23PyrRS/47/L23PyrRS" destination="synapses" segmentId="0" fractionAlong="0.500000"/>
        </inputList>
        <inputList id="DepCurr_L23RS_TO_CG3D_L23PyrRS_41_0" population="CG3D_L23PyrRS" component="DepCurr_L23RS_TO_CG3D_L23PyrRS_Pulse0_Cell45">
            <input id="0" target="../CG3D_L23PyrRS/45/L23PyrRS" destination="synapses" segmentId="0" fractionAlong="0.500000"/>
        </inputList>
        <inputList id="DepCurr_L23RS_TO_CG3D_L23PyrRS_42_0" population="CG3D_L23PyrRS" component="DepCurr_L23RS_TO_CG3D_L23PyrRS_Pulse0_Cell30">
            <input id="0" target="../CG3D_L23PyrRS/30/L23PyrRS" destination="synapses" segmentId="0" fractionAlong="0.500000"/>
        </inputList>
        <inputList id="DepCurr_L23RS_TO_CG3D_L23PyrRS_43_0" population="CG3D_L23PyrRS" component="DepCurr_L23RS_TO_CG3D_L23PyrRS_Pulse0_Cell24">
            <input id="0" target="../CG3D_L23PyrRS/24/L23PyrRS" destination="synapses" segmentId="0" fractionAlong="0.500000"/>
        </inputList>
        <inputList id="DepCurr_L23RS_TO_CG3D_L23PyrRS_44_0" population="CG3D_L23PyrRS" component="DepCurr_L23RS_TO_CG3D_L23PyrRS_Pulse0_Cell39">
            <input id="0" target="../CG3D_L23PyrRS/39/L23PyrRS" destination="synapses" segmentId="0" fractionAlong="0.500000"/>
        </inputList>
        <inputList id="DepCurr_L23RS_TO_CG3D_L23PyrRS_45_0" population="CG3D_L23PyrRS" component="DepCurr_L23RS_TO_CG3D_L23PyrRS_Pulse0_Cell10">
            <input id="0" target="../CG3D_L23PyrRS/10/L23PyrRS" destination="synapses" segmentId="0" fractionAlong="0.500000"/>
        </inputList>
        <inputList id="DepCurr_L23RS_TO_CG3D_L23PyrRS_46_0" population="CG3D_L23PyrRS" component="DepCurr_L23RS_TO_CG3D_L23PyrRS_Pulse0_Cell5">
            <input id="0" target="../CG3D_L23PyrRS/5/L23PyrRS" destination="synapses" segmentId="0" fractionAlong="0.500000"/>
        </inputList>
        <inputList id="DepCurr_L23RS_TO_CG3D_L23PyrRS_47_0" population="CG3D_L23PyrRS" component="DepCurr_L23RS_TO_CG3D_L23PyrRS_Pulse0_Cell25">
            <input id="0" target="../CG3D_L23PyrRS/25/L23PyrRS" destination="synapses" segmentId="0" fractionAlong="0.500000"/>
        </inputList>
        <inputList id="DepCurr_L23RS_TO_CG3D_L23PyrRS_48_0" population="CG3D_L23PyrRS" component="DepCurr_L23RS_TO_CG3D_L23PyrRS_Pulse0_Cell32">
            <input id="0" target="../CG3D_L23PyrRS/32/L23PyrRS" destination="synapses" segmentId="0" fractionAlong="0.500000"/>
        </inputList>
        <inputList id="DepCurr_L23RS_TO_CG3D_L23PyrRS_49_0" population="CG3D_L23PyrRS" component="DepCurr_L23RS_TO_CG3D_L23PyrRS_Pulse0_Cell13">
            <input id="0" target="../CG3D_L23PyrRS/13/L23PyrRS" destination="synapses" segmentId="0" fractionAlong="0.500000"/>
        </inputList>
        <inputList id="BackgroundL23RS_TO_CG3D_L23PyrRS_0_0" population="CG3D_L23PyrRS" component="BackgroundL23RS_TO_CG3D_L23PyrRS_PoiSyn0">
            <input id="0" target="../CG3D_L23PyrRS/22/L23PyrRS" destination="synapses" segmentId="20" fractionAlong="0.693396"/>
            <input id="1" target="../CG3D_L23PyrRS/22/L23PyrRS" destination="synapses" segmentId="109" fractionAlong="0.738775"/>
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        </inputList>
        <inputList id="EctopicStimL23RS_TO_CG3D_L23PyrRS_0_0" population="CG3D_L23PyrRS" component="EctopicStimL23RS_TO_CG3D_L23PyrRS_PoiSyn0">
            <input id="0" target="../CG3D_L23PyrRS/47/L23PyrRS" destination="synapses" segmentId="143" fractionAlong="0.500000"/>
            <input id="1" target="../CG3D_L23PyrRS/31/L23PyrRS" destination="synapses" segmentId="143" fractionAlong="0.500000"/>
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        </inputList>
    </network>
</neuroml>
