<neuroml xmlns="http://www.neuroml.org/schema/neuroml2"  xmlns:xs="http://www.w3.org/2001/XMLSchema" xmlns:xsi="http://www.w3.org/2001/XMLSchema-instance" xsi:schemaLocation="http://www.neuroml.org/schema/neuroml2 https://raw.github.com/NeuroML/NeuroML2/development/Schemas/NeuroML2/NeuroML_v2beta5.xsd" id="L6NonTuftedPyrRS">
    <include href="ar__m00_25.channel.nml"/>
    <include href="cad__beta0_01__phi13000.nml"/>
    <include href="cad__beta0_05__phi65000.nml"/>
    <include href="cal.channel.nml"/>
    <include href="cat.channel.nml"/>
    <include href="k2.channel.nml"/>
    <include href="ka.channel.nml"/>
    <include href="kahp_deeppyr.channel.nml"/>
    <include href="kc.channel.nml"/>
    <include href="kdr.channel.nml"/>
    <include href="km.channel.nml"/>
    <include href="naf__a0__b0__c0__d0__fastNa_shiftmin3_5.channel.nml"/>
    <include href="nap.channel.nml"/>
    <include href="pas.channel.nml"/>
    <cell id="L6NonTuftedPyrRS">
        <notes>Cell: nontuftRS_0 exported from NEURON ModelView</notes>
        <morphology id="morphology_L6NonTuftedPyrRS">
            <segment id="0" name="Seg0_comp_1">
                <proximal x="0.000000e+00" y="0.000000e+00" z="0.000000e+00" diameter="16.0"/>
                <distal x="0.000000e+00" y="1.000000e+01" z="0.000000e+00" diameter="16.0"/>
            </segment>
            <segment id="1" name="Seg1_comp_1">
                <parent segment="0"/>
                <distal x="-4.371139e-07" y="2.000000e+01" z="0.000000e+00" diameter="16.0"/>
            </segment>
            <segment id="88" name="Seg0_comp_45">
                <parent segment="0" fractionAlong="0.0"/>
                <proximal x="0.000000e+00" y="0.000000e+00" z="0.000000e+00" diameter="1.8"/>
                <distal x="1.250000e+01" y="0.000000e+00" z="0.000000e+00" diameter="1.8"/>
            </segment>
            <segment id="89" name="Seg1_comp_45">
                <parent segment="88"/>
                <distal x="2.500000e+01" y="9.227639e-07" z="-6.947070e-14" diameter="1.8"/>
            </segment>
            <segment id="68" name="Seg0_comp_35">
                <parent segment="1"/>
                <proximal x="0.000000e+00" y="2.000000e+01" z="0.000000e+00" diameter="3.0"/>
                <distal x="0.000000e+00" y="4.500000e+01" z="0.000000e+00" diameter="3.0"/>
            </segment>
            <segment id="69" name="Seg1_comp_35">
                <parent segment="68"/>
                <distal x="-1.658336e-05" y="6.999997e+01" z="0.000000e+00" diameter="3.0"/>
            </segment>
            <segment id="10" name="Seg0_comp_6">
                <parent segment="1"/>
                <proximal x="0.000000e+00" y="2.000000e+01" z="0.000000e+00" diameter="1.7"/>
                <distal x="0.000000e+00" y="-1.213203e+00" z="2.121320e+01" diameter="1.7"/>
            </segment>
            <segment id="11" name="Seg1_comp_6">
                <parent segment="10"/>
                <distal x="1.155137e-05" y="-2.242646e+01" z="4.242645e+01" diameter="1.7"/>
            </segment>
            <segment id="8" name="Seg0_comp_5">
                <parent segment="1"/>
                <proximal x="0.000000e+00" y="2.000000e+01" z="0.000000e+00" diameter="1.7"/>
                <distal x="0.000000e+00" y="-1.213203e+00" z="-2.121320e+01" diameter="1.7"/>
            </segment>
            <segment id="9" name="Seg1_comp_5">
                <parent segment="8"/>
                <distal x="7.984267e-06" y="-2.242637e+01" z="-4.242637e+01" diameter="1.7"/>
            </segment>
            <segment id="6" name="Seg0_comp_4">
                <parent segment="1"/>
                <proximal x="0.000000e+00" y="2.000000e+01" z="0.000000e+00" diameter="1.7"/>
                <distal x="-2.121320e+01" y="-1.213203e+00" z="0.000000e+00" diameter="1.7"/>
            </segment>
            <segment id="7" name="Seg1_comp_4">
                <parent segment="6"/>
                <distal x="-4.242636e+01" y="-2.242638e+01" z="0.000000e+00" diameter="1.7"/>
            </segment>
            <segment id="4" name="Seg0_comp_3">
                <parent segment="1"/>
                <proximal x="0.000000e+00" y="2.000000e+01" z="0.000000e+00" diameter="1.7"/>
                <distal x="2.121320e+01" y="-1.213203e+00" z="0.000000e+00" diameter="1.7"/>
            </segment>
            <segment id="5" name="Seg1_comp_3">
                <parent segment="4"/>
                <distal x="4.242646e+01" y="-2.242645e+01" z="0.000000e+00" diameter="1.7"/>
            </segment>
            <segment id="2" name="Seg0_comp_2">
                <parent segment="1"/>
                <proximal x="0.000000e+00" y="2.000000e+01" z="0.000000e+00" diameter="1.7"/>
                <distal x="0.000000e+00" y="-9.999994e+00" z="0.000000e+00" diameter="1.7"/>
            </segment>
            <segment id="3" name="Seg1_comp_2">
                <parent segment="2"/>
                <distal x="-1.306819e-04" y="-4.000004e+01" z="0.000000e+00" diameter="1.7"/>
            </segment>
            <segment id="90" name="Seg0_comp_46">
                <parent segment="89"/>
                <proximal x="2.500000e+01" y="9.227639e-07" z="-6.947070e-14" diameter="1.4"/>
                <distal x="5.000000e+01" y="1.278903e-06" z="6.947164e-14" diameter="1.4"/>
            </segment>
            <segment id="91" name="Seg1_comp_46">
                <parent segment="90"/>
                <distal x="7.500000e+01" y="1.456525e-07" z="2.084158e-13" diameter="1.4"/>
            </segment>
            <segment id="70" name="Seg0_comp_36">
                <parent segment="69"/>
                <proximal x="0.000000e+00" y="7.000000e+01" z="0.000000e+00" diameter="2.8"/>
                <distal x="0.000000e+00" y="1.000000e+02" z="0.000000e+00" diameter="2.8"/>
            </segment>
            <segment id="71" name="Seg1_comp_36">
                <parent segment="70"/>
                <distal x="3.046930e-04" y="1.249997e+02" z="0.000000e+00" diameter="2.8"/>
            </segment>
            <segment id="22" name="Seg0_comp_12">
                <parent segment="69"/>
                <proximal x="0.000000e+00" y="7.000000e+01" z="0.000000e+00" diameter="1.24"/>
                <distal x="-3.000000e+01" y="7.000000e+01" z="0.000000e+00" diameter="1.24"/>
            </segment>
            <segment id="23" name="Seg1_comp_12">
                <parent segment="22"/>
                <distal x="-6.000023e+01" y="6.999986e+01" z="0.000000e+00" diameter="1.24"/>
            </segment>
            <segment id="12" name="Seg0_comp_7">
                <parent segment="69"/>
                <proximal x="0.000000e+00" y="7.000000e+01" z="0.000000e+00" diameter="1.24"/>
                <distal x="3.000000e+01" y="7.000000e+01" z="0.000000e+00" diameter="1.24"/>
            </segment>
            <segment id="13" name="Seg1_comp_7">
                <parent segment="12"/>
                <distal x="6.000001e+01" y="7.000002e+01" z="0.000000e+00" diameter="1.24"/>
            </segment>
            <segment id="32" name="Seg0_comp_17">
                <parent segment="11"/>
                <proximal x="1.155137e-05" y="-2.242646e+01" z="4.242645e+01" diameter="1.7"/>
                <distal x="2.330040e-05" y="-4.363936e+01" z="6.363932e+01" diameter="1.7"/>
            </segment>
            <segment id="33" name="Seg1_comp_17">
                <parent segment="32"/>
                <distal x="-1.449332e-04" y="-6.485310e+01" z="8.485319e+01" diameter="1.7"/>
            </segment>
            <segment id="30" name="Seg0_comp_16">
                <parent segment="9"/>
                <proximal x="7.984267e-06" y="-2.242637e+01" z="-4.242637e+01" diameter="1.7"/>
                <distal x="2.328148e-05" y="-4.363947e+01" z="-6.363946e+01" diameter="1.7"/>
            </segment>
            <segment id="31" name="Seg1_comp_16">
                <parent segment="30"/>
                <distal x="3.149901e-05" y="-6.485265e+01" z="-8.485263e+01" diameter="1.7"/>
            </segment>
            <segment id="28" name="Seg0_comp_15">
                <parent segment="7"/>
                <proximal x="-4.242636e+01" y="-2.242638e+01" z="0.000000e+00" diameter="1.7"/>
                <distal x="-6.363944e+01" y="-4.363949e+01" z="0.000000e+00" diameter="1.7"/>
            </segment>
            <segment id="29" name="Seg1_comp_15">
                <parent segment="28"/>
                <distal x="-8.485260e+01" y="-6.485267e+01" z="0.000000e+00" diameter="1.7"/>
            </segment>
            <segment id="26" name="Seg0_comp_14">
                <parent segment="5"/>
                <proximal x="4.242646e+01" y="-2.242645e+01" z="0.000000e+00" diameter="1.7"/>
                <distal x="6.363936e+01" y="-4.363933e+01" z="0.000000e+00" diameter="1.7"/>
            </segment>
            <segment id="27" name="Seg1_comp_14">
                <parent segment="26"/>
                <distal x="8.485303e+01" y="-6.485327e+01" z="0.000000e+00" diameter="1.7"/>
            </segment>
            <segment id="24" name="Seg0_comp_13">
                <parent segment="3"/>
                <proximal x="-1.306819e-04" y="-4.000004e+01" z="0.000000e+00" diameter="1.7"/>
                <distal x="6.618662e-05" y="-6.999957e+01" z="0.000000e+00" diameter="1.7"/>
            </segment>
            <segment id="25" name="Seg1_comp_13">
                <parent segment="24"/>
                <distal x="-9.839095e-05" y="-9.999970e+01" z="0.000000e+00" diameter="1.7"/>
            </segment>
            <segment id="96" name="Seg0_comp_49">
                <parent segment="91"/>
                <proximal x="7.500000e+01" y="1.456525e-07" z="2.084158e-13" diameter="1.0"/>
                <distal x="9.802649e+01" y="-9.735456e+00" z="1.702202e-06" diameter="1.0"/>
            </segment>
            <segment id="97" name="Seg1_comp_49">
                <parent segment="96"/>
                <distal x="1.210530e+02" y="-1.947088e+01" z="3.404398e-06" diameter="1.0"/>
            </segment>
            <segment id="92" name="Seg0_comp_47">
                <parent segment="91"/>
                <proximal x="7.500000e+01" y="1.456525e-07" z="2.084158e-13" diameter="1.0"/>
                <distal x="9.802650e+01" y="9.735463e+00" z="-1.702202e-06" diameter="1.0"/>
            </segment>
            <segment id="93" name="Seg1_comp_47">
                <parent segment="92"/>
                <distal x="1.210530e+02" y="1.947092e+01" z="-3.404403e-06" diameter="1.0"/>
            </segment>
            <segment id="20" name="Seg0_comp_11">
                <parent segment="71"/>
                <proximal x="0.000000e+00" y="1.250000e+02" z="0.000000e+00" diameter="1.24"/>
                <distal x="0.000000e+00" y="1.250000e+02" z="-3.000000e+01" diameter="1.24"/>
            </segment>
            <segment id="21" name="Seg1_comp_11">
                <parent segment="20"/>
                <distal x="-3.991267e-04" y="1.250000e+02" z="-6.000005e+01" diameter="1.24"/>
            </segment>
            <segment id="14" name="Seg0_comp_8">
                <parent segment="71"/>
                <proximal x="0.000000e+00" y="1.250000e+02" z="0.000000e+00" diameter="1.24"/>
                <distal x="0.000000e+00" y="1.250000e+02" z="3.000000e+01" diameter="1.24"/>
            </segment>
            <segment id="15" name="Seg1_comp_8">
                <parent segment="14"/>
                <distal x="4.415392e-04" y="1.250003e+02" z="5.999983e+01" diameter="1.24"/>
            </segment>
            <segment id="72" name="Seg0_comp_37">
                <parent segment="71"/>
                <proximal x="0.000000e+00" y="1.250000e+02" z="0.000000e+00" diameter="2.6"/>
                <distal x="0.000000e+00" y="1.500000e+02" z="0.000000e+00" diameter="2.6"/>
            </segment>
            <segment id="73" name="Seg1_comp_37">
                <parent segment="72"/>
                <distal x="-6.495304e-06" y="1.749995e+02" z="0.000000e+00" diameter="2.6"/>
            </segment>
            <segment id="44" name="Seg0_comp_23">
                <parent segment="23"/>
                <proximal x="-6.000023e+01" y="6.999986e+01" z="0.000000e+00" diameter="1.24"/>
                <distal x="-9.000041e+01" y="6.999985e+01" z="0.000000e+00" diameter="1.24"/>
            </segment>
            <segment id="45" name="Seg1_comp_23">
                <parent segment="44"/>
                <distal x="-1.199996e+02" y="7.000015e+01" z="0.000000e+00" diameter="1.24"/>
            </segment>
            <segment id="34" name="Seg0_comp_18">
                <parent segment="13"/>
                <proximal x="6.000001e+01" y="7.000002e+01" z="0.000000e+00" diameter="1.24"/>
                <distal x="9.000000e+01" y="7.000005e+01" z="0.000000e+00" diameter="1.24"/>
            </segment>
            <segment id="35" name="Seg1_comp_18">
                <parent segment="34"/>
                <distal x="1.200000e+02" y="7.000008e+01" z="0.000000e+00" diameter="1.24"/>
            </segment>
            <segment id="54" name="Seg0_comp_28">
                <parent segment="33"/>
                <proximal x="-1.449332e-04" y="-6.485310e+01" z="8.485319e+01" diameter="1.7"/>
                <distal x="-1.111834e-04" y="-8.606622e+01" z="1.060663e+02" diameter="1.7"/>
            </segment>
            <segment id="55" name="Seg1_comp_28">
                <parent segment="54"/>
                <distal x="-7.277689e-05" y="-1.072794e+02" z="1.272794e+02" diameter="1.7"/>
            </segment>
            <segment id="52" name="Seg0_comp_27">
                <parent segment="31"/>
                <proximal x="3.149901e-05" y="-6.485265e+01" z="-8.485263e+01" diameter="1.7"/>
                <distal x="3.911812e-05" y="-8.606582e+01" z="-1.060658e+02" diameter="1.7"/>
            </segment>
            <segment id="53" name="Seg1_comp_27">
                <parent segment="52"/>
                <distal x="7.813368e-06" y="-1.072790e+02" z="-1.272790e+02" diameter="1.7"/>
            </segment>
            <segment id="50" name="Seg0_comp_26">
                <parent segment="29"/>
                <proximal x="-8.485260e+01" y="-6.485267e+01" z="0.000000e+00" diameter="1.7"/>
                <distal x="-1.060658e+02" y="-8.606585e+01" z="0.000000e+00" diameter="1.7"/>
            </segment>
            <segment id="51" name="Seg1_comp_26">
                <parent segment="50"/>
                <distal x="-1.272789e+02" y="-1.072790e+02" z="0.000000e+00" diameter="1.7"/>
            </segment>
            <segment id="48" name="Seg0_comp_25">
                <parent segment="27"/>
                <proximal x="8.485303e+01" y="-6.485327e+01" z="0.000000e+00" diameter="1.7"/>
                <distal x="1.060662e+02" y="-8.606635e+01" z="0.000000e+00" diameter="1.7"/>
            </segment>
            <segment id="49" name="Seg1_comp_25">
                <parent segment="48"/>
                <distal x="1.272793e+02" y="-1.072794e+02" z="0.000000e+00" diameter="1.7"/>
            </segment>
            <segment id="46" name="Seg0_comp_24">
                <parent segment="25"/>
                <proximal x="-9.839095e-05" y="-9.999970e+01" z="0.000000e+00" diameter="1.7"/>
                <distal x="-1.760724e-04" y="-1.299999e+02" z="0.000000e+00" diameter="1.7"/>
            </segment>
            <segment id="47" name="Seg1_comp_24">
                <parent segment="46"/>
                <distal x="-3.486201e-04" y="-1.600000e+02" z="0.000000e+00" diameter="1.7"/>
            </segment>
            <segment id="98" name="Seg0_comp_50">
                <parent segment="97"/>
                <proximal x="1.210530e+02" y="-1.947088e+01" z="3.404398e-06" diameter="1.0"/>
                <distal x="1.440800e+02" y="-2.920638e+01" z="5.106606e-06" diameter="1.0"/>
            </segment>
            <segment id="99" name="Seg1_comp_50">
                <parent segment="98"/>
                <distal x="1.671060e+02" y="-3.894187e+01" z="6.808815e-06" diameter="1.0"/>
            </segment>
            <segment id="94" name="Seg0_comp_48">
                <parent segment="93"/>
                <proximal x="1.210530e+02" y="1.947092e+01" z="-3.404403e-06" diameter="1.0"/>
                <distal x="1.440800e+02" y="2.920642e+01" z="-5.106612e-06" diameter="1.0"/>
            </segment>
            <segment id="95" name="Seg1_comp_48">
                <parent segment="94"/>
                <distal x="1.671060e+02" y="3.894183e+01" z="-6.808804e-06" diameter="1.0"/>
            </segment>
            <segment id="42" name="Seg0_comp_22">
                <parent segment="21"/>
                <proximal x="-3.991267e-04" y="1.250000e+02" z="-6.000005e+01" diameter="1.24"/>
                <distal x="-8.493547e-04" y="1.250000e+02" z="-8.999998e+01" diameter="1.24"/>
            </segment>
            <segment id="43" name="Seg1_comp_22">
                <parent segment="42"/>
                <distal x="-3.421851e-04" y="1.250000e+02" z="-1.199995e+02" diameter="1.24"/>
            </segment>
            <segment id="36" name="Seg0_comp_19">
                <parent segment="15"/>
                <proximal x="4.415392e-04" y="1.250003e+02" z="5.999983e+01" diameter="1.24"/>
                <distal x="1.004195e-03" y="1.250005e+02" z="8.999986e+01" diameter="1.24"/>
            </segment>
            <segment id="37" name="Seg1_comp_19">
                <parent segment="36"/>
                <distal x="9.475524e-04" y="1.250008e+02" z="1.199993e+02" diameter="1.24"/>
            </segment>
            <segment id="18" name="Seg0_comp_10">
                <parent segment="73"/>
                <proximal x="0.000000e+00" y="1.750000e+02" z="0.000000e+00" diameter="1.24"/>
                <distal x="2.121320e+01" y="1.750000e+02" z="2.121320e+01" diameter="1.24"/>
            </segment>
            <segment id="19" name="Seg1_comp_10">
                <parent segment="18"/>
                <distal x="4.242660e+01" y="1.749999e+02" z="4.242608e+01" diameter="1.24"/>
            </segment>
            <segment id="16" name="Seg0_comp_9">
                <parent segment="73"/>
                <proximal x="0.000000e+00" y="1.750000e+02" z="0.000000e+00" diameter="1.24"/>
                <distal x="-2.121320e+01" y="1.750000e+02" z="-2.121320e+01" diameter="1.24"/>
            </segment>
            <segment id="17" name="Seg1_comp_9">
                <parent segment="16"/>
                <distal x="-4.242654e+01" y="1.750004e+02" z="-4.242645e+01" diameter="1.24"/>
            </segment>
            <segment id="74" name="Seg0_comp_38">
                <parent segment="73"/>
                <proximal x="0.000000e+00" y="1.750000e+02" z="0.000000e+00" diameter="2.4"/>
                <distal x="0.000000e+00" y="2.000000e+02" z="0.000000e+00" diameter="2.4"/>
            </segment>
            <segment id="75" name="Seg1_comp_38">
                <parent segment="74"/>
                <distal x="1.107974e-05" y="2.250000e+02" z="0.000000e+00" diameter="2.4"/>
            </segment>
            <segment id="66" name="Seg0_comp_34">
                <parent segment="45"/>
                <proximal x="-1.199996e+02" y="7.000015e+01" z="0.000000e+00" diameter="1.24"/>
                <distal x="-1.499998e+02" y="7.000013e+01" z="0.000000e+00" diameter="1.24"/>
            </segment>
            <segment id="67" name="Seg1_comp_34">
                <parent segment="66"/>
                <distal x="-1.799999e+02" y="7.000004e+01" z="0.000000e+00" diameter="1.24"/>
            </segment>
            <segment id="56" name="Seg0_comp_29">
                <parent segment="35"/>
                <proximal x="1.200000e+02" y="7.000008e+01" z="0.000000e+00" diameter="1.24"/>
                <distal x="1.500000e+02" y="7.000011e+01" z="0.000000e+00" diameter="1.24"/>
            </segment>
            <segment id="57" name="Seg1_comp_29">
                <parent segment="56"/>
                <distal x="1.800000e+02" y="7.000014e+01" z="0.000000e+00" diameter="1.24"/>
            </segment>
            <segment id="64" name="Seg0_comp_33">
                <parent segment="43"/>
                <proximal x="-3.421851e-04" y="1.250000e+02" z="-1.199995e+02" diameter="1.24"/>
                <distal x="-4.346540e-04" y="1.250000e+02" z="-1.500004e+02" diameter="1.24"/>
            </segment>
            <segment id="65" name="Seg1_comp_33">
                <parent segment="64"/>
                <distal x="-8.648856e-04" y="1.250000e+02" z="-1.800004e+02" diameter="1.24"/>
            </segment>
            <segment id="58" name="Seg0_comp_30">
                <parent segment="37"/>
                <proximal x="9.475524e-04" y="1.250008e+02" z="1.199993e+02" diameter="1.24"/>
                <distal x="1.561569e-03" y="1.250010e+02" z="1.499993e+02" diameter="1.24"/>
            </segment>
            <segment id="59" name="Seg1_comp_30">
                <parent segment="58"/>
                <distal x="1.455828e-03" y="1.250013e+02" z="1.800001e+02" diameter="1.24"/>
            </segment>
            <segment id="40" name="Seg0_comp_21">
                <parent segment="19"/>
                <proximal x="4.242660e+01" y="1.749999e+02" z="4.242608e+01" diameter="1.24"/>
                <distal x="6.364018e+01" y="1.749996e+02" z="6.363897e+01" diameter="1.24"/>
            </segment>
            <segment id="41" name="Seg1_comp_21">
                <parent segment="40"/>
                <distal x="8.485304e+01" y="1.749999e+02" z="8.485165e+01" diameter="1.24"/>
            </segment>
            <segment id="38" name="Seg0_comp_20">
                <parent segment="17"/>
                <proximal x="-4.242654e+01" y="1.750004e+02" z="-4.242645e+01" diameter="1.24"/>
                <distal x="-6.363994e+01" y="1.750008e+02" z="-6.363958e+01" diameter="1.24"/>
            </segment>
            <segment id="39" name="Seg1_comp_20">
                <parent segment="38"/>
                <distal x="-8.485317e+01" y="1.750016e+02" z="-8.485319e+01" diameter="1.24"/>
            </segment>
            <segment id="76" name="Seg0_comp_39">
                <parent segment="75"/>
                <proximal x="1.107974e-05" y="2.250000e+02" z="0.000000e+00" diameter="2.2"/>
                <distal x="2.391626e-05" y="2.500000e+02" z="0.000000e+00" diameter="2.2"/>
            </segment>
            <segment id="77" name="Seg1_comp_39">
                <parent segment="76"/>
                <distal x="4.951548e-05" y="2.750000e+02" z="0.000000e+00" diameter="2.2"/>
            </segment>
            <segment id="62" name="Seg0_comp_32">
                <parent segment="41"/>
                <proximal x="8.485304e+01" y="1.749999e+02" z="8.485165e+01" diameter="1.24"/>
                <distal x="1.060666e+02" y="1.749997e+02" z="1.060646e+02" diameter="1.24"/>
            </segment>
            <segment id="63" name="Seg1_comp_32">
                <parent segment="62"/>
                <distal x="1.272805e+02" y="1.750000e+02" z="1.272783e+02" diameter="1.24"/>
            </segment>
            <segment id="60" name="Seg0_comp_31">
                <parent segment="39"/>
                <proximal x="-8.485317e+01" y="1.750016e+02" z="-8.485319e+01" diameter="1.24"/>
                <distal x="-1.060666e+02" y="1.750017e+02" z="-1.060661e+02" diameter="1.24"/>
            </segment>
            <segment id="61" name="Seg1_comp_31">
                <parent segment="60"/>
                <distal x="-1.272790e+02" y="1.750027e+02" z="-1.272793e+02" diameter="1.24"/>
            </segment>
            <segment id="78" name="Seg0_comp_40">
                <parent segment="77"/>
                <proximal x="4.951548e-05" y="2.750000e+02" z="0.000000e+00" diameter="2.0"/>
                <distal x="5.403333e-05" y="3.000001e+02" z="0.000000e+00" diameter="2.0"/>
            </segment>
            <segment id="79" name="Seg1_comp_40">
                <parent segment="78"/>
                <distal x="5.586395e-05" y="3.250000e+02" z="0.000000e+00" diameter="2.0"/>
            </segment>
            <segment id="80" name="Seg0_comp_41">
                <parent segment="79"/>
                <proximal x="5.586395e-05" y="3.250000e+02" z="0.000000e+00" diameter="1.8"/>
                <distal x="7.794960e-05" y="3.500001e+02" z="0.000000e+00" diameter="1.8"/>
            </segment>
            <segment id="81" name="Seg1_comp_41">
                <parent segment="80"/>
                <distal x="8.949458e-05" y="3.750001e+02" z="0.000000e+00" diameter="1.8"/>
            </segment>
            <segment id="82" name="Seg0_comp_42">
                <parent segment="81"/>
                <proximal x="8.949458e-05" y="3.750001e+02" z="0.000000e+00" diameter="1.6"/>
                <distal x="9.132519e-05" y="4.000000e+02" z="0.000000e+00" diameter="1.6"/>
            </segment>
            <segment id="83" name="Seg1_comp_42">
                <parent segment="82"/>
                <distal x="1.169244e-04" y="4.250001e+02" z="0.000000e+00" diameter="1.6"/>
            </segment>
            <segment id="84" name="Seg0_comp_43">
                <parent segment="83"/>
                <proximal x="1.169244e-04" y="4.250001e+02" z="0.000000e+00" diameter="1.4"/>
                <distal x="1.306393e-04" y="4.500001e+02" z="0.000000e+00" diameter="1.4"/>
            </segment>
            <segment id="85" name="Seg1_comp_43">
                <parent segment="84"/>
                <distal x="1.303000e-04" y="4.750001e+02" z="0.000000e+00" diameter="1.4"/>
            </segment>
            <segment id="86" name="Seg0_comp_44">
                <parent segment="85"/>
                <proximal x="1.303000e-04" y="4.750001e+02" z="0.000000e+00" diameter="1.2"/>
                <distal x="1.440149e-04" y="5.000001e+02" z="0.000000e+00" diameter="1.2"/>
            </segment>
            <segment id="87" name="Seg1_comp_44">
                <parent segment="86"/>
                <distal x="1.598998e-04" y="5.250000e+02" z="0.000000e+00" diameter="1.2"/>
            </segment>
            <segmentGroup neuroLexId="sao864921383" id="comp_1">
                <property tag="numberInternalDivisions" value="2"/>
                <member segment="0"/>
                <member segment="1"/>
            </segmentGroup>
            <segmentGroup neuroLexId="sao864921383" id="comp_45">
                <property tag="numberInternalDivisions" value="24"/>
                <member segment="88"/>
                <member segment="89"/>
            </segmentGroup>
            <segmentGroup neuroLexId="sao864921383" id="comp_35">
                <property tag="numberInternalDivisions" value="12"/>
                <member segment="68"/>
                <member segment="69"/>
            </segmentGroup>
            <segmentGroup neuroLexId="sao864921383" id="comp_6">
                <property tag="numberInternalDivisions" value="19"/>
                <member segment="10"/>
                <member segment="11"/>
            </segmentGroup>
            <segmentGroup neuroLexId="sao864921383" id="comp_5">
                <property tag="numberInternalDivisions" value="19"/>
                <member segment="8"/>
                <member segment="9"/>
            </segmentGroup>
            <segmentGroup neuroLexId="sao864921383" id="comp_4">
                <property tag="numberInternalDivisions" value="19"/>
                <member segment="6"/>
                <member segment="7"/>
            </segmentGroup>
            <segmentGroup neuroLexId="sao864921383" id="comp_3">
                <property tag="numberInternalDivisions" value="19"/>
                <member segment="4"/>
                <member segment="5"/>
            </segmentGroup>
            <segmentGroup neuroLexId="sao864921383" id="comp_2">
                <property tag="numberInternalDivisions" value="19"/>
                <member segment="2"/>
                <member segment="3"/>
            </segmentGroup>
            <segmentGroup neuroLexId="sao864921383" id="comp_46">
                <property tag="numberInternalDivisions" value="54"/>
                <member segment="90"/>
                <member segment="91"/>
            </segmentGroup>
            <segmentGroup neuroLexId="sao864921383" id="comp_36">
                <property tag="numberInternalDivisions" value="14"/>
                <member segment="70"/>
                <member segment="71"/>
            </segmentGroup>
            <segmentGroup neuroLexId="sao864921383" id="comp_12">
                <property tag="numberInternalDivisions" value="22"/>
                <member segment="22"/>
                <member segment="23"/>
            </segmentGroup>
            <segmentGroup neuroLexId="sao864921383" id="comp_7">
                <property tag="numberInternalDivisions" value="22"/>
                <member segment="12"/>
                <member segment="13"/>
            </segmentGroup>
            <segmentGroup neuroLexId="sao864921383" id="comp_17">
                <property tag="numberInternalDivisions" value="19"/>
                <member segment="32"/>
                <member segment="33"/>
            </segmentGroup>
            <segmentGroup neuroLexId="sao864921383" id="comp_16">
                <property tag="numberInternalDivisions" value="19"/>
                <member segment="30"/>
                <member segment="31"/>
            </segmentGroup>
            <segmentGroup neuroLexId="sao864921383" id="comp_15">
                <property tag="numberInternalDivisions" value="19"/>
                <member segment="28"/>
                <member segment="29"/>
            </segmentGroup>
            <segmentGroup neuroLexId="sao864921383" id="comp_14">
                <property tag="numberInternalDivisions" value="19"/>
                <member segment="26"/>
                <member segment="27"/>
            </segmentGroup>
            <segmentGroup neuroLexId="sao864921383" id="comp_13">
                <property tag="numberInternalDivisions" value="19"/>
                <member segment="24"/>
                <member segment="25"/>
            </segmentGroup>
            <segmentGroup neuroLexId="sao864921383" id="comp_49">
                <property tag="numberInternalDivisions" value="64"/>
                <member segment="96"/>
                <member segment="97"/>
            </segmentGroup>
            <segmentGroup neuroLexId="sao864921383" id="comp_47">
                <property tag="numberInternalDivisions" value="64"/>
                <member segment="92"/>
                <member segment="93"/>
            </segmentGroup>
            <segmentGroup neuroLexId="sao864921383" id="comp_11">
                <property tag="numberInternalDivisions" value="22"/>
                <member segment="20"/>
                <member segment="21"/>
            </segmentGroup>
            <segmentGroup neuroLexId="sao864921383" id="comp_8">
                <property tag="numberInternalDivisions" value="22"/>
                <member segment="14"/>
                <member segment="15"/>
            </segmentGroup>
            <segmentGroup neuroLexId="sao864921383" id="comp_37">
                <property tag="numberInternalDivisions" value="13"/>
                <member segment="72"/>
                <member segment="73"/>
            </segmentGroup>
            <segmentGroup neuroLexId="sao864921383" id="comp_23">
                <property tag="numberInternalDivisions" value="22"/>
                <member segment="44"/>
                <member segment="45"/>
            </segmentGroup>
            <segmentGroup neuroLexId="sao864921383" id="comp_18">
                <property tag="numberInternalDivisions" value="22"/>
                <member segment="34"/>
                <member segment="35"/>
            </segmentGroup>
            <segmentGroup neuroLexId="sao864921383" id="comp_28">
                <property tag="numberInternalDivisions" value="19"/>
                <member segment="54"/>
                <member segment="55"/>
            </segmentGroup>
            <segmentGroup neuroLexId="sao864921383" id="comp_27">
                <property tag="numberInternalDivisions" value="19"/>
                <member segment="52"/>
                <member segment="53"/>
            </segmentGroup>
            <segmentGroup neuroLexId="sao864921383" id="comp_26">
                <property tag="numberInternalDivisions" value="19"/>
                <member segment="50"/>
                <member segment="51"/>
            </segmentGroup>
            <segmentGroup neuroLexId="sao864921383" id="comp_25">
                <property tag="numberInternalDivisions" value="19"/>
                <member segment="48"/>
                <member segment="49"/>
            </segmentGroup>
            <segmentGroup neuroLexId="sao864921383" id="comp_24">
                <property tag="numberInternalDivisions" value="19"/>
                <member segment="46"/>
                <member segment="47"/>
            </segmentGroup>
            <segmentGroup neuroLexId="sao864921383" id="comp_50">
                <property tag="numberInternalDivisions" value="64"/>
                <member segment="98"/>
                <member segment="99"/>
            </segmentGroup>
            <segmentGroup neuroLexId="sao864921383" id="comp_48">
                <property tag="numberInternalDivisions" value="64"/>
                <member segment="94"/>
                <member segment="95"/>
            </segmentGroup>
            <segmentGroup neuroLexId="sao864921383" id="comp_22">
                <property tag="numberInternalDivisions" value="22"/>
                <member segment="42"/>
                <member segment="43"/>
            </segmentGroup>
            <segmentGroup neuroLexId="sao864921383" id="comp_19">
                <property tag="numberInternalDivisions" value="22"/>
                <member segment="36"/>
                <member segment="37"/>
            </segmentGroup>
            <segmentGroup neuroLexId="sao864921383" id="comp_10">
                <property tag="numberInternalDivisions" value="22"/>
                <member segment="18"/>
                <member segment="19"/>
            </segmentGroup>
            <segmentGroup neuroLexId="sao864921383" id="comp_9">
                <property tag="numberInternalDivisions" value="22"/>
                <member segment="16"/>
                <member segment="17"/>
            </segmentGroup>
            <segmentGroup neuroLexId="sao864921383" id="comp_38">
                <property tag="numberInternalDivisions" value="13"/>
                <member segment="74"/>
                <member segment="75"/>
            </segmentGroup>
            <segmentGroup neuroLexId="sao864921383" id="comp_34">
                <property tag="numberInternalDivisions" value="22"/>
                <member segment="66"/>
                <member segment="67"/>
            </segmentGroup>
            <segmentGroup neuroLexId="sao864921383" id="comp_29">
                <property tag="numberInternalDivisions" value="22"/>
                <member segment="56"/>
                <member segment="57"/>
            </segmentGroup>
            <segmentGroup neuroLexId="sao864921383" id="comp_33">
                <property tag="numberInternalDivisions" value="22"/>
                <member segment="64"/>
                <member segment="65"/>
            </segmentGroup>
            <segmentGroup neuroLexId="sao864921383" id="comp_30">
                <property tag="numberInternalDivisions" value="22"/>
                <member segment="58"/>
                <member segment="59"/>
            </segmentGroup>
            <segmentGroup neuroLexId="sao864921383" id="comp_21">
                <property tag="numberInternalDivisions" value="22"/>
                <member segment="40"/>
                <member segment="41"/>
            </segmentGroup>
            <segmentGroup neuroLexId="sao864921383" id="comp_20">
                <property tag="numberInternalDivisions" value="22"/>
                <member segment="38"/>
                <member segment="39"/>
            </segmentGroup>
            <segmentGroup neuroLexId="sao864921383" id="comp_39">
                <property tag="numberInternalDivisions" value="14"/>
                <member segment="76"/>
                <member segment="77"/>
            </segmentGroup>
            <segmentGroup neuroLexId="sao864921383" id="comp_32">
                <property tag="numberInternalDivisions" value="22"/>
                <member segment="62"/>
                <member segment="63"/>
            </segmentGroup>
            <segmentGroup neuroLexId="sao864921383" id="comp_31">
                <property tag="numberInternalDivisions" value="22"/>
                <member segment="60"/>
                <member segment="61"/>
            </segmentGroup>
            <segmentGroup neuroLexId="sao864921383" id="comp_40">
                <property tag="numberInternalDivisions" value="15"/>
                <member segment="78"/>
                <member segment="79"/>
            </segmentGroup>
            <segmentGroup neuroLexId="sao864921383" id="comp_41">
                <property tag="numberInternalDivisions" value="15"/>
                <member segment="80"/>
                <member segment="81"/>
            </segmentGroup>
            <segmentGroup neuroLexId="sao864921383" id="comp_42">
                <property tag="numberInternalDivisions" value="16"/>
                <member segment="82"/>
                <member segment="83"/>
            </segmentGroup>
            <segmentGroup neuroLexId="sao864921383" id="comp_43">
                <property tag="numberInternalDivisions" value="17"/>
                <member segment="84"/>
                <member segment="85"/>
            </segmentGroup>
            <segmentGroup neuroLexId="sao864921383" id="comp_44">
                <property tag="numberInternalDivisions" value="19"/>
                <member segment="86"/>
                <member segment="87"/>
            </segmentGroup>
            <segmentGroup id="all">
                <include segmentGroup="comp_1"/>
                <include segmentGroup="comp_45"/>
                <include segmentGroup="comp_35"/>
                <include segmentGroup="comp_6"/>
                <include segmentGroup="comp_5"/>
                <include segmentGroup="comp_4"/>
                <include segmentGroup="comp_3"/>
                <include segmentGroup="comp_2"/>
                <include segmentGroup="comp_46"/>
                <include segmentGroup="comp_36"/>
                <include segmentGroup="comp_12"/>
                <include segmentGroup="comp_7"/>
                <include segmentGroup="comp_17"/>
                <include segmentGroup="comp_16"/>
                <include segmentGroup="comp_15"/>
                <include segmentGroup="comp_14"/>
                <include segmentGroup="comp_13"/>
                <include segmentGroup="comp_49"/>
                <include segmentGroup="comp_47"/>
                <include segmentGroup="comp_11"/>
                <include segmentGroup="comp_8"/>
                <include segmentGroup="comp_37"/>
                <include segmentGroup="comp_23"/>
                <include segmentGroup="comp_18"/>
                <include segmentGroup="comp_28"/>
                <include segmentGroup="comp_27"/>
                <include segmentGroup="comp_26"/>
                <include segmentGroup="comp_25"/>
                <include segmentGroup="comp_24"/>
                <include segmentGroup="comp_50"/>
                <include segmentGroup="comp_48"/>
                <include segmentGroup="comp_22"/>
                <include segmentGroup="comp_19"/>
                <include segmentGroup="comp_10"/>
                <include segmentGroup="comp_9"/>
                <include segmentGroup="comp_38"/>
                <include segmentGroup="comp_34"/>
                <include segmentGroup="comp_29"/>
                <include segmentGroup="comp_33"/>
                <include segmentGroup="comp_30"/>
                <include segmentGroup="comp_21"/>
                <include segmentGroup="comp_20"/>
                <include segmentGroup="comp_39"/>
                <include segmentGroup="comp_32"/>
                <include segmentGroup="comp_31"/>
                <include segmentGroup="comp_40"/>
                <include segmentGroup="comp_41"/>
                <include segmentGroup="comp_42"/>
                <include segmentGroup="comp_43"/>
                <include segmentGroup="comp_44"/>
            </segmentGroup>
            <segmentGroup id="ModelViewParmSubset_1">
                <include segmentGroup="comp_1"/>
                <include segmentGroup="comp_35"/>
                <include segmentGroup="comp_6"/>
                <include segmentGroup="comp_5"/>
                <include segmentGroup="comp_4"/>
                <include segmentGroup="comp_3"/>
                <include segmentGroup="comp_2"/>
                <include segmentGroup="comp_36"/>
                <include segmentGroup="comp_12"/>
                <include segmentGroup="comp_7"/>
                <include segmentGroup="comp_17"/>
                <include segmentGroup="comp_16"/>
                <include segmentGroup="comp_15"/>
                <include segmentGroup="comp_14"/>
                <include segmentGroup="comp_13"/>
                <include segmentGroup="comp_11"/>
                <include segmentGroup="comp_8"/>
                <include segmentGroup="comp_37"/>
                <include segmentGroup="comp_23"/>
                <include segmentGroup="comp_18"/>
                <include segmentGroup="comp_28"/>
                <include segmentGroup="comp_27"/>
                <include segmentGroup="comp_26"/>
                <include segmentGroup="comp_25"/>
                <include segmentGroup="comp_24"/>
                <include segmentGroup="comp_22"/>
                <include segmentGroup="comp_19"/>
                <include segmentGroup="comp_10"/>
                <include segmentGroup="comp_9"/>
                <include segmentGroup="comp_38"/>
                <include segmentGroup="comp_34"/>
                <include segmentGroup="comp_29"/>
                <include segmentGroup="comp_33"/>
                <include segmentGroup="comp_30"/>
                <include segmentGroup="comp_21"/>
                <include segmentGroup="comp_20"/>
                <include segmentGroup="comp_39"/>
                <include segmentGroup="comp_32"/>
                <include segmentGroup="comp_31"/>
                <include segmentGroup="comp_40"/>
                <include segmentGroup="comp_41"/>
                <include segmentGroup="comp_42"/>
                <include segmentGroup="comp_43"/>
                <include segmentGroup="comp_44"/>
            </segmentGroup>
            <segmentGroup id="ModelViewParmSubset_2">
                <include segmentGroup="comp_1"/>
                <include segmentGroup="comp_35"/>
                <include segmentGroup="comp_6"/>
                <include segmentGroup="comp_5"/>
                <include segmentGroup="comp_4"/>
                <include segmentGroup="comp_3"/>
                <include segmentGroup="comp_2"/>
                <include segmentGroup="comp_36"/>
                <include segmentGroup="comp_12"/>
                <include segmentGroup="comp_7"/>
                <include segmentGroup="comp_11"/>
                <include segmentGroup="comp_8"/>
                <include segmentGroup="comp_10"/>
                <include segmentGroup="comp_9"/>
            </segmentGroup>
            <segmentGroup id="ModelViewParmSubset_3">
                <include segmentGroup="comp_1"/>
                <include segmentGroup="comp_45"/>
                <include segmentGroup="comp_35"/>
                <include segmentGroup="comp_6"/>
                <include segmentGroup="comp_5"/>
                <include segmentGroup="comp_4"/>
                <include segmentGroup="comp_3"/>
                <include segmentGroup="comp_2"/>
                <include segmentGroup="comp_46"/>
                <include segmentGroup="comp_36"/>
                <include segmentGroup="comp_12"/>
                <include segmentGroup="comp_7"/>
                <include segmentGroup="comp_49"/>
                <include segmentGroup="comp_47"/>
                <include segmentGroup="comp_11"/>
                <include segmentGroup="comp_8"/>
                <include segmentGroup="comp_50"/>
                <include segmentGroup="comp_48"/>
                <include segmentGroup="comp_10"/>
                <include segmentGroup="comp_9"/>
            </segmentGroup>
            <segmentGroup id="ModelViewParmSubset_5">
                <include segmentGroup="comp_1"/>
                <include segmentGroup="comp_45"/>
                <include segmentGroup="comp_46"/>
                <include segmentGroup="comp_49"/>
                <include segmentGroup="comp_47"/>
                <include segmentGroup="comp_50"/>
                <include segmentGroup="comp_48"/>
            </segmentGroup>
            <segmentGroup id="OneSecGrp_SectionRef_1">
                <include segmentGroup="comp_1"/>
            </segmentGroup>
            <segmentGroup neuroLexId="GO:0043025" id="soma_group">
                <include segmentGroup="comp_1"/>
            </segmentGroup>
            <segmentGroup id="DeepBask_dends">
                <include segmentGroup="comp_1"/>
                <include segmentGroup="comp_35"/>
                <include segmentGroup="comp_6"/>
                <include segmentGroup="comp_5"/>
                <include segmentGroup="comp_4"/>
                <include segmentGroup="comp_3"/>
                <include segmentGroup="comp_2"/>
                <include segmentGroup="comp_36"/>
            </segmentGroup>
            <segmentGroup neuroLexId="GO:0030424" id="axon_group">
                <include segmentGroup="comp_45"/>
                <include segmentGroup="comp_46"/>
                <include segmentGroup="comp_49"/>
                <include segmentGroup="comp_47"/>
                <include segmentGroup="comp_50"/>
                <include segmentGroup="comp_48"/>
            </segmentGroup>
            <segmentGroup id="prox_axon">
                <include segmentGroup="comp_45"/>
            </segmentGroup>
            <segmentGroup neuroLexId="GO:0030425" id="dendrite_group">
                <include segmentGroup="comp_35"/>
                <include segmentGroup="comp_6"/>
                <include segmentGroup="comp_5"/>
                <include segmentGroup="comp_4"/>
                <include segmentGroup="comp_3"/>
                <include segmentGroup="comp_2"/>
                <include segmentGroup="comp_36"/>
                <include segmentGroup="comp_12"/>
                <include segmentGroup="comp_7"/>
                <include segmentGroup="comp_17"/>
                <include segmentGroup="comp_16"/>
                <include segmentGroup="comp_15"/>
                <include segmentGroup="comp_14"/>
                <include segmentGroup="comp_13"/>
                <include segmentGroup="comp_11"/>
                <include segmentGroup="comp_8"/>
                <include segmentGroup="comp_37"/>
                <include segmentGroup="comp_23"/>
                <include segmentGroup="comp_18"/>
                <include segmentGroup="comp_28"/>
                <include segmentGroup="comp_27"/>
                <include segmentGroup="comp_26"/>
                <include segmentGroup="comp_25"/>
                <include segmentGroup="comp_24"/>
                <include segmentGroup="comp_22"/>
                <include segmentGroup="comp_19"/>
                <include segmentGroup="comp_10"/>
                <include segmentGroup="comp_9"/>
                <include segmentGroup="comp_38"/>
                <include segmentGroup="comp_34"/>
                <include segmentGroup="comp_29"/>
                <include segmentGroup="comp_33"/>
                <include segmentGroup="comp_30"/>
                <include segmentGroup="comp_21"/>
                <include segmentGroup="comp_20"/>
                <include segmentGroup="comp_39"/>
                <include segmentGroup="comp_32"/>
                <include segmentGroup="comp_31"/>
                <include segmentGroup="comp_40"/>
                <include segmentGroup="comp_41"/>
                <include segmentGroup="comp_42"/>
                <include segmentGroup="comp_43"/>
                <include segmentGroup="comp_44"/>
            </segmentGroup>
            <segmentGroup id="ModelViewParmSubset_6">
                <include segmentGroup="comp_35"/>
                <include segmentGroup="comp_6"/>
                <include segmentGroup="comp_5"/>
                <include segmentGroup="comp_4"/>
                <include segmentGroup="comp_3"/>
                <include segmentGroup="comp_2"/>
                <include segmentGroup="comp_36"/>
                <include segmentGroup="comp_12"/>
                <include segmentGroup="comp_7"/>
                <include segmentGroup="comp_17"/>
                <include segmentGroup="comp_16"/>
                <include segmentGroup="comp_15"/>
                <include segmentGroup="comp_14"/>
                <include segmentGroup="comp_13"/>
                <include segmentGroup="comp_11"/>
                <include segmentGroup="comp_8"/>
                <include segmentGroup="comp_37"/>
                <include segmentGroup="comp_23"/>
                <include segmentGroup="comp_18"/>
                <include segmentGroup="comp_28"/>
                <include segmentGroup="comp_27"/>
                <include segmentGroup="comp_26"/>
                <include segmentGroup="comp_25"/>
                <include segmentGroup="comp_24"/>
                <include segmentGroup="comp_22"/>
                <include segmentGroup="comp_19"/>
                <include segmentGroup="comp_10"/>
                <include segmentGroup="comp_9"/>
                <include segmentGroup="comp_38"/>
                <include segmentGroup="comp_34"/>
                <include segmentGroup="comp_29"/>
                <include segmentGroup="comp_33"/>
                <include segmentGroup="comp_30"/>
                <include segmentGroup="comp_21"/>
                <include segmentGroup="comp_20"/>
                <include segmentGroup="comp_39"/>
                <include segmentGroup="comp_32"/>
                <include segmentGroup="comp_31"/>
                <include segmentGroup="comp_40"/>
                <include segmentGroup="comp_41"/>
                <include segmentGroup="comp_42"/>
                <include segmentGroup="comp_43"/>
                <include segmentGroup="comp_44"/>
            </segmentGroup>
            <segmentGroup id="ModelViewParmSubset_7">
                <include segmentGroup="comp_35"/>
                <include segmentGroup="comp_6"/>
                <include segmentGroup="comp_5"/>
                <include segmentGroup="comp_4"/>
                <include segmentGroup="comp_3"/>
                <include segmentGroup="comp_2"/>
                <include segmentGroup="comp_36"/>
                <include segmentGroup="comp_12"/>
                <include segmentGroup="comp_7"/>
                <include segmentGroup="comp_17"/>
                <include segmentGroup="comp_16"/>
                <include segmentGroup="comp_15"/>
                <include segmentGroup="comp_14"/>
                <include segmentGroup="comp_13"/>
                <include segmentGroup="comp_11"/>
                <include segmentGroup="comp_8"/>
                <include segmentGroup="comp_37"/>
                <include segmentGroup="comp_23"/>
                <include segmentGroup="comp_18"/>
                <include segmentGroup="comp_28"/>
                <include segmentGroup="comp_27"/>
                <include segmentGroup="comp_26"/>
                <include segmentGroup="comp_25"/>
                <include segmentGroup="comp_24"/>
                <include segmentGroup="comp_22"/>
                <include segmentGroup="comp_19"/>
                <include segmentGroup="comp_10"/>
                <include segmentGroup="comp_9"/>
                <include segmentGroup="comp_38"/>
                <include segmentGroup="comp_34"/>
                <include segmentGroup="comp_29"/>
                <include segmentGroup="comp_33"/>
                <include segmentGroup="comp_30"/>
                <include segmentGroup="comp_21"/>
                <include segmentGroup="comp_20"/>
                <include segmentGroup="comp_39"/>
                <include segmentGroup="comp_32"/>
                <include segmentGroup="comp_31"/>
            </segmentGroup>
            <segmentGroup id="ModelViewParmSubset_10">
                <include segmentGroup="comp_35"/>
                <include segmentGroup="comp_6"/>
                <include segmentGroup="comp_5"/>
                <include segmentGroup="comp_4"/>
                <include segmentGroup="comp_3"/>
                <include segmentGroup="comp_2"/>
                <include segmentGroup="comp_36"/>
                <include segmentGroup="comp_12"/>
                <include segmentGroup="comp_7"/>
                <include segmentGroup="comp_11"/>
                <include segmentGroup="comp_8"/>
                <include segmentGroup="comp_10"/>
                <include segmentGroup="comp_9"/>
            </segmentGroup>
            <segmentGroup id="OneSecGrp_SectionRef_3">
                <include segmentGroup="comp_35"/>
            </segmentGroup>
            <segmentGroup id="L5Pyr_dends">
                <include segmentGroup="comp_35"/>
                <include segmentGroup="comp_6"/>
                <include segmentGroup="comp_5"/>
                <include segmentGroup="comp_4"/>
                <include segmentGroup="comp_3"/>
                <include segmentGroup="comp_2"/>
                <include segmentGroup="comp_36"/>
                <include segmentGroup="comp_12"/>
                <include segmentGroup="comp_7"/>
                <include segmentGroup="comp_17"/>
                <include segmentGroup="comp_16"/>
                <include segmentGroup="comp_15"/>
                <include segmentGroup="comp_14"/>
                <include segmentGroup="comp_13"/>
                <include segmentGroup="comp_11"/>
                <include segmentGroup="comp_8"/>
                <include segmentGroup="comp_37"/>
                <include segmentGroup="comp_23"/>
                <include segmentGroup="comp_18"/>
                <include segmentGroup="comp_28"/>
                <include segmentGroup="comp_27"/>
                <include segmentGroup="comp_26"/>
                <include segmentGroup="comp_25"/>
                <include segmentGroup="comp_24"/>
                <include segmentGroup="comp_22"/>
                <include segmentGroup="comp_19"/>
                <include segmentGroup="comp_10"/>
                <include segmentGroup="comp_9"/>
                <include segmentGroup="comp_38"/>
                <include segmentGroup="comp_34"/>
                <include segmentGroup="comp_29"/>
                <include segmentGroup="comp_33"/>
                <include segmentGroup="comp_30"/>
                <include segmentGroup="comp_21"/>
                <include segmentGroup="comp_20"/>
                <include segmentGroup="comp_39"/>
                <include segmentGroup="comp_32"/>
                <include segmentGroup="comp_31"/>
                <include segmentGroup="comp_40"/>
                <include segmentGroup="comp_41"/>
                <include segmentGroup="comp_42"/>
                <include segmentGroup="comp_43"/>
                <include segmentGroup="comp_44"/>
            </segmentGroup>
            <segmentGroup id="L6Pyr_dends">
                <include segmentGroup="comp_35"/>
                <include segmentGroup="comp_6"/>
                <include segmentGroup="comp_5"/>
                <include segmentGroup="comp_4"/>
                <include segmentGroup="comp_3"/>
                <include segmentGroup="comp_2"/>
                <include segmentGroup="comp_36"/>
                <include segmentGroup="comp_12"/>
                <include segmentGroup="comp_7"/>
                <include segmentGroup="comp_17"/>
                <include segmentGroup="comp_16"/>
                <include segmentGroup="comp_15"/>
                <include segmentGroup="comp_14"/>
                <include segmentGroup="comp_13"/>
                <include segmentGroup="comp_11"/>
                <include segmentGroup="comp_8"/>
                <include segmentGroup="comp_37"/>
                <include segmentGroup="comp_23"/>
                <include segmentGroup="comp_18"/>
                <include segmentGroup="comp_28"/>
                <include segmentGroup="comp_27"/>
                <include segmentGroup="comp_26"/>
                <include segmentGroup="comp_25"/>
                <include segmentGroup="comp_24"/>
                <include segmentGroup="comp_22"/>
                <include segmentGroup="comp_19"/>
                <include segmentGroup="comp_10"/>
                <include segmentGroup="comp_9"/>
                <include segmentGroup="comp_38"/>
                <include segmentGroup="comp_34"/>
                <include segmentGroup="comp_29"/>
                <include segmentGroup="comp_33"/>
                <include segmentGroup="comp_30"/>
                <include segmentGroup="comp_21"/>
                <include segmentGroup="comp_20"/>
                <include segmentGroup="comp_39"/>
                <include segmentGroup="comp_32"/>
                <include segmentGroup="comp_31"/>
                <include segmentGroup="comp_40"/>
                <include segmentGroup="comp_41"/>
                <include segmentGroup="comp_42"/>
                <include segmentGroup="comp_43"/>
                <include segmentGroup="comp_44"/>
            </segmentGroup>
            <segmentGroup id="ModelViewParmSubset_9">
                <include segmentGroup="comp_6"/>
                <include segmentGroup="comp_5"/>
                <include segmentGroup="comp_4"/>
                <include segmentGroup="comp_3"/>
                <include segmentGroup="comp_2"/>
                <include segmentGroup="comp_36"/>
                <include segmentGroup="comp_12"/>
                <include segmentGroup="comp_7"/>
                <include segmentGroup="comp_17"/>
                <include segmentGroup="comp_16"/>
                <include segmentGroup="comp_15"/>
                <include segmentGroup="comp_14"/>
                <include segmentGroup="comp_13"/>
                <include segmentGroup="comp_11"/>
                <include segmentGroup="comp_8"/>
                <include segmentGroup="comp_37"/>
                <include segmentGroup="comp_23"/>
                <include segmentGroup="comp_18"/>
                <include segmentGroup="comp_28"/>
                <include segmentGroup="comp_27"/>
                <include segmentGroup="comp_26"/>
                <include segmentGroup="comp_25"/>
                <include segmentGroup="comp_24"/>
                <include segmentGroup="comp_22"/>
                <include segmentGroup="comp_19"/>
                <include segmentGroup="comp_10"/>
                <include segmentGroup="comp_9"/>
                <include segmentGroup="comp_38"/>
                <include segmentGroup="comp_34"/>
                <include segmentGroup="comp_29"/>
                <include segmentGroup="comp_33"/>
                <include segmentGroup="comp_30"/>
                <include segmentGroup="comp_21"/>
                <include segmentGroup="comp_20"/>
                <include segmentGroup="comp_39"/>
                <include segmentGroup="comp_32"/>
                <include segmentGroup="comp_31"/>
                <include segmentGroup="comp_40"/>
                <include segmentGroup="comp_41"/>
                <include segmentGroup="comp_42"/>
                <include segmentGroup="comp_43"/>
                <include segmentGroup="comp_44"/>
            </segmentGroup>
            <segmentGroup id="ModelViewParmSubset_11">
                <include segmentGroup="comp_6"/>
                <include segmentGroup="comp_5"/>
                <include segmentGroup="comp_4"/>
                <include segmentGroup="comp_3"/>
                <include segmentGroup="comp_2"/>
                <include segmentGroup="comp_36"/>
                <include segmentGroup="comp_12"/>
                <include segmentGroup="comp_7"/>
                <include segmentGroup="comp_11"/>
                <include segmentGroup="comp_8"/>
                <include segmentGroup="comp_10"/>
                <include segmentGroup="comp_9"/>
            </segmentGroup>
            <segmentGroup id="ModelViewParmSubset_12">
                <include segmentGroup="comp_17"/>
                <include segmentGroup="comp_16"/>
                <include segmentGroup="comp_15"/>
                <include segmentGroup="comp_14"/>
                <include segmentGroup="comp_13"/>
                <include segmentGroup="comp_37"/>
                <include segmentGroup="comp_23"/>
                <include segmentGroup="comp_18"/>
                <include segmentGroup="comp_28"/>
                <include segmentGroup="comp_27"/>
                <include segmentGroup="comp_26"/>
                <include segmentGroup="comp_25"/>
                <include segmentGroup="comp_24"/>
                <include segmentGroup="comp_22"/>
                <include segmentGroup="comp_19"/>
                <include segmentGroup="comp_38"/>
                <include segmentGroup="comp_34"/>
                <include segmentGroup="comp_29"/>
                <include segmentGroup="comp_33"/>
                <include segmentGroup="comp_30"/>
                <include segmentGroup="comp_21"/>
                <include segmentGroup="comp_20"/>
                <include segmentGroup="comp_39"/>
                <include segmentGroup="comp_32"/>
                <include segmentGroup="comp_31"/>
                <include segmentGroup="comp_40"/>
                <include segmentGroup="comp_41"/>
                <include segmentGroup="comp_42"/>
                <include segmentGroup="comp_43"/>
                <include segmentGroup="comp_44"/>
            </segmentGroup>
            <segmentGroup id="LTS_dends">
                <include segmentGroup="comp_17"/>
                <include segmentGroup="comp_16"/>
                <include segmentGroup="comp_15"/>
                <include segmentGroup="comp_14"/>
                <include segmentGroup="comp_13"/>
                <include segmentGroup="comp_23"/>
                <include segmentGroup="comp_18"/>
                <include segmentGroup="comp_28"/>
                <include segmentGroup="comp_27"/>
                <include segmentGroup="comp_26"/>
                <include segmentGroup="comp_25"/>
                <include segmentGroup="comp_24"/>
                <include segmentGroup="comp_22"/>
                <include segmentGroup="comp_19"/>
                <include segmentGroup="comp_34"/>
                <include segmentGroup="comp_29"/>
                <include segmentGroup="comp_33"/>
                <include segmentGroup="comp_30"/>
                <include segmentGroup="comp_21"/>
                <include segmentGroup="comp_20"/>
                <include segmentGroup="comp_39"/>
                <include segmentGroup="comp_32"/>
                <include segmentGroup="comp_31"/>
                <include segmentGroup="comp_40"/>
                <include segmentGroup="comp_41"/>
                <include segmentGroup="comp_42"/>
                <include segmentGroup="comp_43"/>
                <include segmentGroup="comp_44"/>
            </segmentGroup>
            <segmentGroup id="L4SS_dends">
                <include segmentGroup="comp_37"/>
                <include segmentGroup="comp_38"/>
                <include segmentGroup="comp_39"/>
                <include segmentGroup="comp_40"/>
                <include segmentGroup="comp_41"/>
            </segmentGroup>
            <segmentGroup id="distal_axon">
                <include segmentGroup="comp_50"/>
                <include segmentGroup="comp_48"/>
            </segmentGroup>
            <segmentGroup id="distal_dends">
                <include segmentGroup="comp_39"/>
                <include segmentGroup="comp_40"/>
                <include segmentGroup="comp_41"/>
                <include segmentGroup="comp_42"/>
                <include segmentGroup="comp_43"/>
                <include segmentGroup="comp_44"/>
            </segmentGroup>
            <segmentGroup id="apical_dend">
                <include segmentGroup="comp_39"/>
                <include segmentGroup="comp_40"/>
                <include segmentGroup="comp_41"/>
                <include segmentGroup="comp_42"/>
                <include segmentGroup="comp_43"/>
                <include segmentGroup="comp_44"/>
            </segmentGroup>
            <segmentGroup id="ModelViewParmSubset_8">
                <include segmentGroup="comp_40"/>
                <include segmentGroup="comp_41"/>
                <include segmentGroup="comp_42"/>
                <include segmentGroup="comp_43"/>
                <include segmentGroup="comp_44"/>
            </segmentGroup>
            <segmentGroup id="TCR_dends">
                <include segmentGroup="comp_40"/>
                <include segmentGroup="comp_41"/>
                <include segmentGroup="comp_42"/>
                <include segmentGroup="comp_43"/>
                <include segmentGroup="comp_44"/>
            </segmentGroup>
        </morphology>
        <biophysicalProperties id="biophys">
            <membraneProperties>
                <channelDensity id="ar_OneSecGrp_SectionRef_1" ionChannel="ar__m00_25" condDensity="0.25 mS_per_cm2" erev="-35.0 mV" segmentGroup="OneSecGrp_SectionRef_1" ion="ar"/>
                <channelDensity id="ar_ModelViewParmSubset_6" ionChannel="ar__m00_25" condDensity="0.5 mS_per_cm2" erev="-35.0 mV" segmentGroup="ModelViewParmSubset_6" ion="ar"/>
                <channelDensity id="cal_OneSecGrp_SectionRef_1" ionChannel="cal" condDensity="0.2 mS_per_cm2" erev="125.0 mV" segmentGroup="OneSecGrp_SectionRef_1" ion="ca"/>
                <channelDensity id="cal_ModelViewParmSubset_8" ionChannel="cal" condDensity="4.0 mS_per_cm2" erev="125.0 mV" segmentGroup="ModelViewParmSubset_8" ion="ca"/>
                <channelDensity id="cal_ModelViewParmSubset_7" ionChannel="cal" condDensity="0.4 mS_per_cm2" erev="125.0 mV" segmentGroup="ModelViewParmSubset_7" ion="ca"/>
                <channelDensity id="cat_OneSecGrp_SectionRef_1" ionChannel="cat" condDensity="0.1 mS_per_cm2" erev="125.0 mV" segmentGroup="OneSecGrp_SectionRef_1" ion="cat"/>
                <channelDensity id="cat_ModelViewParmSubset_6" ionChannel="cat" condDensity="0.2 mS_per_cm2" erev="125.0 mV" segmentGroup="ModelViewParmSubset_6" ion="cat"/>
                <channelDensity id="k2_ModelViewParmSubset_5" ionChannel="k2" condDensity="0.1 mS_per_cm2" erev="-95.0 mV" segmentGroup="ModelViewParmSubset_5" ion="k"/>
                <channelDensity id="k2_ModelViewParmSubset_6" ionChannel="k2" condDensity="0.2 mS_per_cm2" erev="-95.0 mV" segmentGroup="ModelViewParmSubset_6" ion="k"/>
                <channelDensity id="ka_OneSecGrp_SectionRef_1" ionChannel="ka" condDensity="119.0 mS_per_cm2" erev="-95.0 mV" segmentGroup="OneSecGrp_SectionRef_1" ion="k"/>
                <channelDensity id="ka_OneSecGrp_SectionRef_3" ionChannel="ka" condDensity="238.0 mS_per_cm2" erev="-95.0 mV" segmentGroup="OneSecGrp_SectionRef_3" ion="k"/>
                <channelDensity id="ka_ModelViewParmSubset_9" ionChannel="ka" condDensity="27.2 mS_per_cm2" erev="-95.0 mV" segmentGroup="ModelViewParmSubset_9" ion="k"/>
                <channelDensity id="ka_axon_group" ionChannel="ka" condDensity="4.0 mS_per_cm2" erev="-95.0 mV" segmentGroup="axon_group" ion="k"/>
                <channelDensity id="kahp_deeppyr_OneSecGrp_SectionRef_1" ionChannel="kahp_deeppyr" condDensity="0.2 mS_per_cm2" erev="-95.0 mV" segmentGroup="OneSecGrp_SectionRef_1" ion="k"/>
                <channelDensity id="kahp_deeppyr_ModelViewParmSubset_6" ionChannel="kahp_deeppyr" condDensity="0.4 mS_per_cm2" erev="-95.0 mV" segmentGroup="ModelViewParmSubset_6" ion="k"/>
                <channelDensity id="kc_OneSecGrp_SectionRef_1" ionChannel="kc" condDensity="15.0 mS_per_cm2" erev="-95.0 mV" segmentGroup="OneSecGrp_SectionRef_1" ion="k"/>
                <channelDensity id="kc_ModelViewParmSubset_10" ionChannel="kc" condDensity="30.0 mS_per_cm2" erev="-95.0 mV" segmentGroup="ModelViewParmSubset_10" ion="k"/>
                <channelDensity id="kdr_ModelViewParmSubset_11" ionChannel="kdr" condDensity="150.0 mS_per_cm2" erev="-95.0 mV" segmentGroup="ModelViewParmSubset_11" ion="k"/>
                <channelDensity id="kdr_OneSecGrp_SectionRef_1" ionChannel="kdr" condDensity="170.0 mS_per_cm2" erev="-95.0 mV" segmentGroup="OneSecGrp_SectionRef_1" ion="k"/>
                <channelDensity id="kdr_OneSecGrp_SectionRef_3" ionChannel="kdr" condDensity="240.0 mS_per_cm2" erev="-95.0 mV" segmentGroup="OneSecGrp_SectionRef_3" ion="k"/>
                <channelDensity id="kdr_axon_group" ionChannel="kdr" condDensity="450.0 mS_per_cm2" erev="-95.0 mV" segmentGroup="axon_group" ion="k"/>
                <channelDensity id="km_OneSecGrp_SectionRef_1" ionChannel="km" condDensity="4.2 mS_per_cm2" erev="-95.0 mV" segmentGroup="OneSecGrp_SectionRef_1" ion="k"/>
                <channelDensity id="km_ModelViewParmSubset_6" ionChannel="km" condDensity="8.4 mS_per_cm2" erev="-95.0 mV" segmentGroup="ModelViewParmSubset_6" ion="k"/>
                <channelDensity id="naf_ModelViewParmSubset_12" ionChannel="naf__a0__b0__c0__d0__fastNa_shiftmin3_5" condDensity="10.0 mS_per_cm2" erev="50.0 mV" segmentGroup="ModelViewParmSubset_12" ion="na"/>
                <channelDensity id="naf_ModelViewParmSubset_11" ionChannel="naf__a0__b0__c0__d0__fastNa_shiftmin3_5" condDensity="150.0 mS_per_cm2" erev="50.0 mV" segmentGroup="ModelViewParmSubset_11" ion="na"/>
                <channelDensity id="naf_OneSecGrp_SectionRef_1" ionChannel="naf__a0__b0__c0__d0__fastNa_shiftmin3_5" condDensity="200.0 mS_per_cm2" erev="50.0 mV" segmentGroup="OneSecGrp_SectionRef_1" ion="na"/>
                <channelDensity id="naf_OneSecGrp_SectionRef_3" ionChannel="naf__a0__b0__c0__d0__fastNa_shiftmin3_5" condDensity="300.0 mS_per_cm2" erev="50.0 mV" segmentGroup="OneSecGrp_SectionRef_3" ion="na"/>
                <channelDensity id="naf_axon_group" ionChannel="naf__a0__b0__c0__d0__fastNa_shiftmin3_5" condDensity="450.0 mS_per_cm2" erev="50.0 mV" segmentGroup="axon_group" ion="na"/>
                <channelDensity id="nap_OneSecGrp_SectionRef_3" ionChannel="nap" condDensity="0.12 mS_per_cm2" erev="50.0 mV" segmentGroup="OneSecGrp_SectionRef_3" ion="na"/>
                <channelDensity id="nap_ModelViewParmSubset_12" ionChannel="nap" condDensity="0.004 mS_per_cm2" erev="50.0 mV" segmentGroup="ModelViewParmSubset_12" ion="na"/>
                <channelDensity id="nap_ModelViewParmSubset_11" ionChannel="nap" condDensity="0.06 mS_per_cm2" erev="50.0 mV" segmentGroup="ModelViewParmSubset_11" ion="na"/>
                <channelDensity id="nap_OneSecGrp_SectionRef_1" ionChannel="nap" condDensity="0.08 mS_per_cm2" erev="50.0 mV" segmentGroup="OneSecGrp_SectionRef_1" ion="na"/>
                <channelDensity id="pas_axon_group" ionChannel="pas" condDensity="1.0 mS_per_cm2" erev="-70.0 mV" segmentGroup="axon_group" ion="non_specific"/>
                <channelDensity id="pas_OneSecGrp_SectionRef_1" ionChannel="pas" condDensity="0.02 mS_per_cm2" erev="-70.0 mV" segmentGroup="OneSecGrp_SectionRef_1" ion="non_specific"/>
                <channelDensity id="pas_ModelViewParmSubset_6" ionChannel="pas" condDensity="0.04 mS_per_cm2" erev="-70.0 mV" segmentGroup="ModelViewParmSubset_6" ion="non_specific"/>
                <spikeThresh value="0.0 mV"/>
                <specificCapacitance value="1.8 uF_per_cm2" segmentGroup="ModelViewParmSubset_6"/>
                <specificCapacitance value="0.9 uF_per_cm2" segmentGroup="ModelViewParmSubset_5"/>
                <initMembPotential value="-70.0 mV"/>
            </membraneProperties>
            <intracellularProperties>
                <species segmentGroup="ModelViewParmSubset_6" id="ca" concentrationModel="cad__beta0_05__phi65000" ion="ca" initialConcentration="1.0E-8 mol_per_cm3" initialExtConcentration="2.0E-6 mol_per_cm3"/>
                <species segmentGroup="OneSecGrp_SectionRef_1" id="ca" concentrationModel="cad__beta0_01__phi13000" ion="ca" initialConcentration="1.0E-8 mol_per_cm3" initialExtConcentration="2.0E-6 mol_per_cm3"/>
                <resistivity value="0.1 kohm_cm" segmentGroup="axon_group"/>
                <resistivity value="0.25 kohm_cm" segmentGroup="ModelViewParmSubset_1"/>
            </intracellularProperties>
        </biophysicalProperties>
    </cell>
</neuroml>
