<neuroml xmlns="http://www.neuroml.org/schema/neuroml2"  xmlns:xs="http://www.w3.org/2001/XMLSchema" xmlns:xsi="http://www.w3.org/2001/XMLSchema-instance" xsi:schemaLocation="http://www.neuroml.org/schema/neuroml2 https://raw.github.com/NeuroML/NeuroML2/development/Schemas/NeuroML2/NeuroML_v2beta4.xsd" id="TestRunColumn">
    <notes>

This NeuroML 2 file was generated by OpenCortex v0.0.5 using:
    libNeuroML v0.2.17
    pyNeuroML v0.1.13

    </notes>
    <property tag="Python random seed" value="1234"/>
    <include href="TestRunColumn/L23PyrRS.cell.nml"></include>
    <include href="TestRunColumn/ar__m00_25.channel.nml"></include>
    <include href="TestRunColumn/cad__beta0_01__phi26000.nml"></include>
    <include href="TestRunColumn/cad__beta0_05__phi52000.nml"></include>
    <include href="TestRunColumn/cal.channel.nml"></include>
    <include href="TestRunColumn/cat.channel.nml"></include>
    <include href="TestRunColumn/k2.channel.nml"></include>
    <include href="TestRunColumn/ka.channel.nml"></include>
    <include href="TestRunColumn/kahp.channel.nml"></include>
    <include href="TestRunColumn/kc.channel.nml"></include>
    <include href="TestRunColumn/kdr.channel.nml"></include>
    <include href="TestRunColumn/km.channel.nml"></include>
    <include href="TestRunColumn/naf__a0__b0__c0__d0__fastNa_shiftmin3_5.channel.nml"></include>
    <include href="TestRunColumn/nap.channel.nml"></include>
    <include href="TestRunColumn/pas.channel.nml"></include>
    <include href="TestRunColumn/SupBasket.cell.nml"></include>
    <include href="TestRunColumn/ar__m00_25.channel.nml"></include>
    <include href="TestRunColumn/cad__beta0_02__phi260000.nml"></include>
    <include href="TestRunColumn/cad__beta0_05__phi520000.nml"></include>
    <include href="TestRunColumn/cal.channel.nml"></include>
    <include href="TestRunColumn/cat.channel.nml"></include>
    <include href="TestRunColumn/k2.channel.nml"></include>
    <include href="TestRunColumn/ka.channel.nml"></include>
    <include href="TestRunColumn/kahp_slower.channel.nml"></include>
    <include href="TestRunColumn/kc_fast.channel.nml"></include>
    <include href="TestRunColumn/kdr_fs.channel.nml"></include>
    <include href="TestRunColumn/km.channel.nml"></include>
    <include href="TestRunColumn/naf2__a0__b0__c0__d0__fastNa_shiftmin2_5.channel.nml"></include>
    <include href="TestRunColumn/nap.channel.nml"></include>
    <include href="TestRunColumn/pas.channel.nml"></include>
    <include href="TestRunColumn/Syn_AMPA_SupPyr_SupFS.synapse.nml"></include>
    <include href="TestRunColumn/Syn_AMPA_SupPyr_SupPyr.synapse.nml"></include>
    <include href="TestRunColumn/Syn_Elect_CortIN_CortIN.synapse.nml"></include>
    <include href="TestRunColumn/Syn_Elect_SupPyr_SupPyr.synapse.nml"></include>
    <include href="TestRunColumn/Syn_GABAA_SupBask_SupBask.synapse.nml"></include>
    <include href="TestRunColumn/Syn_GABAA_SupBask_SupPyr.synapse.nml"></include>
    <include href="TestRunColumn/Syn_NMDA_RSPyr_SupFS.synapse.nml"></include>
    <include href="TestRunColumn/Syn_NMDA_SupPyr_SupPyr.synapse.nml"></include>
    <transientPoissonFiringSynapse id="L23PyrRS_in_L23_InputGroup0_TransPoiSyn0" averageRate="200.000000 Hz" delay="50.000000 ms" duration="100.000000 ms" synapse="Syn_AMPA_SupPyr_SupPyr" spikeTarget="./Syn_AMPA_SupPyr_SupPyr"/>
    <transientPoissonFiringSynapse id="L23PyrRS_in_L23_InputGroup0_TransPoiSyn1" averageRate="150.000000 Hz" delay="200.000000 ms" duration="50.000000 ms" synapse="Syn_AMPA_SupPyr_SupPyr" spikeTarget="./Syn_AMPA_SupPyr_SupPyr"/>
    <network id="TestRunColumn" type="networkWithTemperature" temperature="32degC">
        <population id="SupBasket_L23" component="SupBasket" size="9" type="populationList">
            <instance id="0">
                <location x="483.226767845999973" y="-220.366299588000004" z="3.74573502929"/>
            </instance>
            <instance id="1">
                <location x="455.487981224999999" y="-469.634498682000014" z="291.113786528999981"/>
            </instance>
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        </population>
        <population id="L23PyrRS_L23" component="L23PyrRS" size="100" type="populationList">
            <instance id="0">
                <location x="134.792751909999993" y="-278.216280277999999" z="322.317117089000021"/>
            </instance>
            <instance id="1">
                <location x="240.518185683000013" y="-177.619573720999995" z="124.576060681000001"/>
            </instance>
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        </population>
        <projection id="Proj0syn0_SupBasket_L23_SupBasket_L23" presynapticPopulation="SupBasket_L23" postsynapticPopulation="SupBasket_L23" synapse="Syn_GABAA_SupBask_SupBask">
            <connectionWD id="0" preCellId="../SupBasket_L23/2/SupBasket" postCellId="../SupBasket_L23/0/SupBasket" postSegmentId="45" postFractionAlong="0.651992016372" weight="1." delay="0 ms"/>
            <connectionWD id="1" preCellId="../SupBasket_L23/3/SupBasket" postCellId="../SupBasket_L23/0/SupBasket" postSegmentId="9" postFractionAlong="0.4290873086" weight="1." delay="0 ms"/>
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        </projection>
        <projection id="Proj2syn0_SupBasket_L23_L23PyrRS_L23" presynapticPopulation="SupBasket_L23" postsynapticPopulation="L23PyrRS_L23" synapse="Syn_GABAA_SupBask_SupPyr">
            <connectionWD id="0" preCellId="../SupBasket_L23/5/SupBasket" postCellId="../L23PyrRS_L23/0/L23PyrRS" postSegmentId="77" postFractionAlong="0.523294085708" weight="1." delay="0 ms"/>
            <connectionWD id="1" preCellId="../SupBasket_L23/7/SupBasket" postCellId="../L23PyrRS_L23/0/L23PyrRS" postSegmentId="3" postFractionAlong="0.326545024733" weight="1." delay="0 ms"/>
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        </projection>
        <projection id="Proj3syn0_L23PyrRS_L23_SupBasket_L23" presynapticPopulation="L23PyrRS_L23" postsynapticPopulation="SupBasket_L23" synapse="Syn_AMPA_SupPyr_SupFS">
            <connectionWD id="0" preCellId="../L23PyrRS_L23/91/L23PyrRS" postCellId="../SupBasket_L23/0/SupBasket" postSegmentId="91" postFractionAlong="0.527988487377" weight="1." delay="0 ms"/>
            <connectionWD id="1" preCellId="../L23PyrRS_L23/93/L23PyrRS" postCellId="../SupBasket_L23/0/SupBasket" postSegmentId="93" postFractionAlong="0.881807246403" weight="1." delay="0 ms"/>
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        </projection>
        <projection id="Proj3syn1_L23PyrRS_L23_SupBasket_L23" presynapticPopulation="L23PyrRS_L23" postsynapticPopulation="SupBasket_L23" synapse="Syn_NMDA_RSPyr_SupFS">
            <connectionWD id="0" preCellId="../L23PyrRS_L23/91/L23PyrRS" postCellId="../SupBasket_L23/0/SupBasket" postSegmentId="91" postFractionAlong="0.527988487377" weight="1." delay="0 ms"/>
            <connectionWD id="1" preCellId="../L23PyrRS_L23/93/L23PyrRS" postCellId="../SupBasket_L23/0/SupBasket" postSegmentId="93" postFractionAlong="0.881807246403" weight="1." delay="0 ms"/>
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        </projection>
        <projection id="Proj4syn0_L23PyrRS_L23_L23PyrRS_L23" presynapticPopulation="L23PyrRS_L23" postsynapticPopulation="L23PyrRS_L23" synapse="Syn_AMPA_SupPyr_SupPyr">
            <connectionWD id="0" preCellId="../L23PyrRS_L23/8/L23PyrRS" postCellId="../L23PyrRS_L23/0/L23PyrRS" postSegmentId="4" postFractionAlong="0.505676261539" weight="1." delay="0 ms"/>
            <connectionWD id="1" preCellId="../L23PyrRS_L23/48/L23PyrRS" postCellId="../L23PyrRS_L23/0/L23PyrRS" postSegmentId="11" postFractionAlong="0.971584828486" weight="1." delay="0 ms"/>
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        </projection>
        <projection id="Proj4syn1_L23PyrRS_L23_L23PyrRS_L23" presynapticPopulation="L23PyrRS_L23" postsynapticPopulation="L23PyrRS_L23" synapse="Syn_NMDA_SupPyr_SupPyr">
            <connectionWD id="0" preCellId="../L23PyrRS_L23/8/L23PyrRS" postCellId="../L23PyrRS_L23/0/L23PyrRS" postSegmentId="4" postFractionAlong="0.505676261539" weight="1." delay="0 ms"/>
            <connectionWD id="1" preCellId="../L23PyrRS_L23/48/L23PyrRS" postCellId="../L23PyrRS_L23/0/L23PyrRS" postSegmentId="11" postFractionAlong="0.971584828486" weight="1." delay="0 ms"/>
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        </projection>
        <electricalProjection id="Proj1syn0_SupBasket_L23_SupBasket_L23" presynapticPopulation="SupBasket_L23" postsynapticPopulation="SupBasket_L23">
            <electricalConnectionInstance id="0" preCell="../SupBasket_L23/5/SupBasket" postCell="../SupBasket_L23/0/SupBasket" postSegment="70" postFractionAlong="0.323169759635" synapse="Syn_Elect_CortIN_CortIN"/>
            <electricalConnectionInstance id="1" preCell="../SupBasket_L23/7/SupBasket" postCell="../SupBasket_L23/0/SupBasket" postSegment="34" postFractionAlong="0.0568812040424" synapse="Syn_Elect_CortIN_CortIN"/>
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        </electricalProjection>
        <electricalProjection id="Proj5syn0_L23PyrRS_L23_L23PyrRS_L23" presynapticPopulation="L23PyrRS_L23" postsynapticPopulation="L23PyrRS_L23">
            <electricalConnectionInstance id="0" preCell="../L23PyrRS_L23/28/L23PyrRS" postCell="../L23PyrRS_L23/0/L23PyrRS" postSegment="146" postFractionAlong="0.56614353127" synapse="Syn_Elect_SupPyr_SupPyr"/>
            <electricalConnectionInstance id="1" preCell="../L23PyrRS_L23/75/L23PyrRS" postCell="../L23PyrRS_L23/1/L23PyrRS" postSegment="137" postFractionAlong="0.690213621252" synapse="Syn_Elect_SupPyr_SupPyr"/>
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        </electricalProjection>
        <inputList id="L23PyrRS_in_L23_InputGroup0_0" population="L23PyrRS_L23" component="L23PyrRS_in_L23_InputGroup0_TransPoiSyn0">
            <input id="0" target="../L23PyrRS_L23/91/L23PyrRS" destination="synapses" segmentId="0" fractionAlong="0.122455"/>
            <input id="2" target="../L23PyrRS_L23/2/L23PyrRS" destination="synapses" segmentId="0" fractionAlong="0.197772"/>
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        </inputList>
        <inputList id="L23PyrRS_in_L23_InputGroup0_1" population="L23PyrRS_L23" component="L23PyrRS_in_L23_InputGroup0_TransPoiSyn1">
            <input id="1" target="../L23PyrRS_L23/91/L23PyrRS" destination="synapses" segmentId="0" fractionAlong="0.122455"/>
            <input id="3" target="../L23PyrRS_L23/2/L23PyrRS" destination="synapses" segmentId="0" fractionAlong="0.197772"/>
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        </inputList>
    </network>
</neuroml>
