<neuroml xmlns="http://www.neuroml.org/schema/neuroml2"  xmlns:xs="http://www.w3.org/2001/XMLSchema" xmlns:xsi="http://www.w3.org/2001/XMLSchema-instance" xsi:schemaLocation="http://www.neuroml.org/schema/neuroml2 https://raw.github.com/NeuroML/NeuroML2/development/Schemas/NeuroML2/NeuroML_v2beta5.xsd" id="TestSmall">
    <notes>

This NeuroML 2 file was generated by OpenCortex v0.1.8 using:
    libNeuroML v0.2.36
    pyNeuroML v0.3.5

    </notes>
    <property tag="Network seed" value="134344"/>
    <include href="TestSmall/DeepLTSInter.cell.nml"></include>
    <include href="TestSmall/ar__m00_25.channel.nml"></include>
    <include href="TestSmall/cad__beta0_02__phi260000.nml"></include>
    <include href="TestSmall/cad__beta0_05__phi520000.nml"></include>
    <include href="TestSmall/cal.channel.nml"></include>
    <include href="TestSmall/cat_a.channel.nml"></include>
    <include href="TestSmall/k2.channel.nml"></include>
    <include href="TestSmall/ka.channel.nml"></include>
    <include href="TestSmall/kahp_slower.channel.nml"></include>
    <include href="TestSmall/kc_fast.channel.nml"></include>
    <include href="TestSmall/kdr_fs.channel.nml"></include>
    <include href="TestSmall/km.channel.nml"></include>
    <include href="TestSmall/naf2__a0__b0__c0__d0__fastNa_shiftmin2_5.channel.nml"></include>
    <include href="TestSmall/nap.channel.nml"></include>
    <include href="TestSmall/pas.channel.nml"></include>
    <include href="TestSmall/SupBasket.cell.nml"></include>
    <include href="TestSmall/cat.channel.nml"></include>
    <include href="TestSmall/L4SpinyStellate.cell.nml"></include>
    <include href="TestSmall/ar__m00.channel.nml"></include>
    <include href="TestSmall/cad__beta0_05__phi260000.nml"></include>
    <include href="TestSmall/napf_spinstell__a0__b0__c0__d0__shmin2_5.channel.nml"></include>
    <include href="TestSmall/L6NonTuftedPyrRS.cell.nml"></include>
    <include href="TestSmall/cad__beta0_01__phi13000.nml"></include>
    <include href="TestSmall/cad__beta0_05__phi65000.nml"></include>
    <include href="TestSmall/kahp_deeppyr.channel.nml"></include>
    <include href="TestSmall/kc.channel.nml"></include>
    <include href="TestSmall/kdr.channel.nml"></include>
    <include href="TestSmall/naf__a0__b0__c0__d0__fastNa_shiftmin3_5.channel.nml"></include>
    <include href="TestSmall/DeepBasket.cell.nml"></include>
    <include href="TestSmall/L23PyrRS.cell.nml"></include>
    <include href="TestSmall/cad__beta0_01__phi26000.nml"></include>
    <include href="TestSmall/cad__beta0_05__phi52000.nml"></include>
    <include href="TestSmall/kahp.channel.nml"></include>
    <include href="TestSmall/L5TuftedPyrIB.cell.nml"></include>
    <include href="TestSmall/cad__beta0_01__phi4333_33.nml"></include>
    <include href="TestSmall/cad__beta0_02__phi86666_7.nml"></include>
    <include href="TestSmall/cad__beta0_075__phi86666_7.nml"></include>
    <include href="TestSmall/ka_ib.channel.nml"></include>
    <include href="TestSmall/SupLTSInter.cell.nml"></include>
    <include href="TestSmall/L5TuftedPyrRS.cell.nml"></include>
    <include href="TestSmall/L23PyrFRB_varInit.cell.nml"></include>
    <include href="TestSmall/DeepAxAx.cell.nml"></include>
    <include href="TestSmall/SupAxAx.cell.nml"></include>
    <include href="TestSmall/Syn_AMPA_L4SS_IN.synapse.nml"></include>
    <include href="TestSmall/Syn_AMPA_L4SS_L4SS.synapse.nml"></include>
    <include href="TestSmall/Syn_AMPA_L4SS_Pyr.synapse.nml"></include>
    <include href="TestSmall/Syn_AMPA_L5IB_DeepFS.synapse.nml"></include>
    <include href="TestSmall/Syn_AMPA_L5IB_DeepLTS.synapse.nml"></include>
    <include href="TestSmall/Syn_AMPA_L5IB_L4SS.synapse.nml"></include>
    <include href="TestSmall/Syn_AMPA_L5IB_L5Pyr.synapse.nml"></include>
    <include href="TestSmall/Syn_AMPA_L5IB_L6NT.synapse.nml"></include>
    <include href="TestSmall/Syn_AMPA_L5IB_SupFS.synapse.nml"></include>
    <include href="TestSmall/Syn_AMPA_L5IB_SupLTS.synapse.nml"></include>
    <include href="TestSmall/Syn_AMPA_L5IB_SupPyr.synapse.nml"></include>
    <include href="TestSmall/Syn_AMPA_L5RS_DeepFS.synapse.nml"></include>
    <include href="TestSmall/Syn_AMPA_L5RS_DeepLTS.synapse.nml"></include>
    <include href="TestSmall/Syn_AMPA_L5RS_L4SS.synapse.nml"></include>
    <include href="TestSmall/Syn_AMPA_L5RS_L5Pyr.synapse.nml"></include>
    <include href="TestSmall/Syn_AMPA_L5RS_L6NT.synapse.nml"></include>
    <include href="TestSmall/Syn_AMPA_L5RS_SupFS.synapse.nml"></include>
    <include href="TestSmall/Syn_AMPA_L5RS_SupLTS.synapse.nml"></include>
    <include href="TestSmall/Syn_AMPA_L5RS_SupPyr.synapse.nml"></include>
    <include href="TestSmall/Syn_AMPA_L6NT_DeepFS.synapse.nml"></include>
    <include href="TestSmall/Syn_AMPA_L6NT_DeepLTS.synapse.nml"></include>
    <include href="TestSmall/Syn_AMPA_L6NT_L4SS.synapse.nml"></include>
    <include href="TestSmall/Syn_AMPA_L6NT_L5Pyr.synapse.nml"></include>
    <include href="TestSmall/Syn_AMPA_L6NT_L6NT.synapse.nml"></include>
    <include href="TestSmall/Syn_AMPA_L6NT_SupFS.synapse.nml"></include>
    <include href="TestSmall/Syn_AMPA_L6NT_SupLTS.synapse.nml"></include>
    <include href="TestSmall/Syn_AMPA_L6NT_SupPyr.synapse.nml"></include>
    <include href="TestSmall/Syn_AMPA_SupPyr_DeepFS.synapse.nml"></include>
    <include href="TestSmall/Syn_AMPA_SupPyr_DeepLTS.synapse.nml"></include>
    <include href="TestSmall/Syn_AMPA_SupPyr_L4SS.synapse.nml"></include>
    <include href="TestSmall/Syn_AMPA_SupPyr_L5Pyr.synapse.nml"></include>
    <include href="TestSmall/Syn_AMPA_SupPyr_L6NT.synapse.nml"></include>
    <include href="TestSmall/Syn_AMPA_SupPyr_SupFS.synapse.nml"></include>
    <include href="TestSmall/Syn_AMPA_SupPyr_SupLTS.synapse.nml"></include>
    <include href="TestSmall/Syn_AMPA_SupPyr_SupPyr.synapse.nml"></include>
    <include href="TestSmall/Syn_GABAA_DeepAxAx_Pyr.synapse.nml"></include>
    <include href="TestSmall/Syn_GABAA_DeepBask_DeepFS.synapse.nml"></include>
    <include href="TestSmall/Syn_GABAA_DeepBask_DeepLTS.synapse.nml"></include>
    <include href="TestSmall/Syn_GABAA_DeepBask_L5Pyr.synapse.nml"></include>
    <include href="TestSmall/Syn_GABAA_DeepBask_L6NT.synapse.nml"></include>
    <include href="TestSmall/Syn_GABAA_DeepFS_L4SS.synapse.nml"></include>
    <include href="TestSmall/Syn_GABAA_DeepLTS_DeepFS.synapse.nml"></include>
    <include href="TestSmall/Syn_GABAA_DeepLTS_DeepLTS.synapse.nml"></include>
    <include href="TestSmall/Syn_GABAA_DeepLTS_L4SS.synapse.nml"></include>
    <include href="TestSmall/Syn_GABAA_DeepLTS_L5IB.synapse.nml"></include>
    <include href="TestSmall/Syn_GABAA_DeepLTS_L5RS.synapse.nml"></include>
    <include href="TestSmall/Syn_GABAA_DeepLTS_L6NT.synapse.nml"></include>
    <include href="TestSmall/Syn_GABAA_DeepLTS_SupFS.synapse.nml"></include>
    <include href="TestSmall/Syn_GABAA_DeepLTS_SupLTS.synapse.nml"></include>
    <include href="TestSmall/Syn_GABAA_DeepLTS_SupPyr.synapse.nml"></include>
    <include href="TestSmall/Syn_GABAA_SupAxAx_DeepPyr.synapse.nml"></include>
    <include href="TestSmall/Syn_GABAA_SupAxAx_L4SS.synapse.nml"></include>
    <include href="TestSmall/Syn_GABAA_SupAxAx_SupPyr.synapse.nml"></include>
    <include href="TestSmall/Syn_GABAA_SupBask_L4SS.synapse.nml"></include>
    <include href="TestSmall/Syn_GABAA_SupBask_SupAxAx.synapse.nml"></include>
    <include href="TestSmall/Syn_GABAA_SupBask_SupBask.synapse.nml"></include>
    <include href="TestSmall/Syn_GABAA_SupBask_SupLTS.synapse.nml"></include>
    <include href="TestSmall/Syn_GABAA_SupBask_SupPyr.synapse.nml"></include>
    <include href="TestSmall/Syn_GABAA_SupLTS_FS.synapse.nml"></include>
    <include href="TestSmall/Syn_GABAA_SupLTS_L4SS.synapse.nml"></include>
    <include href="TestSmall/Syn_GABAA_SupLTS_L5Pyr.synapse.nml"></include>
    <include href="TestSmall/Syn_GABAA_SupLTS_L6NT.synapse.nml"></include>
    <include href="TestSmall/Syn_GABAA_SupLTS_LTS.synapse.nml"></include>
    <include href="TestSmall/Syn_GABAA_SupLTS_SupPyr.synapse.nml"></include>
    <include href="TestSmall/Syn_NMDA_FRBPyr_DeepLTS.synapse.nml"></include>
    <include href="TestSmall/Syn_NMDA_FRBPyr_SupFS.synapse.nml"></include>
    <include href="TestSmall/Syn_NMDA_FRBPyr_SupLTS.synapse.nml"></include>
    <include href="TestSmall/Syn_NMDA_L4SS_IN.synapse.nml"></include>
    <include href="TestSmall/Syn_NMDA_L4SS_L4SS.synapse.nml"></include>
    <include href="TestSmall/Syn_NMDA_L4SS_Pyr.synapse.nml"></include>
    <include href="TestSmall/Syn_NMDA_L5IB_DeepPyr.synapse.nml"></include>
    <include href="TestSmall/Syn_NMDA_L5IB_IN.synapse.nml"></include>
    <include href="TestSmall/Syn_NMDA_L5IB_L4SS.synapse.nml"></include>
    <include href="TestSmall/Syn_NMDA_L5IB_SupPyr.synapse.nml"></include>
    <include href="TestSmall/Syn_NMDA_L5RS_DeepIN.synapse.nml"></include>
    <include href="TestSmall/Syn_NMDA_L5RS_DeepPyr.synapse.nml"></include>
    <include href="TestSmall/Syn_NMDA_L5RS_L4SS.synapse.nml"></include>
    <include href="TestSmall/Syn_NMDA_L5RS_SupIN.synapse.nml"></include>
    <include href="TestSmall/Syn_NMDA_L5RS_SupPyr.synapse.nml"></include>
    <include href="TestSmall/Syn_NMDA_L6NT_DeepFS.synapse.nml"></include>
    <include href="TestSmall/Syn_NMDA_L6NT_DeepLTS.synapse.nml"></include>
    <include href="TestSmall/Syn_NMDA_L6NT_DeepPyr.synapse.nml"></include>
    <include href="TestSmall/Syn_NMDA_L6NT_L4SS.synapse.nml"></include>
    <include href="TestSmall/Syn_NMDA_L6NT_SupFS.synapse.nml"></include>
    <include href="TestSmall/Syn_NMDA_L6NT_SupLTS.synapse.nml"></include>
    <include href="TestSmall/Syn_NMDA_L6NT_SupPyr.synapse.nml"></include>
    <include href="TestSmall/Syn_NMDA_RSPyr_DeepLTS.synapse.nml"></include>
    <include href="TestSmall/Syn_NMDA_RSPyr_SupFS.synapse.nml"></include>
    <include href="TestSmall/Syn_NMDA_RSPyr_SupLTS.synapse.nml"></include>
    <include href="TestSmall/Syn_NMDA_SupPyr_DeepFS.synapse.nml"></include>
    <include href="TestSmall/Syn_NMDA_SupPyr_L4SS.synapse.nml"></include>
    <include href="TestSmall/Syn_NMDA_SupPyr_L5Pyr.synapse.nml"></include>
    <include href="TestSmall/Syn_NMDA_SupPyr_L6NT.synapse.nml"></include>
    <include href="TestSmall/Syn_NMDA_SupPyr_SupPyr.synapse.nml"></include>
    <include href="TestSmall/SynForEctStim.synapse.nml"></include>
    <pulseGenerator id="DepCurr_L4SS_TO_CG3D_L4SpinStell_Pulse" delay="0.0 ms" duration="20000.0 ms" amplitude="1 uA"/>
    <pulseGenerator id="DepCurr_L5IB_TO_CG3D_L5TuftIB_Pulse" delay="0.0 ms" duration="20000.0 ms" amplitude="1 uA"/>
    <pulseGenerator id="DepCurr_L23FRB_TO_CG3D_L23PyrFRB_Pulse" delay="0.0 ms" duration="20000.0 ms" amplitude="1 uA"/>
    <pulseGenerator id="DepCurr_L6NT_TO_CG3D_L6NonTuftRS_Pulse" delay="0.0 ms" duration="20000.0 ms" amplitude="1 uA"/>
    <pulseGenerator id="DepCurr_L23RS_TO_CG3D_L23PyrRS_Pulse" delay="0.0 ms" duration="20000.0 ms" amplitude="1 uA"/>
    <pulseGenerator id="DepCurr_L5RS_TO_CG3D_L5TuftRS_Pulse" delay="0.0 ms" duration="20000.0 ms" amplitude="1 uA"/>
    <poissonFiringSynapse id="BackgroundL5_TO_CG3D_L5TuftIB_PoiSyn0" averageRate="100.000000 Hz" synapse="Syn_AMPA_L5RS_L5Pyr" spikeTarget="./Syn_AMPA_L5RS_L5Pyr"/>
    <poissonFiringSynapse id="EctopicStimL5IB_TO_CG3D_L5TuftIB_PoiSyn0" averageRate="1.000000 Hz" synapse="SynForEctStim" spikeTarget="./SynForEctStim"/>
    <poissonFiringSynapse id="EctopicStimL23FRB_TO_CG3D_L23PyrFRB_PoiSyn0" averageRate="0.100000 Hz" synapse="SynForEctStim" spikeTarget="./SynForEctStim"/>
    <poissonFiringSynapse id="EctopicStimL6NT_TO_CG3D_L6NonTuftRS_PoiSyn0" averageRate="1.000000 Hz" synapse="SynForEctStim" spikeTarget="./SynForEctStim"/>
    <poissonFiringSynapse id="BackgroundL23RS_TO_CG3D_L23PyrRS_PoiSyn0" averageRate="100.000000 Hz" synapse="Syn_AMPA_SupPyr_SupPyr" spikeTarget="./Syn_AMPA_SupPyr_SupPyr"/>
    <poissonFiringSynapse id="EctopicStimL23RS_TO_CG3D_L23PyrRS_PoiSyn0" averageRate="0.100000 Hz" synapse="SynForEctStim" spikeTarget="./SynForEctStim"/>
    <poissonFiringSynapse id="EctopicStimL5RS_TO_CG3D_L5TuftRS_PoiSyn0" averageRate="1.000000 Hz" synapse="SynForEctStim" spikeTarget="./SynForEctStim"/>
    <network id="TestSmall" type="networkWithTemperature" temperature="32degC">
        <population id="CG3D_DeepAxAx" component="DeepAxAx" size="1" type="populationList">
            <instance id="0">
                <location x="-158.841310297000007" y="-1258.071399749999955" z="10.9331207863"/>
            </instance>
        </population>
        <population id="CG3D_DeepLTS" component="DeepLTSInter" size="1" type="populationList">
            <instance id="0">
                <location x="141.792475313000011" y="-1175.11612912999999" z="151.145387168000013"/>
            </instance>
        </population>
        <population id="CG3D_L4SpinStell" component="L4SpinyStellate" size="2" type="populationList">
            <instance id="0">
                <location x="-97.095312510799999" y="-691.434056745000021" z="201.078817444999999"/>
            </instance>
            <instance id="1">
                <location x="-143.090450519000001" y="-639.457397034999985" z="-9.63519612084"/>
            </instance>
        </population>
        <population id="CG3D_L5TuftIB" component="L5TuftedPyrIB" size="8" type="populationList">
            <instance id="0">
                <location x="61.440847859400002" y="-810.916380160000017" z="135.961968380000002"/>
            </instance>
            <instance id="1">
                <location x="-16.360709678500001" y="-878.307646453999951" z="68.076998188100006"/>
            </instance>
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        </population>
        <population id="CG3D_L23PyrFRB" component="L23PyrFRB_varInit" size="1" type="populationList">
            <instance id="0">
                <location x="-69.673970340300002" y="-474.283611356999984" z="-108.914323581999994"/>
            </instance>
        </population>
        <population id="CG3D_L6NonTuftRS" component="L6NonTuftedPyrRS" size="5" type="populationList">
            <instance id="0">
                <location x="82.642052868899995" y="-1189.908589200000051" z="-61.751059725300003"/>
            </instance>
            <instance id="1">
                <location x="121.831003608000003" y="-1098.932665909999969" z="-54.942374477800001"/>
            </instance>
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        </population>
        <population id="CG3D_DeepBask" component="DeepBasket" size="1" type="populationList">
            <instance id="0">
                <location x="174.863527169000008" y="-1052.775881100000106" z="-77.199821601500005"/>
            </instance>
        </population>
        <population id="CG3D_L23PyrRS" component="L23PyrRS" size="10" type="populationList">
            <instance id="0">
                <location x="-3.7172103294" y="-263.769193340000015" z="-59.610652127900003"/>
            </instance>
            <instance id="1">
                <location x="212.071541481999986" y="-55.430577769599999" z="-102.903240093999997"/>
            </instance>
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        </population>
        <population id="CG3D_SupAxAx" component="SupAxAx" size="1" type="populationList">
            <instance id="0">
                <location x="187.922266110999999" y="-223.541890913000003" z="14.880047981100001"/>
            </instance>
        </population>
        <population id="CG3D_L5TuftRS" component="L5TuftedPyrRS" size="2" type="populationList">
            <instance id="0">
                <location x="231.090436536999988" y="-945.891316369000037" z="-56.676816259200002"/>
            </instance>
            <instance id="1">
                <location x="-164.801989305000006" y="-711.720651870999973" z="94.223244537699998"/>
            </instance>
        </population>
        <population id="CG3D_SupLTS" component="SupLTSInter" size="1" type="populationList">
            <instance id="0">
                <location x="-77.917568409300003" y="-411.77791522199999" z="-89.057911784599995"/>
            </instance>
        </population>
        <population id="CG3D_SupBask" component="SupBasket" size="1" type="populationList">
            <instance id="0">
                <location x="-167.954345211999993" y="-56.1399821993" z="-1.31004813442"/>
            </instance>
        </population>
        <projection id="Proj0syn0_CG3D_DeepAxAx_CG3D_L4SpinStell" presynapticPopulation="CG3D_DeepAxAx" postsynapticPopulation="CG3D_L4SpinStell" synapse="Syn_GABAA_DeepFS_L4SS">
            <connectionWD id="0" preCellId="../CG3D_DeepAxAx/0/DeepAxAx" preSegmentId="117" preFractionAlong="0.458948007958" postCellId="../CG3D_L4SpinStell/0/L4SpinyStellate" postSegmentId="106" postFractionAlong="0.965274462643" weight="0.05" delay="0.05 ms"/>
            <connectionWD id="1" preCellId="../CG3D_DeepAxAx/0/DeepAxAx" preSegmentId="117" preFractionAlong="0.702322215836" postCellId="../CG3D_L4SpinStell/0/L4SpinyStellate" postSegmentId="107" postFractionAlong="0.486853207636" weight="0.05" delay="0.05 ms"/>
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        </projection>
        <projection id="Proj1syn0_CG3D_DeepAxAx_CG3D_L5TuftIB" presynapticPopulation="CG3D_DeepAxAx" postsynapticPopulation="CG3D_L5TuftIB" synapse="Syn_GABAA_DeepAxAx_Pyr">
            <connectionWD id="0" preCellId="../CG3D_DeepAxAx/0/DeepAxAx" preSegmentId="116" preFractionAlong="0.997914951443" postCellId="../CG3D_L5TuftIB/0/L5TuftedPyrIB" postSegmentId="111" postFractionAlong="0.648494844655" weight="0.05" delay="0.05 ms"/>
            <connectionWD id="1" preCellId="../CG3D_DeepAxAx/0/DeepAxAx" preSegmentId="116" preFractionAlong="0.436334419491" postCellId="../CG3D_L5TuftIB/0/L5TuftedPyrIB" postSegmentId="111" postFractionAlong="0.326720640359" weight="0.05" delay="0.05 ms"/>
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        </projection>
        <projection id="Proj2syn0_CG3D_DeepAxAx_CG3D_L5TuftRS" presynapticPopulation="CG3D_DeepAxAx" postsynapticPopulation="CG3D_L5TuftRS" synapse="Syn_GABAA_DeepAxAx_Pyr">
            <connectionWD id="0" preCellId="../CG3D_DeepAxAx/0/DeepAxAx" preSegmentId="117" preFractionAlong="0.605794027353" postCellId="../CG3D_L5TuftRS/0/L5TuftedPyrRS" postSegmentId="110" postFractionAlong="0.961275006706" weight="0.05" delay="0.05 ms"/>
            <connectionWD id="1" preCellId="../CG3D_DeepAxAx/0/DeepAxAx" preSegmentId="113" preFractionAlong="0.980486279253" postCellId="../CG3D_L5TuftRS/0/L5TuftedPyrRS" postSegmentId="110" postFractionAlong="0.251464430903" weight="0.05" delay="0.05 ms"/>
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        </projection>
        <projection id="Proj3syn0_CG3D_DeepAxAx_CG3D_L6NonTuftRS" presynapticPopulation="CG3D_DeepAxAx" postsynapticPopulation="CG3D_L6NonTuftRS" synapse="Syn_GABAA_DeepAxAx_Pyr">
            <connectionWD id="0" preCellId="../CG3D_DeepAxAx/0/DeepAxAx" preSegmentId="116" preFractionAlong="0.722746708456" postCellId="../CG3D_L6NonTuftRS/0/L6NonTuftedPyrRS" postSegmentId="88" postFractionAlong="0.277197750798" weight="0.05" delay="0.05 ms"/>
            <connectionWD id="1" preCellId="../CG3D_DeepAxAx/0/DeepAxAx" preSegmentId="113" preFractionAlong="0.387573773971" postCellId="../CG3D_L6NonTuftRS/0/L6NonTuftedPyrRS" postSegmentId="88" postFractionAlong="0.384210443804" weight="0.05" delay="0.05 ms"/>
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        </projection>
        <projection id="Proj4syn0_CG3D_DeepAxAx_CG3D_L23PyrRS" presynapticPopulation="CG3D_DeepAxAx" postsynapticPopulation="CG3D_L23PyrRS" synapse="Syn_GABAA_DeepAxAx_Pyr">
            <connectionWD id="0" preCellId="../CG3D_DeepAxAx/0/DeepAxAx" preSegmentId="113" preFractionAlong="0.858640476179" postCellId="../CG3D_L23PyrRS/0/L23PyrRS" postSegmentId="136" postFractionAlong="0.891592841565" weight="0.05" delay="0.05 ms"/>
            <connectionWD id="1" preCellId="../CG3D_DeepAxAx/0/DeepAxAx" preSegmentId="113" preFractionAlong="0.871859178568" postCellId="../CG3D_L23PyrRS/0/L23PyrRS" postSegmentId="136" postFractionAlong="0.43430684455" weight="0.05" delay="0.05 ms"/>
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        </projection>
        <projection id="Proj5syn0_CG3D_DeepAxAx_CG3D_L23PyrFRB" presynapticPopulation="CG3D_DeepAxAx" postsynapticPopulation="CG3D_L23PyrFRB" synapse="Syn_GABAA_DeepAxAx_Pyr">
            <connectionWD id="0" preCellId="../CG3D_DeepAxAx/0/DeepAxAx" preSegmentId="116" preFractionAlong="0.512511657541" postCellId="../CG3D_L23PyrFRB/0/L23PyrFRB_varInit" postSegmentId="137" postFractionAlong="0.784483151773" weight="0.05" delay="0.05 ms"/>
            <connectionWD id="1" preCellId="../CG3D_DeepAxAx/0/DeepAxAx" preSegmentId="116" preFractionAlong="0.427710914655" postCellId="../CG3D_L23PyrFRB/0/L23PyrFRB_varInit" postSegmentId="137" postFractionAlong="0.967129671684" weight="0.05" delay="0.05 ms"/>
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        </projection>
        <projection id="Proj6syn0_CG3D_DeepLTS_CG3D_DeepAxAx" presynapticPopulation="CG3D_DeepLTS" postsynapticPopulation="CG3D_DeepAxAx" synapse="Syn_GABAA_DeepLTS_DeepFS">
            <connectionWD id="0" preCellId="../CG3D_DeepLTS/0/DeepLTSInter" preSegmentId="113" preFractionAlong="0.812513344388" postCellId="../CG3D_DeepAxAx/0/DeepAxAx" postSegmentId="40" postFractionAlong="0.947785365091" weight="0.05" delay="0.05 ms"/>
            <connectionWD id="1" preCellId="../CG3D_DeepLTS/0/DeepLTSInter" preSegmentId="116" preFractionAlong="0.595544408004" postCellId="../CG3D_DeepAxAx/0/DeepAxAx" postSegmentId="61" postFractionAlong="0.783889062164" weight="0.05" delay="0.05 ms"/>
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        </projection>
        <projection id="Proj9syn0_CG3D_DeepLTS_CG3D_L4SpinStell" presynapticPopulation="CG3D_DeepLTS" postsynapticPopulation="CG3D_L4SpinStell" synapse="Syn_GABAA_DeepLTS_L4SS">
            <connectionWD id="0" preCellId="../CG3D_DeepLTS/0/DeepLTSInter" preSegmentId="117" preFractionAlong="0.0571484528163" postCellId="../CG3D_L4SpinStell/0/L4SpinyStellate" postSegmentId="53" postFractionAlong="0.740975552126" weight="0.05" delay="0.05 ms"/>
            <connectionWD id="1" preCellId="../CG3D_DeepLTS/0/DeepLTSInter" preSegmentId="113" preFractionAlong="0.552750885303" postCellId="../CG3D_L4SpinStell/0/L4SpinyStellate" postSegmentId="44" postFractionAlong="0.196263280695" weight="0.05" delay="0.05 ms"/>
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        </projection>
        <projection id="Proj10syn0_CG3D_DeepLTS_CG3D_L5TuftIB" presynapticPopulation="CG3D_DeepLTS" postsynapticPopulation="CG3D_L5TuftIB" synapse="Syn_GABAA_DeepLTS_L5IB">
            <connectionWD id="0" preCellId="../CG3D_DeepLTS/0/DeepLTSInter" preSegmentId="116" preFractionAlong="0.851627279764" postCellId="../CG3D_L5TuftIB/0/L5TuftedPyrIB" postSegmentId="37" postFractionAlong="0.834315914898" weight="0.05" delay="0.05 ms"/>
            <connectionWD id="1" preCellId="../CG3D_DeepLTS/0/DeepLTSInter" preSegmentId="112" preFractionAlong="0.893761113352" postCellId="../CG3D_L5TuftIB/0/L5TuftedPyrIB" postSegmentId="48" postFractionAlong="0.0570469915412" weight="0.05" delay="0.05 ms"/>
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        </projection>
        <projection id="Proj11syn0_CG3D_DeepLTS_CG3D_L5TuftRS" presynapticPopulation="CG3D_DeepLTS" postsynapticPopulation="CG3D_L5TuftRS" synapse="Syn_GABAA_DeepLTS_L5RS">
            <connectionWD id="0" preCellId="../CG3D_DeepLTS/0/DeepLTSInter" preSegmentId="113" preFractionAlong="0.179790776351" postCellId="../CG3D_L5TuftRS/0/L5TuftedPyrRS" postSegmentId="96" postFractionAlong="0.800803442779" weight="0.05" delay="0.05 ms"/>
            <connectionWD id="1" preCellId="../CG3D_DeepLTS/0/DeepLTSInter" preSegmentId="113" preFractionAlong="0.548431298069" postCellId="../CG3D_L5TuftRS/0/L5TuftedPyrRS" postSegmentId="78" postFractionAlong="0.152827757202" weight="0.05" delay="0.05 ms"/>
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        </projection>
        <projection id="Proj12syn0_CG3D_DeepLTS_CG3D_L6NonTuftRS" presynapticPopulation="CG3D_DeepLTS" postsynapticPopulation="CG3D_L6NonTuftRS" synapse="Syn_GABAA_DeepLTS_L6NT">
            <connectionWD id="0" preCellId="../CG3D_DeepLTS/0/DeepLTSInter" preSegmentId="117" preFractionAlong="0.712648235242" postCellId="../CG3D_L6NonTuftRS/0/L6NonTuftedPyrRS" postSegmentId="58" postFractionAlong="0.940584685151" weight="0.05" delay="0.05 ms"/>
            <connectionWD id="1" preCellId="../CG3D_DeepLTS/0/DeepLTSInter" preSegmentId="112" preFractionAlong="0.766484813518" postCellId="../CG3D_L6NonTuftRS/0/L6NonTuftedPyrRS" postSegmentId="59" postFractionAlong="0.146620399601" weight="0.05" delay="0.05 ms"/>
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        </projection>
        <projection id="Proj13syn0_CG3D_DeepLTS_CG3D_DeepBask" presynapticPopulation="CG3D_DeepLTS" postsynapticPopulation="CG3D_DeepBask" synapse="Syn_GABAA_DeepLTS_DeepFS">
            <connectionWD id="0" preCellId="../CG3D_DeepLTS/0/DeepLTSInter" preSegmentId="113" preFractionAlong="0.798512907477" postCellId="../CG3D_DeepBask/0/DeepBasket" postSegmentId="95" postFractionAlong="0.180177620163" weight="0.05" delay="0.05 ms"/>
            <connectionWD id="1" preCellId="../CG3D_DeepLTS/0/DeepLTSInter" preSegmentId="113" preFractionAlong="0.239333566136" postCellId="../CG3D_DeepBask/0/DeepBasket" postSegmentId="61" postFractionAlong="0.452474586245" weight="0.05" delay="0.05 ms"/>
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        </projection>
        <projection id="Proj14syn0_CG3D_DeepLTS_CG3D_L23PyrRS" presynapticPopulation="CG3D_DeepLTS" postsynapticPopulation="CG3D_L23PyrRS" synapse="Syn_GABAA_DeepLTS_SupPyr">
            <connectionWD id="0" preCellId="../CG3D_DeepLTS/0/DeepLTSInter" preSegmentId="116" preFractionAlong="0.854314459206" postCellId="../CG3D_L23PyrRS/0/L23PyrRS" postSegmentId="46" postFractionAlong="0.36632675497" weight="0.05" delay="0.05 ms"/>
            <connectionWD id="1" preCellId="../CG3D_DeepLTS/0/DeepLTSInter" preSegmentId="113" preFractionAlong="0.316826606634" postCellId="../CG3D_L23PyrRS/0/L23PyrRS" postSegmentId="123" postFractionAlong="0.514988631494" weight="0.05" delay="0.05 ms"/>
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        </projection>
        <projection id="Proj15syn0_CG3D_DeepLTS_CG3D_SupAxAx" presynapticPopulation="CG3D_DeepLTS" postsynapticPopulation="CG3D_SupAxAx" synapse="Syn_GABAA_DeepLTS_SupFS">
            <connectionWD id="0" preCellId="../CG3D_DeepLTS/0/DeepLTSInter" preSegmentId="113" preFractionAlong="0.0958893278796" postCellId="../CG3D_SupAxAx/0/SupAxAx" postSegmentId="37" postFractionAlong="0.622203958874" weight="0.05" delay="0.05 ms"/>
            <connectionWD id="1" preCellId="../CG3D_DeepLTS/0/DeepLTSInter" preSegmentId="117" preFractionAlong="0.0193379049454" postCellId="../CG3D_SupAxAx/0/SupAxAx" postSegmentId="67" postFractionAlong="0.136059842488" weight="0.05" delay="0.05 ms"/>
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        </projection>
        <projection id="Proj16syn0_CG3D_DeepLTS_CG3D_L23PyrFRB" presynapticPopulation="CG3D_DeepLTS" postsynapticPopulation="CG3D_L23PyrFRB" synapse="Syn_GABAA_DeepLTS_SupPyr">
            <connectionWD id="0" preCellId="../CG3D_DeepLTS/0/DeepLTSInter" preSegmentId="116" preFractionAlong="0.9833556628" postCellId="../CG3D_L23PyrFRB/0/L23PyrFRB_varInit" postSegmentId="50" postFractionAlong="0.735625317645" weight="0.05" delay="0.05 ms"/>
            <connectionWD id="1" preCellId="../CG3D_DeepLTS/0/DeepLTSInter" preSegmentId="117" preFractionAlong="0.143507426875" postCellId="../CG3D_L23PyrFRB/0/L23PyrFRB_varInit" postSegmentId="116" postFractionAlong="0.72880091714" weight="0.05" delay="0.05 ms"/>
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        </projection>
        <projection id="Proj17syn0_CG3D_DeepLTS_CG3D_SupLTS" presynapticPopulation="CG3D_DeepLTS" postsynapticPopulation="CG3D_SupLTS" synapse="Syn_GABAA_DeepLTS_SupLTS">
            <connectionWD id="0" preCellId="../CG3D_DeepLTS/0/DeepLTSInter" preSegmentId="112" preFractionAlong="0.461234066242" postCellId="../CG3D_SupLTS/0/SupLTSInter" postSegmentId="60" postFractionAlong="0.693353921859" weight="0.05" delay="0.05 ms"/>
            <connectionWD id="1" preCellId="../CG3D_DeepLTS/0/DeepLTSInter" preSegmentId="112" preFractionAlong="0.467298106237" postCellId="../CG3D_SupLTS/0/SupLTSInter" postSegmentId="103" postFractionAlong="0.325491025444" weight="0.05" delay="0.05 ms"/>
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        </projection>
        <projection id="Proj18syn0_CG3D_DeepLTS_CG3D_SupBask" presynapticPopulation="CG3D_DeepLTS" postsynapticPopulation="CG3D_SupBask" synapse="Syn_GABAA_DeepLTS_SupFS">
            <connectionWD id="0" preCellId="../CG3D_DeepLTS/0/DeepLTSInter" preSegmentId="117" preFractionAlong="0.988190574087" postCellId="../CG3D_SupBask/0/SupBasket" postSegmentId="10" postFractionAlong="0.651945215478" weight="0.05" delay="0.05 ms"/>
            <connectionWD id="1" preCellId="../CG3D_DeepLTS/0/DeepLTSInter" preSegmentId="117" preFractionAlong="0.212667398465" postCellId="../CG3D_SupBask/0/SupBasket" postSegmentId="64" postFractionAlong="0.877987229308" weight="0.05" delay="0.05 ms"/>
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        </projection>
        <projection id="Proj19syn0_CG3D_L4SpinStell_CG3D_DeepAxAx" presynapticPopulation="CG3D_L4SpinStell" postsynapticPopulation="CG3D_DeepAxAx" synapse="Syn_NMDA_L4SS_IN">
            <connectionWD id="0" preCellId="../CG3D_L4SpinStell/1/L4SpinyStellate" preSegmentId="116" preFractionAlong="0.409753332056" postCellId="../CG3D_DeepAxAx/0/DeepAxAx" postSegmentId="16" postFractionAlong="0.282598096066" weight="2.5" delay="0.05 ms"/>
            <connectionWD id="1" preCellId="../CG3D_L4SpinStell/0/L4SpinyStellate" preSegmentId="112" preFractionAlong="0.022321933257" postCellId="../CG3D_DeepAxAx/0/DeepAxAx" postSegmentId="70" postFractionAlong="0.726491967132" weight="2.5" delay="0.05 ms"/>
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        </projection>
        <projection id="Proj19syn1_CG3D_L4SpinStell_CG3D_DeepAxAx" presynapticPopulation="CG3D_L4SpinStell" postsynapticPopulation="CG3D_DeepAxAx" synapse="Syn_AMPA_L4SS_IN">
            <connectionWD id="0" preCellId="../CG3D_L4SpinStell/1/L4SpinyStellate" preSegmentId="116" preFractionAlong="0.409753332056" postCellId="../CG3D_DeepAxAx/0/DeepAxAx" postSegmentId="16" postFractionAlong="0.282598096066" weight="1." delay="0.05 ms"/>
            <connectionWD id="1" preCellId="../CG3D_L4SpinStell/0/L4SpinyStellate" preSegmentId="112" preFractionAlong="0.022321933257" postCellId="../CG3D_DeepAxAx/0/DeepAxAx" postSegmentId="70" postFractionAlong="0.726491967132" weight="1." delay="0.05 ms"/>
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        </projection>
        <projection id="Proj20syn0_CG3D_L4SpinStell_CG3D_DeepLTS" presynapticPopulation="CG3D_L4SpinStell" postsynapticPopulation="CG3D_DeepLTS" synapse="Syn_NMDA_L4SS_IN">
            <connectionWD id="0" preCellId="../CG3D_L4SpinStell/1/L4SpinyStellate" preSegmentId="113" preFractionAlong="0.737325746051" postCellId="../CG3D_DeepLTS/0/DeepLTSInter" postSegmentId="43" postFractionAlong="0.606447723364" weight="2.5" delay="0.05 ms"/>
            <connectionWD id="1" preCellId="../CG3D_L4SpinStell/1/L4SpinyStellate" preSegmentId="117" preFractionAlong="0.678727986484" postCellId="../CG3D_DeepLTS/0/DeepLTSInter" postSegmentId="92" postFractionAlong="0.468744103168" weight="2.5" delay="0.05 ms"/>
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        </projection>
        <projection id="Proj20syn1_CG3D_L4SpinStell_CG3D_DeepLTS" presynapticPopulation="CG3D_L4SpinStell" postsynapticPopulation="CG3D_DeepLTS" synapse="Syn_AMPA_L4SS_IN">
            <connectionWD id="0" preCellId="../CG3D_L4SpinStell/1/L4SpinyStellate" preSegmentId="113" preFractionAlong="0.737325746051" postCellId="../CG3D_DeepLTS/0/DeepLTSInter" postSegmentId="43" postFractionAlong="0.606447723364" weight="1." delay="0.05 ms"/>
            <connectionWD id="1" preCellId="../CG3D_L4SpinStell/1/L4SpinyStellate" preSegmentId="117" preFractionAlong="0.678727986484" postCellId="../CG3D_DeepLTS/0/DeepLTSInter" postSegmentId="92" postFractionAlong="0.468744103168" weight="1." delay="0.05 ms"/>
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        </projection>
        <projection id="Proj21syn0_CG3D_L4SpinStell_CG3D_L4SpinStell" presynapticPopulation="CG3D_L4SpinStell" postsynapticPopulation="CG3D_L4SpinStell" synapse="Syn_NMDA_L4SS_L4SS">
            <connectionWD id="0" preCellId="../CG3D_L4SpinStell/1/L4SpinyStellate" preSegmentId="112" preFractionAlong="0.988691759702" postCellId="../CG3D_L4SpinStell/0/L4SpinyStellate" postSegmentId="93" postFractionAlong="0.355231108696" weight="1." delay="0.05 ms"/>
            <connectionWD id="1" preCellId="../CG3D_L4SpinStell/1/L4SpinyStellate" preSegmentId="117" preFractionAlong="0.610993421588" postCellId="../CG3D_L4SpinStell/0/L4SpinyStellate" postSegmentId="45" postFractionAlong="0.55843125295" weight="1." delay="0.05 ms"/>
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        </projection>
        <projection id="Proj21syn1_CG3D_L4SpinStell_CG3D_L4SpinStell" presynapticPopulation="CG3D_L4SpinStell" postsynapticPopulation="CG3D_L4SpinStell" synapse="Syn_AMPA_L4SS_L4SS">
            <connectionWD id="0" preCellId="../CG3D_L4SpinStell/1/L4SpinyStellate" preSegmentId="112" preFractionAlong="0.988691759702" postCellId="../CG3D_L4SpinStell/0/L4SpinyStellate" postSegmentId="93" postFractionAlong="0.355231108696" weight="1." delay="0.05 ms"/>
            <connectionWD id="1" preCellId="../CG3D_L4SpinStell/1/L4SpinyStellate" preSegmentId="117" preFractionAlong="0.610993421588" postCellId="../CG3D_L4SpinStell/0/L4SpinyStellate" postSegmentId="45" postFractionAlong="0.55843125295" weight="1." delay="0.05 ms"/>
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        </projection>
        <projection id="Proj23syn0_CG3D_L4SpinStell_CG3D_L5TuftIB" presynapticPopulation="CG3D_L4SpinStell" postsynapticPopulation="CG3D_L5TuftIB" synapse="Syn_NMDA_L4SS_Pyr">
            <connectionWD id="0" preCellId="../CG3D_L4SpinStell/0/L4SpinyStellate" preSegmentId="117" preFractionAlong="0.956968625069" postCellId="../CG3D_L5TuftIB/0/L5TuftedPyrIB" postSegmentId="71" postFractionAlong="0.976969283922" weight="1." delay="0.05 ms"/>
            <connectionWD id="1" preCellId="../CG3D_L4SpinStell/1/L4SpinyStellate" preSegmentId="116" preFractionAlong="0.614723921194" postCellId="../CG3D_L5TuftIB/0/L5TuftedPyrIB" postSegmentId="79" postFractionAlong="0.227281538412" weight="1." delay="0.05 ms"/>
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        </projection>
        <projection id="Proj23syn1_CG3D_L4SpinStell_CG3D_L5TuftIB" presynapticPopulation="CG3D_L4SpinStell" postsynapticPopulation="CG3D_L5TuftIB" synapse="Syn_AMPA_L4SS_Pyr">
            <connectionWD id="0" preCellId="../CG3D_L4SpinStell/0/L4SpinyStellate" preSegmentId="117" preFractionAlong="0.956968625069" postCellId="../CG3D_L5TuftIB/0/L5TuftedPyrIB" postSegmentId="71" postFractionAlong="0.976969283922" weight="1." delay="0.05 ms"/>
            <connectionWD id="1" preCellId="../CG3D_L4SpinStell/1/L4SpinyStellate" preSegmentId="116" preFractionAlong="0.614723921194" postCellId="../CG3D_L5TuftIB/0/L5TuftedPyrIB" postSegmentId="79" postFractionAlong="0.227281538412" weight="1." delay="0.05 ms"/>
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        </projection>
        <projection id="Proj24syn0_CG3D_L4SpinStell_CG3D_L5TuftRS" presynapticPopulation="CG3D_L4SpinStell" postsynapticPopulation="CG3D_L5TuftRS" synapse="Syn_NMDA_L4SS_Pyr">
            <connectionWD id="0" preCellId="../CG3D_L4SpinStell/0/L4SpinyStellate" preSegmentId="117" preFractionAlong="0.119151960663" postCellId="../CG3D_L5TuftRS/0/L5TuftedPyrRS" postSegmentId="72" postFractionAlong="0.340502826439" weight="1." delay="0.05 ms"/>
            <connectionWD id="1" preCellId="../CG3D_L4SpinStell/0/L4SpinyStellate" preSegmentId="113" preFractionAlong="0.902801419119" postCellId="../CG3D_L5TuftRS/0/L5TuftedPyrRS" postSegmentId="6" postFractionAlong="0.376585258792" weight="1." delay="0.05 ms"/>
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        </projection>
        <projection id="Proj24syn1_CG3D_L4SpinStell_CG3D_L5TuftRS" presynapticPopulation="CG3D_L4SpinStell" postsynapticPopulation="CG3D_L5TuftRS" synapse="Syn_AMPA_L4SS_Pyr">
            <connectionWD id="0" preCellId="../CG3D_L4SpinStell/0/L4SpinyStellate" preSegmentId="117" preFractionAlong="0.119151960663" postCellId="../CG3D_L5TuftRS/0/L5TuftedPyrRS" postSegmentId="72" postFractionAlong="0.340502826439" weight="1." delay="0.05 ms"/>
            <connectionWD id="1" preCellId="../CG3D_L4SpinStell/0/L4SpinyStellate" preSegmentId="113" preFractionAlong="0.902801419119" postCellId="../CG3D_L5TuftRS/0/L5TuftedPyrRS" postSegmentId="6" postFractionAlong="0.376585258792" weight="1." delay="0.05 ms"/>
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        </projection>
        <projection id="Proj25syn0_CG3D_L4SpinStell_CG3D_L6NonTuftRS" presynapticPopulation="CG3D_L4SpinStell" postsynapticPopulation="CG3D_L6NonTuftRS" synapse="Syn_NMDA_L4SS_Pyr">
            <connectionWD id="0" preCellId="../CG3D_L4SpinStell/0/L4SpinyStellate" preSegmentId="117" preFractionAlong="0.500190216403" postCellId="../CG3D_L6NonTuftRS/0/L6NonTuftedPyrRS" postSegmentId="73" postFractionAlong="0.124587936001" weight="1." delay="0.05 ms"/>
            <connectionWD id="1" preCellId="../CG3D_L4SpinStell/1/L4SpinyStellate" preSegmentId="113" preFractionAlong="0.311205764154" postCellId="../CG3D_L6NonTuftRS/0/L6NonTuftedPyrRS" postSegmentId="78" postFractionAlong="0.683808303648" weight="1." delay="0.05 ms"/>
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        </projection>
        <projection id="Proj25syn1_CG3D_L4SpinStell_CG3D_L6NonTuftRS" presynapticPopulation="CG3D_L4SpinStell" postsynapticPopulation="CG3D_L6NonTuftRS" synapse="Syn_AMPA_L4SS_Pyr">
            <connectionWD id="0" preCellId="../CG3D_L4SpinStell/0/L4SpinyStellate" preSegmentId="117" preFractionAlong="0.500190216403" postCellId="../CG3D_L6NonTuftRS/0/L6NonTuftedPyrRS" postSegmentId="73" postFractionAlong="0.124587936001" weight="1." delay="0.05 ms"/>
            <connectionWD id="1" preCellId="../CG3D_L4SpinStell/1/L4SpinyStellate" preSegmentId="113" preFractionAlong="0.311205764154" postCellId="../CG3D_L6NonTuftRS/0/L6NonTuftedPyrRS" postSegmentId="78" postFractionAlong="0.683808303648" weight="1." delay="0.05 ms"/>
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        </projection>
        <projection id="Proj26syn0_CG3D_L4SpinStell_CG3D_DeepBask" presynapticPopulation="CG3D_L4SpinStell" postsynapticPopulation="CG3D_DeepBask" synapse="Syn_NMDA_L4SS_IN">
            <connectionWD id="0" preCellId="../CG3D_L4SpinStell/0/L4SpinyStellate" preSegmentId="116" preFractionAlong="0.346198048494" postCellId="../CG3D_DeepBask/0/DeepBasket" postSegmentId="36" postFractionAlong="0.407209481856" weight="2.5" delay="0.05 ms"/>
            <connectionWD id="1" preCellId="../CG3D_L4SpinStell/0/L4SpinyStellate" preSegmentId="116" preFractionAlong="0.746663115107" postCellId="../CG3D_DeepBask/0/DeepBasket" postSegmentId="16" postFractionAlong="0.779462132094" weight="2.5" delay="0.05 ms"/>
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        </projection>
        <projection id="Proj26syn1_CG3D_L4SpinStell_CG3D_DeepBask" presynapticPopulation="CG3D_L4SpinStell" postsynapticPopulation="CG3D_DeepBask" synapse="Syn_AMPA_L4SS_IN">
            <connectionWD id="0" preCellId="../CG3D_L4SpinStell/0/L4SpinyStellate" preSegmentId="116" preFractionAlong="0.346198048494" postCellId="../CG3D_DeepBask/0/DeepBasket" postSegmentId="36" postFractionAlong="0.407209481856" weight="1." delay="0.05 ms"/>
            <connectionWD id="1" preCellId="../CG3D_L4SpinStell/0/L4SpinyStellate" preSegmentId="116" preFractionAlong="0.746663115107" postCellId="../CG3D_DeepBask/0/DeepBasket" postSegmentId="16" postFractionAlong="0.779462132094" weight="1." delay="0.05 ms"/>
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        </projection>
        <projection id="Proj27syn0_CG3D_L4SpinStell_CG3D_L23PyrRS" presynapticPopulation="CG3D_L4SpinStell" postsynapticPopulation="CG3D_L23PyrRS" synapse="Syn_NMDA_L4SS_Pyr">
            <connectionWD id="0" preCellId="../CG3D_L4SpinStell/1/L4SpinyStellate" preSegmentId="117" preFractionAlong="0.397007532651" postCellId="../CG3D_L23PyrRS/0/L23PyrRS" postSegmentId="58" postFractionAlong="0.441865346523" weight="1." delay="0.05 ms"/>
            <connectionWD id="1" preCellId="../CG3D_L4SpinStell/0/L4SpinyStellate" preSegmentId="112" preFractionAlong="0.396576840507" postCellId="../CG3D_L23PyrRS/0/L23PyrRS" postSegmentId="59" postFractionAlong="0.750532290604" weight="1." delay="0.05 ms"/>
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        </projection>
        <projection id="Proj27syn1_CG3D_L4SpinStell_CG3D_L23PyrRS" presynapticPopulation="CG3D_L4SpinStell" postsynapticPopulation="CG3D_L23PyrRS" synapse="Syn_AMPA_L4SS_Pyr">
            <connectionWD id="0" preCellId="../CG3D_L4SpinStell/1/L4SpinyStellate" preSegmentId="117" preFractionAlong="0.397007532651" postCellId="../CG3D_L23PyrRS/0/L23PyrRS" postSegmentId="58" postFractionAlong="0.441865346523" weight="1." delay="0.05 ms"/>
            <connectionWD id="1" preCellId="../CG3D_L4SpinStell/0/L4SpinyStellate" preSegmentId="112" preFractionAlong="0.396576840507" postCellId="../CG3D_L23PyrRS/0/L23PyrRS" postSegmentId="59" postFractionAlong="0.750532290604" weight="1." delay="0.05 ms"/>
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        </projection>
        <projection id="Proj28syn0_CG3D_L4SpinStell_CG3D_SupAxAx" presynapticPopulation="CG3D_L4SpinStell" postsynapticPopulation="CG3D_SupAxAx" synapse="Syn_NMDA_L4SS_IN">
            <connectionWD id="0" preCellId="../CG3D_L4SpinStell/0/L4SpinyStellate" preSegmentId="113" preFractionAlong="0.999017243241" postCellId="../CG3D_SupAxAx/0/SupAxAx" postSegmentId="39" postFractionAlong="0.85640597532" weight="2.5" delay="0.05 ms"/>
            <connectionWD id="1" preCellId="../CG3D_L4SpinStell/1/L4SpinyStellate" preSegmentId="116" preFractionAlong="0.930390890589" postCellId="../CG3D_SupAxAx/0/SupAxAx" postSegmentId="71" postFractionAlong="0.422190977159" weight="2.5" delay="0.05 ms"/>
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        </projection>
        <projection id="Proj28syn1_CG3D_L4SpinStell_CG3D_SupAxAx" presynapticPopulation="CG3D_L4SpinStell" postsynapticPopulation="CG3D_SupAxAx" synapse="Syn_AMPA_L4SS_IN">
            <connectionWD id="0" preCellId="../CG3D_L4SpinStell/0/L4SpinyStellate" preSegmentId="113" preFractionAlong="0.999017243241" postCellId="../CG3D_SupAxAx/0/SupAxAx" postSegmentId="39" postFractionAlong="0.85640597532" weight="1." delay="0.05 ms"/>
            <connectionWD id="1" preCellId="../CG3D_L4SpinStell/1/L4SpinyStellate" preSegmentId="116" preFractionAlong="0.930390890589" postCellId="../CG3D_SupAxAx/0/SupAxAx" postSegmentId="71" postFractionAlong="0.422190977159" weight="1." delay="0.05 ms"/>
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        </projection>
        <projection id="Proj29syn0_CG3D_L4SpinStell_CG3D_L23PyrFRB" presynapticPopulation="CG3D_L4SpinStell" postsynapticPopulation="CG3D_L23PyrFRB" synapse="Syn_NMDA_L4SS_Pyr">
            <connectionWD id="0" preCellId="../CG3D_L4SpinStell/1/L4SpinyStellate" preSegmentId="116" preFractionAlong="0.674804850229" postCellId="../CG3D_L23PyrFRB/0/L23PyrFRB_varInit" postSegmentId="36" postFractionAlong="0.63768451735" weight="1." delay="0.05 ms"/>
            <connectionWD id="1" preCellId="../CG3D_L4SpinStell/1/L4SpinyStellate" preSegmentId="112" preFractionAlong="0.687198888502" postCellId="../CG3D_L23PyrFRB/0/L23PyrFRB_varInit" postSegmentId="4" postFractionAlong="0.330334739629" weight="1." delay="0.05 ms"/>
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        </projection>
        <projection id="Proj29syn1_CG3D_L4SpinStell_CG3D_L23PyrFRB" presynapticPopulation="CG3D_L4SpinStell" postsynapticPopulation="CG3D_L23PyrFRB" synapse="Syn_AMPA_L4SS_Pyr">
            <connectionWD id="0" preCellId="../CG3D_L4SpinStell/1/L4SpinyStellate" preSegmentId="116" preFractionAlong="0.674804850229" postCellId="../CG3D_L23PyrFRB/0/L23PyrFRB_varInit" postSegmentId="36" postFractionAlong="0.63768451735" weight="1." delay="0.05 ms"/>
            <connectionWD id="1" preCellId="../CG3D_L4SpinStell/1/L4SpinyStellate" preSegmentId="112" preFractionAlong="0.687198888502" postCellId="../CG3D_L23PyrFRB/0/L23PyrFRB_varInit" postSegmentId="4" postFractionAlong="0.330334739629" weight="1." delay="0.05 ms"/>
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        </projection>
        <projection id="Proj30syn0_CG3D_L4SpinStell_CG3D_SupLTS" presynapticPopulation="CG3D_L4SpinStell" postsynapticPopulation="CG3D_SupLTS" synapse="Syn_NMDA_L4SS_IN">
            <connectionWD id="0" preCellId="../CG3D_L4SpinStell/0/L4SpinyStellate" preSegmentId="117" preFractionAlong="0.206374154186" postCellId="../CG3D_SupLTS/0/SupLTSInter" postSegmentId="69" postFractionAlong="0.905550714095" weight="2.5" delay="0.05 ms"/>
            <connectionWD id="1" preCellId="../CG3D_L4SpinStell/0/L4SpinyStellate" preSegmentId="113" preFractionAlong="0.306901252142" postCellId="../CG3D_SupLTS/0/SupLTSInter" postSegmentId="90" postFractionAlong="0.556996472808" weight="2.5" delay="0.05 ms"/>
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        </projection>
        <projection id="Proj30syn1_CG3D_L4SpinStell_CG3D_SupLTS" presynapticPopulation="CG3D_L4SpinStell" postsynapticPopulation="CG3D_SupLTS" synapse="Syn_AMPA_L4SS_IN">
            <connectionWD id="0" preCellId="../CG3D_L4SpinStell/0/L4SpinyStellate" preSegmentId="117" preFractionAlong="0.206374154186" postCellId="../CG3D_SupLTS/0/SupLTSInter" postSegmentId="69" postFractionAlong="0.905550714095" weight="1." delay="0.05 ms"/>
            <connectionWD id="1" preCellId="../CG3D_L4SpinStell/0/L4SpinyStellate" preSegmentId="113" preFractionAlong="0.306901252142" postCellId="../CG3D_SupLTS/0/SupLTSInter" postSegmentId="90" postFractionAlong="0.556996472808" weight="1." delay="0.05 ms"/>
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        </projection>
        <projection id="Proj31syn0_CG3D_L4SpinStell_CG3D_SupBask" presynapticPopulation="CG3D_L4SpinStell" postsynapticPopulation="CG3D_SupBask" synapse="Syn_NMDA_L4SS_IN">
            <connectionWD id="0" preCellId="../CG3D_L4SpinStell/0/L4SpinyStellate" preSegmentId="117" preFractionAlong="0.415174463473" postCellId="../CG3D_SupBask/0/SupBasket" postSegmentId="65" postFractionAlong="0.0934764694862" weight="2.5" delay="0.05 ms"/>
            <connectionWD id="1" preCellId="../CG3D_L4SpinStell/0/L4SpinyStellate" preSegmentId="117" preFractionAlong="0.569875611881" postCellId="../CG3D_SupBask/0/SupBasket" postSegmentId="15" postFractionAlong="0.190055421157" weight="2.5" delay="0.05 ms"/>
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        </projection>
        <projection id="Proj31syn1_CG3D_L4SpinStell_CG3D_SupBask" presynapticPopulation="CG3D_L4SpinStell" postsynapticPopulation="CG3D_SupBask" synapse="Syn_AMPA_L4SS_IN">
            <connectionWD id="0" preCellId="../CG3D_L4SpinStell/0/L4SpinyStellate" preSegmentId="117" preFractionAlong="0.415174463473" postCellId="../CG3D_SupBask/0/SupBasket" postSegmentId="65" postFractionAlong="0.0934764694862" weight="1." delay="0.05 ms"/>
            <connectionWD id="1" preCellId="../CG3D_L4SpinStell/0/L4SpinyStellate" preSegmentId="117" preFractionAlong="0.569875611881" postCellId="../CG3D_SupBask/0/SupBasket" postSegmentId="15" postFractionAlong="0.190055421157" weight="1." delay="0.05 ms"/>
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        </projection>
        <projection id="Proj32syn0_CG3D_L5TuftIB_CG3D_DeepAxAx" presynapticPopulation="CG3D_L5TuftIB" postsynapticPopulation="CG3D_DeepAxAx" synapse="Syn_NMDA_L5IB_IN">
            <connectionWD id="0" preCellId="../CG3D_L5TuftIB/1/L5TuftedPyrIB" preSegmentId="121" preFractionAlong="0.882444388491" postCellId="../CG3D_DeepAxAx/0/DeepAxAx" postSegmentId="90" postFractionAlong="0.148838713325" weight="2.5" delay="0.05 ms"/>
            <connectionWD id="1" preCellId="../CG3D_L5TuftIB/3/L5TuftedPyrIB" preSegmentId="120" preFractionAlong="0.778376143155" postCellId="../CG3D_DeepAxAx/0/DeepAxAx" postSegmentId="17" postFractionAlong="0.195451909517" weight="2.5" delay="0.05 ms"/>
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        </projection>
        <projection id="Proj32syn1_CG3D_L5TuftIB_CG3D_DeepAxAx" presynapticPopulation="CG3D_L5TuftIB" postsynapticPopulation="CG3D_DeepAxAx" synapse="Syn_AMPA_L5IB_DeepFS">
            <connectionWD id="0" preCellId="../CG3D_L5TuftIB/1/L5TuftedPyrIB" preSegmentId="121" preFractionAlong="0.882444388491" postCellId="../CG3D_DeepAxAx/0/DeepAxAx" postSegmentId="90" postFractionAlong="0.148838713325" weight="1." delay="0.05 ms"/>
            <connectionWD id="1" preCellId="../CG3D_L5TuftIB/3/L5TuftedPyrIB" preSegmentId="120" preFractionAlong="0.778376143155" postCellId="../CG3D_DeepAxAx/0/DeepAxAx" postSegmentId="17" postFractionAlong="0.195451909517" weight="1." delay="0.05 ms"/>
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        </projection>
        <projection id="Proj33syn0_CG3D_L5TuftIB_CG3D_DeepLTS" presynapticPopulation="CG3D_L5TuftIB" postsynapticPopulation="CG3D_DeepLTS" synapse="Syn_AMPA_L5IB_DeepLTS">
            <connectionWD id="0" preCellId="../CG3D_L5TuftIB/4/L5TuftedPyrIB" preSegmentId="120" preFractionAlong="0.89208627064" postCellId="../CG3D_DeepLTS/0/DeepLTSInter" postSegmentId="34" postFractionAlong="0.235949947279" weight="1." delay="0.05 ms"/>
            <connectionWD id="1" preCellId="../CG3D_L5TuftIB/7/L5TuftedPyrIB" preSegmentId="119" preFractionAlong="0.19735240302" postCellId="../CG3D_DeepLTS/0/DeepLTSInter" postSegmentId="97" postFractionAlong="0.317865748932" weight="1." delay="0.05 ms"/>
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        </projection>
        <projection id="Proj33syn1_CG3D_L5TuftIB_CG3D_DeepLTS" presynapticPopulation="CG3D_L5TuftIB" postsynapticPopulation="CG3D_DeepLTS" synapse="Syn_NMDA_L5IB_IN">
            <connectionWD id="0" preCellId="../CG3D_L5TuftIB/4/L5TuftedPyrIB" preSegmentId="120" preFractionAlong="0.89208627064" postCellId="../CG3D_DeepLTS/0/DeepLTSInter" postSegmentId="34" postFractionAlong="0.235949947279" weight="2.5" delay="0.05 ms"/>
            <connectionWD id="1" preCellId="../CG3D_L5TuftIB/7/L5TuftedPyrIB" preSegmentId="119" preFractionAlong="0.19735240302" postCellId="../CG3D_DeepLTS/0/DeepLTSInter" postSegmentId="97" postFractionAlong="0.317865748932" weight="2.5" delay="0.05 ms"/>
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        </projection>
        <projection id="Proj34syn0_CG3D_L5TuftIB_CG3D_L4SpinStell" presynapticPopulation="CG3D_L5TuftIB" postsynapticPopulation="CG3D_L4SpinStell" synapse="Syn_AMPA_L5IB_L4SS">
            <connectionWD id="0" preCellId="../CG3D_L5TuftIB/7/L5TuftedPyrIB" preSegmentId="121" preFractionAlong="0.996403770153" postCellId="../CG3D_L4SpinStell/0/L4SpinyStellate" postSegmentId="64" postFractionAlong="0.834132492853" weight="1." delay="0.05 ms"/>
            <connectionWD id="1" preCellId="../CG3D_L5TuftIB/5/L5TuftedPyrIB" preSegmentId="120" preFractionAlong="0.65572905274" postCellId="../CG3D_L4SpinStell/0/L4SpinyStellate" postSegmentId="61" postFractionAlong="0.791283898968" weight="1." delay="0.05 ms"/>
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        </projection>
        <projection id="Proj34syn1_CG3D_L5TuftIB_CG3D_L4SpinStell" presynapticPopulation="CG3D_L5TuftIB" postsynapticPopulation="CG3D_L4SpinStell" synapse="Syn_NMDA_L5IB_L4SS">
            <connectionWD id="0" preCellId="../CG3D_L5TuftIB/7/L5TuftedPyrIB" preSegmentId="121" preFractionAlong="0.996403770153" postCellId="../CG3D_L4SpinStell/0/L4SpinyStellate" postSegmentId="64" postFractionAlong="0.834132492853" weight="1." delay="0.05 ms"/>
            <connectionWD id="1" preCellId="../CG3D_L5TuftIB/5/L5TuftedPyrIB" preSegmentId="120" preFractionAlong="0.65572905274" postCellId="../CG3D_L4SpinStell/0/L4SpinyStellate" postSegmentId="61" postFractionAlong="0.791283898968" weight="1." delay="0.05 ms"/>
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        </projection>
        <projection id="Proj35syn0_CG3D_L5TuftIB_CG3D_L5TuftIB" presynapticPopulation="CG3D_L5TuftIB" postsynapticPopulation="CG3D_L5TuftIB" synapse="Syn_AMPA_L5IB_L5Pyr">
            <connectionWD id="0" preCellId="../CG3D_L5TuftIB/3/L5TuftedPyrIB" preSegmentId="119" preFractionAlong="0.346253923752" postCellId="../CG3D_L5TuftIB/0/L5TuftedPyrIB" postSegmentId="61" postFractionAlong="0.0267239208618" weight="1." delay="0.05 ms"/>
            <connectionWD id="1" preCellId="../CG3D_L5TuftIB/7/L5TuftedPyrIB" preSegmentId="118" preFractionAlong="0.183258585513" postCellId="../CG3D_L5TuftIB/0/L5TuftedPyrIB" postSegmentId="19" postFractionAlong="0.688110171027" weight="1." delay="0.05 ms"/>
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        </projection>
        <projection id="Proj35syn1_CG3D_L5TuftIB_CG3D_L5TuftIB" presynapticPopulation="CG3D_L5TuftIB" postsynapticPopulation="CG3D_L5TuftIB" synapse="Syn_NMDA_L5IB_DeepPyr">
            <connectionWD id="0" preCellId="../CG3D_L5TuftIB/3/L5TuftedPyrIB" preSegmentId="119" preFractionAlong="0.346253923752" postCellId="../CG3D_L5TuftIB/0/L5TuftedPyrIB" postSegmentId="61" postFractionAlong="0.0267239208618" weight="1." delay="0.05 ms"/>
            <connectionWD id="1" preCellId="../CG3D_L5TuftIB/7/L5TuftedPyrIB" preSegmentId="118" preFractionAlong="0.183258585513" postCellId="../CG3D_L5TuftIB/0/L5TuftedPyrIB" postSegmentId="19" postFractionAlong="0.688110171027" weight="1." delay="0.05 ms"/>
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        </projection>
        <projection id="Proj37syn0_CG3D_L5TuftIB_CG3D_L5TuftRS" presynapticPopulation="CG3D_L5TuftIB" postsynapticPopulation="CG3D_L5TuftRS" synapse="Syn_AMPA_L5IB_L5Pyr">
            <connectionWD id="0" preCellId="../CG3D_L5TuftIB/1/L5TuftedPyrIB" preSegmentId="121" preFractionAlong="0.504899330318" postCellId="../CG3D_L5TuftRS/0/L5TuftedPyrRS" postSegmentId="32" postFractionAlong="0.586879794679" weight="1." delay="0.05 ms"/>
            <connectionWD id="1" preCellId="../CG3D_L5TuftIB/2/L5TuftedPyrIB" preSegmentId="121" preFractionAlong="0.291922862329" postCellId="../CG3D_L5TuftRS/0/L5TuftedPyrRS" postSegmentId="42" postFractionAlong="0.0773532596526" weight="1." delay="0.05 ms"/>
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        </projection>
        <projection id="Proj37syn1_CG3D_L5TuftIB_CG3D_L5TuftRS" presynapticPopulation="CG3D_L5TuftIB" postsynapticPopulation="CG3D_L5TuftRS" synapse="Syn_NMDA_L5IB_DeepPyr">
            <connectionWD id="0" preCellId="../CG3D_L5TuftIB/1/L5TuftedPyrIB" preSegmentId="121" preFractionAlong="0.504899330318" postCellId="../CG3D_L5TuftRS/0/L5TuftedPyrRS" postSegmentId="32" postFractionAlong="0.586879794679" weight="1." delay="0.05 ms"/>
            <connectionWD id="1" preCellId="../CG3D_L5TuftIB/2/L5TuftedPyrIB" preSegmentId="121" preFractionAlong="0.291922862329" postCellId="../CG3D_L5TuftRS/0/L5TuftedPyrRS" postSegmentId="42" postFractionAlong="0.0773532596526" weight="1." delay="0.05 ms"/>
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        </projection>
        <projection id="Proj39syn0_CG3D_L5TuftIB_CG3D_L6NonTuftRS" presynapticPopulation="CG3D_L5TuftIB" postsynapticPopulation="CG3D_L6NonTuftRS" synapse="Syn_NMDA_L5IB_DeepPyr">
            <connectionWD id="0" preCellId="../CG3D_L5TuftIB/1/L5TuftedPyrIB" preSegmentId="119" preFractionAlong="0.974846097756" postCellId="../CG3D_L6NonTuftRS/0/L6NonTuftedPyrRS" postSegmentId="63" postFractionAlong="0.0221812482632" weight="1." delay="0.05 ms"/>
            <connectionWD id="1" preCellId="../CG3D_L5TuftIB/6/L5TuftedPyrIB" preSegmentId="121" preFractionAlong="0.420333287739" postCellId="../CG3D_L6NonTuftRS/0/L6NonTuftedPyrRS" postSegmentId="77" postFractionAlong="0.501235769725" weight="1." delay="0.05 ms"/>
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        </projection>
        <projection id="Proj39syn1_CG3D_L5TuftIB_CG3D_L6NonTuftRS" presynapticPopulation="CG3D_L5TuftIB" postsynapticPopulation="CG3D_L6NonTuftRS" synapse="Syn_AMPA_L5IB_L6NT">
            <connectionWD id="0" preCellId="../CG3D_L5TuftIB/1/L5TuftedPyrIB" preSegmentId="119" preFractionAlong="0.974846097756" postCellId="../CG3D_L6NonTuftRS/0/L6NonTuftedPyrRS" postSegmentId="63" postFractionAlong="0.0221812482632" weight="1." delay="0.05 ms"/>
            <connectionWD id="1" preCellId="../CG3D_L5TuftIB/6/L5TuftedPyrIB" preSegmentId="121" preFractionAlong="0.420333287739" postCellId="../CG3D_L6NonTuftRS/0/L6NonTuftedPyrRS" postSegmentId="77" postFractionAlong="0.501235769725" weight="1." delay="0.05 ms"/>
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        </projection>
        <projection id="Proj40syn0_CG3D_L5TuftIB_CG3D_DeepBask" presynapticPopulation="CG3D_L5TuftIB" postsynapticPopulation="CG3D_DeepBask" synapse="Syn_NMDA_L5IB_IN">
            <connectionWD id="0" preCellId="../CG3D_L5TuftIB/7/L5TuftedPyrIB" preSegmentId="120" preFractionAlong="0.11144072554" postCellId="../CG3D_DeepBask/0/DeepBasket" postSegmentId="94" postFractionAlong="0.711849982829" weight="2.5" delay="0.05 ms"/>
            <connectionWD id="1" preCellId="../CG3D_L5TuftIB/5/L5TuftedPyrIB" preSegmentId="121" preFractionAlong="0.379999857359" postCellId="../CG3D_DeepBask/0/DeepBasket" postSegmentId="94" postFractionAlong="0.719639783006" weight="2.5" delay="0.05 ms"/>
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        </projection>
        <projection id="Proj40syn1_CG3D_L5TuftIB_CG3D_DeepBask" presynapticPopulation="CG3D_L5TuftIB" postsynapticPopulation="CG3D_DeepBask" synapse="Syn_AMPA_L5IB_DeepFS">
            <connectionWD id="0" preCellId="../CG3D_L5TuftIB/7/L5TuftedPyrIB" preSegmentId="120" preFractionAlong="0.11144072554" postCellId="../CG3D_DeepBask/0/DeepBasket" postSegmentId="94" postFractionAlong="0.711849982829" weight="1." delay="0.05 ms"/>
            <connectionWD id="1" preCellId="../CG3D_L5TuftIB/5/L5TuftedPyrIB" preSegmentId="121" preFractionAlong="0.379999857359" postCellId="../CG3D_DeepBask/0/DeepBasket" postSegmentId="94" postFractionAlong="0.719639783006" weight="1." delay="0.05 ms"/>
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        </projection>
        <projection id="Proj41syn0_CG3D_L5TuftIB_CG3D_L23PyrRS" presynapticPopulation="CG3D_L5TuftIB" postsynapticPopulation="CG3D_L23PyrRS" synapse="Syn_NMDA_L5IB_SupPyr">
            <connectionWD id="0" preCellId="../CG3D_L5TuftIB/2/L5TuftedPyrIB" preSegmentId="118" preFractionAlong="0.353991419717" postCellId="../CG3D_L23PyrRS/0/L23PyrRS" postSegmentId="85" postFractionAlong="0.497537377479" weight="1." delay="0.05 ms"/>
            <connectionWD id="1" preCellId="../CG3D_L5TuftIB/7/L5TuftedPyrIB" preSegmentId="119" preFractionAlong="0.812837710663" postCellId="../CG3D_L23PyrRS/0/L23PyrRS" postSegmentId="91" postFractionAlong="0.599916802646" weight="1." delay="0.05 ms"/>
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        </projection>
        <projection id="Proj41syn1_CG3D_L5TuftIB_CG3D_L23PyrRS" presynapticPopulation="CG3D_L5TuftIB" postsynapticPopulation="CG3D_L23PyrRS" synapse="Syn_AMPA_L5IB_SupPyr">
            <connectionWD id="0" preCellId="../CG3D_L5TuftIB/2/L5TuftedPyrIB" preSegmentId="118" preFractionAlong="0.353991419717" postCellId="../CG3D_L23PyrRS/0/L23PyrRS" postSegmentId="85" postFractionAlong="0.497537377479" weight="1." delay="0.05 ms"/>
            <connectionWD id="1" preCellId="../CG3D_L5TuftIB/7/L5TuftedPyrIB" preSegmentId="119" preFractionAlong="0.812837710663" postCellId="../CG3D_L23PyrRS/0/L23PyrRS" postSegmentId="91" postFractionAlong="0.599916802646" weight="1." delay="0.05 ms"/>
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        </projection>
        <projection id="Proj42syn0_CG3D_L5TuftIB_CG3D_SupAxAx" presynapticPopulation="CG3D_L5TuftIB" postsynapticPopulation="CG3D_SupAxAx" synapse="Syn_NMDA_L5IB_IN">
            <connectionWD id="0" preCellId="../CG3D_L5TuftIB/2/L5TuftedPyrIB" preSegmentId="121" preFractionAlong="0.398440378997" postCellId="../CG3D_SupAxAx/0/SupAxAx" postSegmentId="8" postFractionAlong="0.306436631899" weight="2.5" delay="0.05 ms"/>
            <connectionWD id="1" preCellId="../CG3D_L5TuftIB/6/L5TuftedPyrIB" preSegmentId="118" preFractionAlong="0.108140885244" postCellId="../CG3D_SupAxAx/0/SupAxAx" postSegmentId="95" postFractionAlong="0.715425513878" weight="2.5" delay="0.05 ms"/>
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        </projection>
        <projection id="Proj42syn1_CG3D_L5TuftIB_CG3D_SupAxAx" presynapticPopulation="CG3D_L5TuftIB" postsynapticPopulation="CG3D_SupAxAx" synapse="Syn_AMPA_L5IB_SupFS">
            <connectionWD id="0" preCellId="../CG3D_L5TuftIB/2/L5TuftedPyrIB" preSegmentId="121" preFractionAlong="0.398440378997" postCellId="../CG3D_SupAxAx/0/SupAxAx" postSegmentId="8" postFractionAlong="0.306436631899" weight="1." delay="0.05 ms"/>
            <connectionWD id="1" preCellId="../CG3D_L5TuftIB/6/L5TuftedPyrIB" preSegmentId="118" preFractionAlong="0.108140885244" postCellId="../CG3D_SupAxAx/0/SupAxAx" postSegmentId="95" postFractionAlong="0.715425513878" weight="1." delay="0.05 ms"/>
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        </projection>
        <projection id="Proj43syn0_CG3D_L5TuftIB_CG3D_L23PyrFRB" presynapticPopulation="CG3D_L5TuftIB" postsynapticPopulation="CG3D_L23PyrFRB" synapse="Syn_NMDA_L5IB_SupPyr">
            <connectionWD id="0" preCellId="../CG3D_L5TuftIB/5/L5TuftedPyrIB" preSegmentId="120" preFractionAlong="0.245607778914" postCellId="../CG3D_L23PyrFRB/0/L23PyrFRB_varInit" postSegmentId="95" postFractionAlong="0.302866317907" weight="1." delay="0.05 ms"/>
            <connectionWD id="1" preCellId="../CG3D_L5TuftIB/4/L5TuftedPyrIB" preSegmentId="120" preFractionAlong="0.466306602777" postCellId="../CG3D_L23PyrFRB/0/L23PyrFRB_varInit" postSegmentId="83" postFractionAlong="0.72214548608" weight="1." delay="0.05 ms"/>
        </projection>
        <projection id="Proj43syn1_CG3D_L5TuftIB_CG3D_L23PyrFRB" presynapticPopulation="CG3D_L5TuftIB" postsynapticPopulation="CG3D_L23PyrFRB" synapse="Syn_AMPA_L5IB_SupPyr">
            <connectionWD id="0" preCellId="../CG3D_L5TuftIB/5/L5TuftedPyrIB" preSegmentId="120" preFractionAlong="0.245607778914" postCellId="../CG3D_L23PyrFRB/0/L23PyrFRB_varInit" postSegmentId="95" postFractionAlong="0.302866317907" weight="1." delay="0.05 ms"/>
            <connectionWD id="1" preCellId="../CG3D_L5TuftIB/4/L5TuftedPyrIB" preSegmentId="120" preFractionAlong="0.466306602777" postCellId="../CG3D_L23PyrFRB/0/L23PyrFRB_varInit" postSegmentId="83" postFractionAlong="0.72214548608" weight="1." delay="0.05 ms"/>
        </projection>
        <projection id="Proj44syn0_CG3D_L5TuftIB_CG3D_SupLTS" presynapticPopulation="CG3D_L5TuftIB" postsynapticPopulation="CG3D_SupLTS" synapse="Syn_AMPA_L5IB_SupLTS">
            <connectionWD id="0" preCellId="../CG3D_L5TuftIB/7/L5TuftedPyrIB" preSegmentId="119" preFractionAlong="0.520179552387" postCellId="../CG3D_SupLTS/0/SupLTSInter" postSegmentId="17" postFractionAlong="0.278504503574" weight="1." delay="0.05 ms"/>
            <connectionWD id="1" preCellId="../CG3D_L5TuftIB/5/L5TuftedPyrIB" preSegmentId="119" preFractionAlong="0.659814942793" postCellId="../CG3D_SupLTS/0/SupLTSInter" postSegmentId="61" postFractionAlong="0.868150097352" weight="1." delay="0.05 ms"/>
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        </projection>
        <projection id="Proj44syn1_CG3D_L5TuftIB_CG3D_SupLTS" presynapticPopulation="CG3D_L5TuftIB" postsynapticPopulation="CG3D_SupLTS" synapse="Syn_NMDA_L5IB_IN">
            <connectionWD id="0" preCellId="../CG3D_L5TuftIB/7/L5TuftedPyrIB" preSegmentId="119" preFractionAlong="0.520179552387" postCellId="../CG3D_SupLTS/0/SupLTSInter" postSegmentId="17" postFractionAlong="0.278504503574" weight="2.5" delay="0.05 ms"/>
            <connectionWD id="1" preCellId="../CG3D_L5TuftIB/5/L5TuftedPyrIB" preSegmentId="119" preFractionAlong="0.659814942793" postCellId="../CG3D_SupLTS/0/SupLTSInter" postSegmentId="61" postFractionAlong="0.868150097352" weight="2.5" delay="0.05 ms"/>
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        </projection>
        <projection id="Proj45syn0_CG3D_L5TuftIB_CG3D_SupBask" presynapticPopulation="CG3D_L5TuftIB" postsynapticPopulation="CG3D_SupBask" synapse="Syn_NMDA_L5IB_IN">
            <connectionWD id="0" preCellId="../CG3D_L5TuftIB/5/L5TuftedPyrIB" preSegmentId="120" preFractionAlong="0.243375374593" postCellId="../CG3D_SupBask/0/SupBasket" postSegmentId="61" postFractionAlong="0.821550997486" weight="2.5" delay="0.05 ms"/>
            <connectionWD id="1" preCellId="../CG3D_L5TuftIB/4/L5TuftedPyrIB" preSegmentId="119" preFractionAlong="0.841459939045" postCellId="../CG3D_SupBask/0/SupBasket" postSegmentId="35" postFractionAlong="0.0587337420094" weight="2.5" delay="0.05 ms"/>
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        </projection>
        <projection id="Proj45syn1_CG3D_L5TuftIB_CG3D_SupBask" presynapticPopulation="CG3D_L5TuftIB" postsynapticPopulation="CG3D_SupBask" synapse="Syn_AMPA_L5IB_SupFS">
            <connectionWD id="0" preCellId="../CG3D_L5TuftIB/5/L5TuftedPyrIB" preSegmentId="120" preFractionAlong="0.243375374593" postCellId="../CG3D_SupBask/0/SupBasket" postSegmentId="61" postFractionAlong="0.821550997486" weight="1." delay="0.05 ms"/>
            <connectionWD id="1" preCellId="../CG3D_L5TuftIB/4/L5TuftedPyrIB" preSegmentId="119" preFractionAlong="0.841459939045" postCellId="../CG3D_SupBask/0/SupBasket" postSegmentId="35" postFractionAlong="0.0587337420094" weight="1." delay="0.05 ms"/>
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        </projection>
        <projection id="Proj46syn0_CG3D_L5TuftRS_CG3D_DeepAxAx" presynapticPopulation="CG3D_L5TuftRS" postsynapticPopulation="CG3D_DeepAxAx" synapse="Syn_NMDA_L5RS_DeepIN">
            <connectionWD id="0" preCellId="../CG3D_L5TuftRS/1/L5TuftedPyrRS" preSegmentId="119" preFractionAlong="0.191088159415" postCellId="../CG3D_DeepAxAx/0/DeepAxAx" postSegmentId="93" postFractionAlong="0.222138681395" weight="2.5" delay="0.05 ms"/>
            <connectionWD id="1" preCellId="../CG3D_L5TuftRS/1/L5TuftedPyrRS" preSegmentId="120" preFractionAlong="0.406389470247" postCellId="../CG3D_DeepAxAx/0/DeepAxAx" postSegmentId="70" postFractionAlong="0.743016524642" weight="2.5" delay="0.05 ms"/>
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        </projection>
        <projection id="Proj46syn1_CG3D_L5TuftRS_CG3D_DeepAxAx" presynapticPopulation="CG3D_L5TuftRS" postsynapticPopulation="CG3D_DeepAxAx" synapse="Syn_AMPA_L5RS_DeepFS">
            <connectionWD id="0" preCellId="../CG3D_L5TuftRS/1/L5TuftedPyrRS" preSegmentId="119" preFractionAlong="0.191088159415" postCellId="../CG3D_DeepAxAx/0/DeepAxAx" postSegmentId="93" postFractionAlong="0.222138681395" weight="1." delay="0.05 ms"/>
            <connectionWD id="1" preCellId="../CG3D_L5TuftRS/1/L5TuftedPyrRS" preSegmentId="120" preFractionAlong="0.406389470247" postCellId="../CG3D_DeepAxAx/0/DeepAxAx" postSegmentId="70" postFractionAlong="0.743016524642" weight="1." delay="0.05 ms"/>
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        </projection>
        <projection id="Proj47syn0_CG3D_L5TuftRS_CG3D_DeepLTS" presynapticPopulation="CG3D_L5TuftRS" postsynapticPopulation="CG3D_DeepLTS" synapse="Syn_NMDA_L5RS_DeepIN">
            <connectionWD id="0" preCellId="../CG3D_L5TuftRS/1/L5TuftedPyrRS" preSegmentId="118" preFractionAlong="0.126331107163" postCellId="../CG3D_DeepLTS/0/DeepLTSInter" postSegmentId="95" postFractionAlong="0.403607659072" weight="2.5" delay="0.05 ms"/>
            <connectionWD id="1" preCellId="../CG3D_L5TuftRS/0/L5TuftedPyrRS" preSegmentId="120" preFractionAlong="0.0220289323112" postCellId="../CG3D_DeepLTS/0/DeepLTSInter" postSegmentId="93" postFractionAlong="0.900910968808" weight="2.5" delay="0.05 ms"/>
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        </projection>
        <projection id="Proj47syn1_CG3D_L5TuftRS_CG3D_DeepLTS" presynapticPopulation="CG3D_L5TuftRS" postsynapticPopulation="CG3D_DeepLTS" synapse="Syn_AMPA_L5RS_DeepLTS">
            <connectionWD id="0" preCellId="../CG3D_L5TuftRS/1/L5TuftedPyrRS" preSegmentId="118" preFractionAlong="0.126331107163" postCellId="../CG3D_DeepLTS/0/DeepLTSInter" postSegmentId="95" postFractionAlong="0.403607659072" weight="1." delay="0.05 ms"/>
            <connectionWD id="1" preCellId="../CG3D_L5TuftRS/0/L5TuftedPyrRS" preSegmentId="120" preFractionAlong="0.0220289323112" postCellId="../CG3D_DeepLTS/0/DeepLTSInter" postSegmentId="93" postFractionAlong="0.900910968808" weight="1." delay="0.05 ms"/>
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        </projection>
        <projection id="Proj48syn0_CG3D_L5TuftRS_CG3D_L4SpinStell" presynapticPopulation="CG3D_L5TuftRS" postsynapticPopulation="CG3D_L4SpinStell" synapse="Syn_AMPA_L5RS_L4SS">
            <connectionWD id="0" preCellId="../CG3D_L5TuftRS/1/L5TuftedPyrRS" preSegmentId="118" preFractionAlong="0.0984280528729" postCellId="../CG3D_L4SpinStell/0/L4SpinyStellate" postSegmentId="38" postFractionAlong="0.426328661278" weight="1." delay="0.05 ms"/>
            <connectionWD id="1" preCellId="../CG3D_L5TuftRS/0/L5TuftedPyrRS" preSegmentId="119" preFractionAlong="0.836081554396" postCellId="../CG3D_L4SpinStell/0/L4SpinyStellate" postSegmentId="16" postFractionAlong="0.258905437659" weight="1." delay="0.05 ms"/>
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        </projection>
        <projection id="Proj48syn1_CG3D_L5TuftRS_CG3D_L4SpinStell" presynapticPopulation="CG3D_L5TuftRS" postsynapticPopulation="CG3D_L4SpinStell" synapse="Syn_NMDA_L5RS_L4SS">
            <connectionWD id="0" preCellId="../CG3D_L5TuftRS/1/L5TuftedPyrRS" preSegmentId="118" preFractionAlong="0.0984280528729" postCellId="../CG3D_L4SpinStell/0/L4SpinyStellate" postSegmentId="38" postFractionAlong="0.426328661278" weight="1." delay="0.05 ms"/>
            <connectionWD id="1" preCellId="../CG3D_L5TuftRS/0/L5TuftedPyrRS" preSegmentId="119" preFractionAlong="0.836081554396" postCellId="../CG3D_L4SpinStell/0/L4SpinyStellate" postSegmentId="16" postFractionAlong="0.258905437659" weight="1." delay="0.05 ms"/>
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        </projection>
        <projection id="Proj49syn0_CG3D_L5TuftRS_CG3D_L5TuftIB" presynapticPopulation="CG3D_L5TuftRS" postsynapticPopulation="CG3D_L5TuftIB" synapse="Syn_NMDA_L5RS_DeepPyr">
            <connectionWD id="0" preCellId="../CG3D_L5TuftRS/0/L5TuftedPyrRS" preSegmentId="118" preFractionAlong="0.307819582373" postCellId="../CG3D_L5TuftIB/0/L5TuftedPyrIB" postSegmentId="27" postFractionAlong="0.729228774452" weight="1." delay="0.05 ms"/>
            <connectionWD id="1" preCellId="../CG3D_L5TuftRS/0/L5TuftedPyrRS" preSegmentId="118" preFractionAlong="0.197833228744" postCellId="../CG3D_L5TuftIB/0/L5TuftedPyrIB" postSegmentId="87" postFractionAlong="0.739042546109" weight="1." delay="0.05 ms"/>
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        </projection>
        <projection id="Proj49syn1_CG3D_L5TuftRS_CG3D_L5TuftIB" presynapticPopulation="CG3D_L5TuftRS" postsynapticPopulation="CG3D_L5TuftIB" synapse="Syn_AMPA_L5RS_L5Pyr">
            <connectionWD id="0" preCellId="../CG3D_L5TuftRS/0/L5TuftedPyrRS" preSegmentId="118" preFractionAlong="0.307819582373" postCellId="../CG3D_L5TuftIB/0/L5TuftedPyrIB" postSegmentId="27" postFractionAlong="0.729228774452" weight="1." delay="0.05 ms"/>
            <connectionWD id="1" preCellId="../CG3D_L5TuftRS/0/L5TuftedPyrRS" preSegmentId="118" preFractionAlong="0.197833228744" postCellId="../CG3D_L5TuftIB/0/L5TuftedPyrIB" postSegmentId="87" postFractionAlong="0.739042546109" weight="1." delay="0.05 ms"/>
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        </projection>
        <projection id="Proj50syn0_CG3D_L5TuftRS_CG3D_L5TuftRS" presynapticPopulation="CG3D_L5TuftRS" postsynapticPopulation="CG3D_L5TuftRS" synapse="Syn_NMDA_L5RS_DeepPyr">
            <connectionWD id="0" preCellId="../CG3D_L5TuftRS/1/L5TuftedPyrRS" preSegmentId="119" preFractionAlong="0.22487088138" postCellId="../CG3D_L5TuftRS/0/L5TuftedPyrRS" postSegmentId="20" postFractionAlong="0.701901589184" weight="1." delay="0.05 ms"/>
            <connectionWD id="1" preCellId="../CG3D_L5TuftRS/1/L5TuftedPyrRS" preSegmentId="120" preFractionAlong="0.312803579382" postCellId="../CG3D_L5TuftRS/0/L5TuftedPyrRS" postSegmentId="4" postFractionAlong="0.837412555619" weight="1." delay="0.05 ms"/>
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        </projection>
        <projection id="Proj50syn1_CG3D_L5TuftRS_CG3D_L5TuftRS" presynapticPopulation="CG3D_L5TuftRS" postsynapticPopulation="CG3D_L5TuftRS" synapse="Syn_AMPA_L5RS_L5Pyr">
            <connectionWD id="0" preCellId="../CG3D_L5TuftRS/1/L5TuftedPyrRS" preSegmentId="119" preFractionAlong="0.22487088138" postCellId="../CG3D_L5TuftRS/0/L5TuftedPyrRS" postSegmentId="20" postFractionAlong="0.701901589184" weight="1." delay="0.05 ms"/>
            <connectionWD id="1" preCellId="../CG3D_L5TuftRS/1/L5TuftedPyrRS" preSegmentId="120" preFractionAlong="0.312803579382" postCellId="../CG3D_L5TuftRS/0/L5TuftedPyrRS" postSegmentId="4" postFractionAlong="0.837412555619" weight="1." delay="0.05 ms"/>
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        </projection>
        <projection id="Proj52syn0_CG3D_L5TuftRS_CG3D_L6NonTuftRS" presynapticPopulation="CG3D_L5TuftRS" postsynapticPopulation="CG3D_L6NonTuftRS" synapse="Syn_NMDA_L5RS_DeepPyr">
            <connectionWD id="0" preCellId="../CG3D_L5TuftRS/1/L5TuftedPyrRS" preSegmentId="120" preFractionAlong="0.264539757207" postCellId="../CG3D_L6NonTuftRS/0/L6NonTuftedPyrRS" postSegmentId="10" postFractionAlong="0.563776660423" weight="1." delay="0.05 ms"/>
            <connectionWD id="1" preCellId="../CG3D_L5TuftRS/0/L5TuftedPyrRS" preSegmentId="121" preFractionAlong="0.322623885114" postCellId="../CG3D_L6NonTuftRS/0/L6NonTuftedPyrRS" postSegmentId="64" postFractionAlong="0.472974829886" weight="1." delay="0.05 ms"/>
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        </projection>
        <projection id="Proj52syn1_CG3D_L5TuftRS_CG3D_L6NonTuftRS" presynapticPopulation="CG3D_L5TuftRS" postsynapticPopulation="CG3D_L6NonTuftRS" synapse="Syn_AMPA_L5RS_L6NT">
            <connectionWD id="0" preCellId="../CG3D_L5TuftRS/1/L5TuftedPyrRS" preSegmentId="120" preFractionAlong="0.264539757207" postCellId="../CG3D_L6NonTuftRS/0/L6NonTuftedPyrRS" postSegmentId="10" postFractionAlong="0.563776660423" weight="1." delay="0.05 ms"/>
            <connectionWD id="1" preCellId="../CG3D_L5TuftRS/0/L5TuftedPyrRS" preSegmentId="121" preFractionAlong="0.322623885114" postCellId="../CG3D_L6NonTuftRS/0/L6NonTuftedPyrRS" postSegmentId="64" postFractionAlong="0.472974829886" weight="1." delay="0.05 ms"/>
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        </projection>
        <projection id="Proj53syn0_CG3D_L5TuftRS_CG3D_DeepBask" presynapticPopulation="CG3D_L5TuftRS" postsynapticPopulation="CG3D_DeepBask" synapse="Syn_NMDA_L5RS_DeepIN">
            <connectionWD id="0" preCellId="../CG3D_L5TuftRS/0/L5TuftedPyrRS" preSegmentId="118" preFractionAlong="0.0486789156264" postCellId="../CG3D_DeepBask/0/DeepBasket" postSegmentId="60" postFractionAlong="0.0736556762677" weight="2.5" delay="0.05 ms"/>
            <connectionWD id="1" preCellId="../CG3D_L5TuftRS/1/L5TuftedPyrRS" preSegmentId="118" preFractionAlong="0.75838490544" postCellId="../CG3D_DeepBask/0/DeepBasket" postSegmentId="90" postFractionAlong="0.470612848607" weight="2.5" delay="0.05 ms"/>
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        </projection>
        <projection id="Proj53syn1_CG3D_L5TuftRS_CG3D_DeepBask" presynapticPopulation="CG3D_L5TuftRS" postsynapticPopulation="CG3D_DeepBask" synapse="Syn_AMPA_L5RS_DeepFS">
            <connectionWD id="0" preCellId="../CG3D_L5TuftRS/0/L5TuftedPyrRS" preSegmentId="118" preFractionAlong="0.0486789156264" postCellId="../CG3D_DeepBask/0/DeepBasket" postSegmentId="60" postFractionAlong="0.0736556762677" weight="1." delay="0.05 ms"/>
            <connectionWD id="1" preCellId="../CG3D_L5TuftRS/1/L5TuftedPyrRS" preSegmentId="118" preFractionAlong="0.75838490544" postCellId="../CG3D_DeepBask/0/DeepBasket" postSegmentId="90" postFractionAlong="0.470612848607" weight="1." delay="0.05 ms"/>
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        </projection>
        <projection id="Proj54syn0_CG3D_L5TuftRS_CG3D_L23PyrRS" presynapticPopulation="CG3D_L5TuftRS" postsynapticPopulation="CG3D_L23PyrRS" synapse="Syn_NMDA_L5RS_SupPyr">
            <connectionWD id="0" preCellId="../CG3D_L5TuftRS/1/L5TuftedPyrRS" preSegmentId="119" preFractionAlong="0.55860410621" postCellId="../CG3D_L23PyrRS/0/L23PyrRS" postSegmentId="84" postFractionAlong="0.31825222767" weight="1." delay="0.05 ms"/>
            <connectionWD id="1" preCellId="../CG3D_L5TuftRS/0/L5TuftedPyrRS" preSegmentId="120" preFractionAlong="0.980427431157" postCellId="../CG3D_L23PyrRS/0/L23PyrRS" postSegmentId="89" postFractionAlong="0.329604981197" weight="1." delay="0.05 ms"/>
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        </projection>
        <projection id="Proj54syn1_CG3D_L5TuftRS_CG3D_L23PyrRS" presynapticPopulation="CG3D_L5TuftRS" postsynapticPopulation="CG3D_L23PyrRS" synapse="Syn_AMPA_L5RS_SupPyr">
            <connectionWD id="0" preCellId="../CG3D_L5TuftRS/1/L5TuftedPyrRS" preSegmentId="119" preFractionAlong="0.55860410621" postCellId="../CG3D_L23PyrRS/0/L23PyrRS" postSegmentId="84" postFractionAlong="0.31825222767" weight="1." delay="0.05 ms"/>
            <connectionWD id="1" preCellId="../CG3D_L5TuftRS/0/L5TuftedPyrRS" preSegmentId="120" preFractionAlong="0.980427431157" postCellId="../CG3D_L23PyrRS/0/L23PyrRS" postSegmentId="89" postFractionAlong="0.329604981197" weight="1." delay="0.05 ms"/>
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        </projection>
        <projection id="Proj55syn0_CG3D_L5TuftRS_CG3D_SupAxAx" presynapticPopulation="CG3D_L5TuftRS" postsynapticPopulation="CG3D_SupAxAx" synapse="Syn_AMPA_L5RS_SupFS">
            <connectionWD id="0" preCellId="../CG3D_L5TuftRS/1/L5TuftedPyrRS" preSegmentId="118" preFractionAlong="0.840840695246" postCellId="../CG3D_SupAxAx/0/SupAxAx" postSegmentId="66" postFractionAlong="0.984235485613" weight="1." delay="0.05 ms"/>
            <connectionWD id="1" preCellId="../CG3D_L5TuftRS/0/L5TuftedPyrRS" preSegmentId="121" preFractionAlong="0.134057921104" postCellId="../CG3D_SupAxAx/0/SupAxAx" postSegmentId="34" postFractionAlong="0.274701703226" weight="1." delay="0.05 ms"/>
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        </projection>
        <projection id="Proj55syn1_CG3D_L5TuftRS_CG3D_SupAxAx" presynapticPopulation="CG3D_L5TuftRS" postsynapticPopulation="CG3D_SupAxAx" synapse="Syn_NMDA_L5RS_SupIN">
            <connectionWD id="0" preCellId="../CG3D_L5TuftRS/1/L5TuftedPyrRS" preSegmentId="118" preFractionAlong="0.840840695246" postCellId="../CG3D_SupAxAx/0/SupAxAx" postSegmentId="66" postFractionAlong="0.984235485613" weight="2.5" delay="0.05 ms"/>
            <connectionWD id="1" preCellId="../CG3D_L5TuftRS/0/L5TuftedPyrRS" preSegmentId="121" preFractionAlong="0.134057921104" postCellId="../CG3D_SupAxAx/0/SupAxAx" postSegmentId="34" postFractionAlong="0.274701703226" weight="2.5" delay="0.05 ms"/>
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        </projection>
        <projection id="Proj56syn0_CG3D_L5TuftRS_CG3D_L23PyrFRB" presynapticPopulation="CG3D_L5TuftRS" postsynapticPopulation="CG3D_L23PyrFRB" synapse="Syn_NMDA_L5RS_SupPyr">
            <connectionWD id="0" preCellId="../CG3D_L5TuftRS/0/L5TuftedPyrRS" preSegmentId="120" preFractionAlong="0.575733441217" postCellId="../CG3D_L23PyrFRB/0/L23PyrFRB_varInit" postSegmentId="90" postFractionAlong="0.0719429449194" weight="1." delay="0.05 ms"/>
            <connectionWD id="1" preCellId="../CG3D_L5TuftRS/1/L5TuftedPyrRS" preSegmentId="121" preFractionAlong="0.551254189866" postCellId="../CG3D_L23PyrFRB/0/L23PyrFRB_varInit" postSegmentId="83" postFractionAlong="0.648387257383" weight="1." delay="0.05 ms"/>
        </projection>
        <projection id="Proj56syn1_CG3D_L5TuftRS_CG3D_L23PyrFRB" presynapticPopulation="CG3D_L5TuftRS" postsynapticPopulation="CG3D_L23PyrFRB" synapse="Syn_AMPA_L5RS_SupPyr">
            <connectionWD id="0" preCellId="../CG3D_L5TuftRS/0/L5TuftedPyrRS" preSegmentId="120" preFractionAlong="0.575733441217" postCellId="../CG3D_L23PyrFRB/0/L23PyrFRB_varInit" postSegmentId="90" postFractionAlong="0.0719429449194" weight="1." delay="0.05 ms"/>
            <connectionWD id="1" preCellId="../CG3D_L5TuftRS/1/L5TuftedPyrRS" preSegmentId="121" preFractionAlong="0.551254189866" postCellId="../CG3D_L23PyrFRB/0/L23PyrFRB_varInit" postSegmentId="83" postFractionAlong="0.648387257383" weight="1." delay="0.05 ms"/>
        </projection>
        <projection id="Proj57syn0_CG3D_L5TuftRS_CG3D_SupLTS" presynapticPopulation="CG3D_L5TuftRS" postsynapticPopulation="CG3D_SupLTS" synapse="Syn_NMDA_L5RS_SupIN">
            <connectionWD id="0" preCellId="../CG3D_L5TuftRS/0/L5TuftedPyrRS" preSegmentId="119" preFractionAlong="0.375705665846" postCellId="../CG3D_SupLTS/0/SupLTSInter" postSegmentId="87" postFractionAlong="0.0790589047873" weight="2.5" delay="0.05 ms"/>
            <connectionWD id="1" preCellId="../CG3D_L5TuftRS/1/L5TuftedPyrRS" preSegmentId="120" preFractionAlong="0.390924531503" postCellId="../CG3D_SupLTS/0/SupLTSInter" postSegmentId="44" postFractionAlong="0.344867266434" weight="2.5" delay="0.05 ms"/>
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        </projection>
        <projection id="Proj57syn1_CG3D_L5TuftRS_CG3D_SupLTS" presynapticPopulation="CG3D_L5TuftRS" postsynapticPopulation="CG3D_SupLTS" synapse="Syn_AMPA_L5RS_SupLTS">
            <connectionWD id="0" preCellId="../CG3D_L5TuftRS/0/L5TuftedPyrRS" preSegmentId="119" preFractionAlong="0.375705665846" postCellId="../CG3D_SupLTS/0/SupLTSInter" postSegmentId="87" postFractionAlong="0.0790589047873" weight="1." delay="0.05 ms"/>
            <connectionWD id="1" preCellId="../CG3D_L5TuftRS/1/L5TuftedPyrRS" preSegmentId="120" preFractionAlong="0.390924531503" postCellId="../CG3D_SupLTS/0/SupLTSInter" postSegmentId="44" postFractionAlong="0.344867266434" weight="1." delay="0.05 ms"/>
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        </projection>
        <projection id="Proj58syn0_CG3D_L5TuftRS_CG3D_SupBask" presynapticPopulation="CG3D_L5TuftRS" postsynapticPopulation="CG3D_SupBask" synapse="Syn_AMPA_L5RS_SupFS">
            <connectionWD id="0" preCellId="../CG3D_L5TuftRS/1/L5TuftedPyrRS" preSegmentId="119" preFractionAlong="0.373300145685" postCellId="../CG3D_SupBask/0/SupBasket" postSegmentId="42" postFractionAlong="0.507327362962" weight="1." delay="0.05 ms"/>
            <connectionWD id="1" preCellId="../CG3D_L5TuftRS/1/L5TuftedPyrRS" preSegmentId="118" preFractionAlong="0.794334237065" postCellId="../CG3D_SupBask/0/SupBasket" postSegmentId="86" postFractionAlong="0.720455995796" weight="1." delay="0.05 ms"/>
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        </projection>
        <projection id="Proj58syn1_CG3D_L5TuftRS_CG3D_SupBask" presynapticPopulation="CG3D_L5TuftRS" postsynapticPopulation="CG3D_SupBask" synapse="Syn_NMDA_L5RS_SupIN">
            <connectionWD id="0" preCellId="../CG3D_L5TuftRS/1/L5TuftedPyrRS" preSegmentId="119" preFractionAlong="0.373300145685" postCellId="../CG3D_SupBask/0/SupBasket" postSegmentId="42" postFractionAlong="0.507327362962" weight="2.5" delay="0.05 ms"/>
            <connectionWD id="1" preCellId="../CG3D_L5TuftRS/1/L5TuftedPyrRS" preSegmentId="118" preFractionAlong="0.794334237065" postCellId="../CG3D_SupBask/0/SupBasket" postSegmentId="86" postFractionAlong="0.720455995796" weight="2.5" delay="0.05 ms"/>
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        </projection>
        <projection id="Proj59syn0_CG3D_L6NonTuftRS_CG3D_DeepAxAx" presynapticPopulation="CG3D_L6NonTuftRS" postsynapticPopulation="CG3D_DeepAxAx" synapse="Syn_NMDA_L6NT_DeepFS">
            <connectionWD id="0" preCellId="../CG3D_L6NonTuftRS/3/L6NonTuftedPyrRS" preSegmentId="99" preFractionAlong="0.497959806959" postCellId="../CG3D_DeepAxAx/0/DeepAxAx" postSegmentId="91" postFractionAlong="0.972674103965" weight="2.5" delay="0.05 ms"/>
            <connectionWD id="1" preCellId="../CG3D_L6NonTuftRS/2/L6NonTuftedPyrRS" preSegmentId="94" preFractionAlong="0.221614047092" postCellId="../CG3D_DeepAxAx/0/DeepAxAx" postSegmentId="35" postFractionAlong="0.527009990375" weight="2.5" delay="0.05 ms"/>
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        </projection>
        <projection id="Proj59syn1_CG3D_L6NonTuftRS_CG3D_DeepAxAx" presynapticPopulation="CG3D_L6NonTuftRS" postsynapticPopulation="CG3D_DeepAxAx" synapse="Syn_AMPA_L6NT_DeepFS">
            <connectionWD id="0" preCellId="../CG3D_L6NonTuftRS/3/L6NonTuftedPyrRS" preSegmentId="99" preFractionAlong="0.497959806959" postCellId="../CG3D_DeepAxAx/0/DeepAxAx" postSegmentId="91" postFractionAlong="0.972674103965" weight="1." delay="0.05 ms"/>
            <connectionWD id="1" preCellId="../CG3D_L6NonTuftRS/2/L6NonTuftedPyrRS" preSegmentId="94" preFractionAlong="0.221614047092" postCellId="../CG3D_DeepAxAx/0/DeepAxAx" postSegmentId="35" postFractionAlong="0.527009990375" weight="1." delay="0.05 ms"/>
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        </projection>
        <projection id="Proj60syn0_CG3D_L6NonTuftRS_CG3D_DeepLTS" presynapticPopulation="CG3D_L6NonTuftRS" postsynapticPopulation="CG3D_DeepLTS" synapse="Syn_AMPA_L6NT_DeepLTS">
            <connectionWD id="0" preCellId="../CG3D_L6NonTuftRS/4/L6NonTuftedPyrRS" preSegmentId="95" preFractionAlong="0.997642734321" postCellId="../CG3D_DeepLTS/0/DeepLTSInter" postSegmentId="63" postFractionAlong="0.801808147006" weight="1." delay="0.05 ms"/>
            <connectionWD id="1" preCellId="../CG3D_L6NonTuftRS/0/L6NonTuftedPyrRS" preSegmentId="94" preFractionAlong="0.68511706954" postCellId="../CG3D_DeepLTS/0/DeepLTSInter" postSegmentId="91" postFractionAlong="0.700472024122" weight="1." delay="0.05 ms"/>
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        </projection>
        <projection id="Proj60syn1_CG3D_L6NonTuftRS_CG3D_DeepLTS" presynapticPopulation="CG3D_L6NonTuftRS" postsynapticPopulation="CG3D_DeepLTS" synapse="Syn_NMDA_L6NT_DeepLTS">
            <connectionWD id="0" preCellId="../CG3D_L6NonTuftRS/4/L6NonTuftedPyrRS" preSegmentId="95" preFractionAlong="0.997642734321" postCellId="../CG3D_DeepLTS/0/DeepLTSInter" postSegmentId="63" postFractionAlong="0.801808147006" weight="2.5" delay="0.05 ms"/>
            <connectionWD id="1" preCellId="../CG3D_L6NonTuftRS/0/L6NonTuftedPyrRS" preSegmentId="94" preFractionAlong="0.68511706954" postCellId="../CG3D_DeepLTS/0/DeepLTSInter" postSegmentId="91" postFractionAlong="0.700472024122" weight="2.5" delay="0.05 ms"/>
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        </projection>
        <projection id="Proj61syn0_CG3D_L6NonTuftRS_CG3D_L4SpinStell" presynapticPopulation="CG3D_L6NonTuftRS" postsynapticPopulation="CG3D_L4SpinStell" synapse="Syn_AMPA_L6NT_L4SS">
            <connectionWD id="0" preCellId="../CG3D_L6NonTuftRS/1/L6NonTuftedPyrRS" preSegmentId="94" preFractionAlong="0.807171537295" postCellId="../CG3D_L4SpinStell/0/L4SpinyStellate" postSegmentId="17" postFractionAlong="0.264982270023" weight="1." delay="0.05 ms"/>
            <connectionWD id="1" preCellId="../CG3D_L6NonTuftRS/3/L6NonTuftedPyrRS" preSegmentId="95" preFractionAlong="0.770247924732" postCellId="../CG3D_L4SpinStell/0/L4SpinyStellate" postSegmentId="62" postFractionAlong="0.320879620241" weight="1." delay="0.05 ms"/>
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        </projection>
        <projection id="Proj61syn1_CG3D_L6NonTuftRS_CG3D_L4SpinStell" presynapticPopulation="CG3D_L6NonTuftRS" postsynapticPopulation="CG3D_L4SpinStell" synapse="Syn_NMDA_L6NT_L4SS">
            <connectionWD id="0" preCellId="../CG3D_L6NonTuftRS/1/L6NonTuftedPyrRS" preSegmentId="94" preFractionAlong="0.807171537295" postCellId="../CG3D_L4SpinStell/0/L4SpinyStellate" postSegmentId="17" postFractionAlong="0.264982270023" weight="1." delay="0.05 ms"/>
            <connectionWD id="1" preCellId="../CG3D_L6NonTuftRS/3/L6NonTuftedPyrRS" preSegmentId="95" preFractionAlong="0.770247924732" postCellId="../CG3D_L4SpinStell/0/L4SpinyStellate" postSegmentId="62" postFractionAlong="0.320879620241" weight="1." delay="0.05 ms"/>
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        </projection>
        <projection id="Proj62syn0_CG3D_L6NonTuftRS_CG3D_L5TuftIB" presynapticPopulation="CG3D_L6NonTuftRS" postsynapticPopulation="CG3D_L5TuftIB" synapse="Syn_AMPA_L6NT_L5Pyr">
            <connectionWD id="0" preCellId="../CG3D_L6NonTuftRS/4/L6NonTuftedPyrRS" preSegmentId="99" preFractionAlong="0.937489163537" postCellId="../CG3D_L5TuftIB/0/L5TuftedPyrIB" postSegmentId="65" postFractionAlong="0.00328843350832" weight="1." delay="0.05 ms"/>
            <connectionWD id="1" preCellId="../CG3D_L6NonTuftRS/2/L6NonTuftedPyrRS" preSegmentId="94" preFractionAlong="0.655818657981" postCellId="../CG3D_L5TuftIB/0/L5TuftedPyrIB" postSegmentId="19" postFractionAlong="0.643186900077" weight="1." delay="0.05 ms"/>
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        </projection>
        <projection id="Proj62syn1_CG3D_L6NonTuftRS_CG3D_L5TuftIB" presynapticPopulation="CG3D_L6NonTuftRS" postsynapticPopulation="CG3D_L5TuftIB" synapse="Syn_NMDA_L6NT_DeepPyr">
            <connectionWD id="0" preCellId="../CG3D_L6NonTuftRS/4/L6NonTuftedPyrRS" preSegmentId="99" preFractionAlong="0.937489163537" postCellId="../CG3D_L5TuftIB/0/L5TuftedPyrIB" postSegmentId="65" postFractionAlong="0.00328843350832" weight="1." delay="0.05 ms"/>
            <connectionWD id="1" preCellId="../CG3D_L6NonTuftRS/2/L6NonTuftedPyrRS" preSegmentId="94" preFractionAlong="0.655818657981" postCellId="../CG3D_L5TuftIB/0/L5TuftedPyrIB" postSegmentId="19" postFractionAlong="0.643186900077" weight="1." delay="0.05 ms"/>
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        </projection>
        <projection id="Proj63syn0_CG3D_L6NonTuftRS_CG3D_L5TuftRS" presynapticPopulation="CG3D_L6NonTuftRS" postsynapticPopulation="CG3D_L5TuftRS" synapse="Syn_AMPA_L6NT_L5Pyr">
            <connectionWD id="0" preCellId="../CG3D_L6NonTuftRS/3/L6NonTuftedPyrRS" preSegmentId="94" preFractionAlong="0.358055019899" postCellId="../CG3D_L5TuftRS/0/L5TuftedPyrRS" postSegmentId="55" postFractionAlong="0.888992574354" weight="1." delay="0.05 ms"/>
            <connectionWD id="1" preCellId="../CG3D_L6NonTuftRS/0/L6NonTuftedPyrRS" preSegmentId="95" preFractionAlong="0.70967605471" postCellId="../CG3D_L5TuftRS/0/L5TuftedPyrRS" postSegmentId="78" postFractionAlong="0.493270368169" weight="1." delay="0.05 ms"/>
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        </projection>
        <projection id="Proj63syn1_CG3D_L6NonTuftRS_CG3D_L5TuftRS" presynapticPopulation="CG3D_L6NonTuftRS" postsynapticPopulation="CG3D_L5TuftRS" synapse="Syn_NMDA_L6NT_DeepPyr">
            <connectionWD id="0" preCellId="../CG3D_L6NonTuftRS/3/L6NonTuftedPyrRS" preSegmentId="94" preFractionAlong="0.358055019899" postCellId="../CG3D_L5TuftRS/0/L5TuftedPyrRS" postSegmentId="55" postFractionAlong="0.888992574354" weight="1." delay="0.05 ms"/>
            <connectionWD id="1" preCellId="../CG3D_L6NonTuftRS/0/L6NonTuftedPyrRS" preSegmentId="95" preFractionAlong="0.70967605471" postCellId="../CG3D_L5TuftRS/0/L5TuftedPyrRS" postSegmentId="78" postFractionAlong="0.493270368169" weight="1." delay="0.05 ms"/>
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        </projection>
        <projection id="Proj64syn0_CG3D_L6NonTuftRS_CG3D_L6NonTuftRS" presynapticPopulation="CG3D_L6NonTuftRS" postsynapticPopulation="CG3D_L6NonTuftRS" synapse="Syn_NMDA_L6NT_DeepPyr">
            <connectionWD id="0" preCellId="../CG3D_L6NonTuftRS/2/L6NonTuftedPyrRS" preSegmentId="94" preFractionAlong="0.528283754955" postCellId="../CG3D_L6NonTuftRS/0/L6NonTuftedPyrRS" postSegmentId="60" postFractionAlong="0.63015974567" weight="1." delay="0.05 ms"/>
            <connectionWD id="1" preCellId="../CG3D_L6NonTuftRS/3/L6NonTuftedPyrRS" preSegmentId="99" preFractionAlong="0.364076022985" postCellId="../CG3D_L6NonTuftRS/0/L6NonTuftedPyrRS" postSegmentId="57" postFractionAlong="0.80252427487" weight="1." delay="0.05 ms"/>
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        </projection>
        <projection id="Proj64syn1_CG3D_L6NonTuftRS_CG3D_L6NonTuftRS" presynapticPopulation="CG3D_L6NonTuftRS" postsynapticPopulation="CG3D_L6NonTuftRS" synapse="Syn_AMPA_L6NT_L6NT">
            <connectionWD id="0" preCellId="../CG3D_L6NonTuftRS/2/L6NonTuftedPyrRS" preSegmentId="94" preFractionAlong="0.528283754955" postCellId="../CG3D_L6NonTuftRS/0/L6NonTuftedPyrRS" postSegmentId="60" postFractionAlong="0.63015974567" weight="1." delay="0.05 ms"/>
            <connectionWD id="1" preCellId="../CG3D_L6NonTuftRS/3/L6NonTuftedPyrRS" preSegmentId="99" preFractionAlong="0.364076022985" postCellId="../CG3D_L6NonTuftRS/0/L6NonTuftedPyrRS" postSegmentId="57" postFractionAlong="0.80252427487" weight="1." delay="0.05 ms"/>
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        </projection>
        <projection id="Proj66syn0_CG3D_L6NonTuftRS_CG3D_DeepBask" presynapticPopulation="CG3D_L6NonTuftRS" postsynapticPopulation="CG3D_DeepBask" synapse="Syn_NMDA_L6NT_DeepFS">
            <connectionWD id="0" preCellId="../CG3D_L6NonTuftRS/2/L6NonTuftedPyrRS" preSegmentId="99" preFractionAlong="0.182313189378" postCellId="../CG3D_DeepBask/0/DeepBasket" postSegmentId="67" postFractionAlong="0.350776210551" weight="2.5" delay="0.05 ms"/>
            <connectionWD id="1" preCellId="../CG3D_L6NonTuftRS/2/L6NonTuftedPyrRS" preSegmentId="99" preFractionAlong="0.798082031313" postCellId="../CG3D_DeepBask/0/DeepBasket" postSegmentId="86" postFractionAlong="0.755927403897" weight="2.5" delay="0.05 ms"/>
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        </projection>
        <projection id="Proj66syn1_CG3D_L6NonTuftRS_CG3D_DeepBask" presynapticPopulation="CG3D_L6NonTuftRS" postsynapticPopulation="CG3D_DeepBask" synapse="Syn_AMPA_L6NT_DeepFS">
            <connectionWD id="0" preCellId="../CG3D_L6NonTuftRS/2/L6NonTuftedPyrRS" preSegmentId="99" preFractionAlong="0.182313189378" postCellId="../CG3D_DeepBask/0/DeepBasket" postSegmentId="67" postFractionAlong="0.350776210551" weight="1." delay="0.05 ms"/>
            <connectionWD id="1" preCellId="../CG3D_L6NonTuftRS/2/L6NonTuftedPyrRS" preSegmentId="99" preFractionAlong="0.798082031313" postCellId="../CG3D_DeepBask/0/DeepBasket" postSegmentId="86" postFractionAlong="0.755927403897" weight="1." delay="0.05 ms"/>
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        </projection>
        <projection id="Proj67syn0_CG3D_L6NonTuftRS_CG3D_L23PyrRS" presynapticPopulation="CG3D_L6NonTuftRS" postsynapticPopulation="CG3D_L23PyrRS" synapse="Syn_AMPA_L6NT_SupPyr">
            <connectionWD id="0" preCellId="../CG3D_L6NonTuftRS/0/L6NonTuftedPyrRS" preSegmentId="98" preFractionAlong="0.385060492137" postCellId="../CG3D_L23PyrRS/0/L23PyrRS" postSegmentId="81" postFractionAlong="0.694078645993" weight="1." delay="0.05 ms"/>
            <connectionWD id="1" preCellId="../CG3D_L6NonTuftRS/0/L6NonTuftedPyrRS" preSegmentId="99" preFractionAlong="0.75218401496" postCellId="../CG3D_L23PyrRS/0/L23PyrRS" postSegmentId="85" postFractionAlong="0.377254570436" weight="1." delay="0.05 ms"/>
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        </projection>
        <projection id="Proj67syn1_CG3D_L6NonTuftRS_CG3D_L23PyrRS" presynapticPopulation="CG3D_L6NonTuftRS" postsynapticPopulation="CG3D_L23PyrRS" synapse="Syn_NMDA_L6NT_SupPyr">
            <connectionWD id="0" preCellId="../CG3D_L6NonTuftRS/0/L6NonTuftedPyrRS" preSegmentId="98" preFractionAlong="0.385060492137" postCellId="../CG3D_L23PyrRS/0/L23PyrRS" postSegmentId="81" postFractionAlong="0.694078645993" weight="1." delay="0.05 ms"/>
            <connectionWD id="1" preCellId="../CG3D_L6NonTuftRS/0/L6NonTuftedPyrRS" preSegmentId="99" preFractionAlong="0.75218401496" postCellId="../CG3D_L23PyrRS/0/L23PyrRS" postSegmentId="85" postFractionAlong="0.377254570436" weight="1." delay="0.05 ms"/>
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        </projection>
        <projection id="Proj68syn0_CG3D_L6NonTuftRS_CG3D_SupAxAx" presynapticPopulation="CG3D_L6NonTuftRS" postsynapticPopulation="CG3D_SupAxAx" synapse="Syn_NMDA_L6NT_SupFS">
            <connectionWD id="0" preCellId="../CG3D_L6NonTuftRS/0/L6NonTuftedPyrRS" preSegmentId="99" preFractionAlong="0.0189342606237" postCellId="../CG3D_SupAxAx/0/SupAxAx" postSegmentId="13" postFractionAlong="0.00466079415402" weight="2.5" delay="0.05 ms"/>
            <connectionWD id="1" preCellId="../CG3D_L6NonTuftRS/2/L6NonTuftedPyrRS" preSegmentId="98" preFractionAlong="0.279051897405" postCellId="../CG3D_SupAxAx/0/SupAxAx" postSegmentId="61" postFractionAlong="0.697980858985" weight="2.5" delay="0.05 ms"/>
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        </projection>
        <projection id="Proj68syn1_CG3D_L6NonTuftRS_CG3D_SupAxAx" presynapticPopulation="CG3D_L6NonTuftRS" postsynapticPopulation="CG3D_SupAxAx" synapse="Syn_AMPA_L6NT_SupFS">
            <connectionWD id="0" preCellId="../CG3D_L6NonTuftRS/0/L6NonTuftedPyrRS" preSegmentId="99" preFractionAlong="0.0189342606237" postCellId="../CG3D_SupAxAx/0/SupAxAx" postSegmentId="13" postFractionAlong="0.00466079415402" weight="1." delay="0.05 ms"/>
            <connectionWD id="1" preCellId="../CG3D_L6NonTuftRS/2/L6NonTuftedPyrRS" preSegmentId="98" preFractionAlong="0.279051897405" postCellId="../CG3D_SupAxAx/0/SupAxAx" postSegmentId="61" postFractionAlong="0.697980858985" weight="1." delay="0.05 ms"/>
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        </projection>
        <projection id="Proj69syn0_CG3D_L6NonTuftRS_CG3D_L23PyrFRB" presynapticPopulation="CG3D_L6NonTuftRS" postsynapticPopulation="CG3D_L23PyrFRB" synapse="Syn_AMPA_L6NT_SupPyr">
            <connectionWD id="0" preCellId="../CG3D_L6NonTuftRS/2/L6NonTuftedPyrRS" preSegmentId="94" preFractionAlong="0.434188142296" postCellId="../CG3D_L23PyrFRB/0/L23PyrFRB_varInit" postSegmentId="85" postFractionAlong="0.353491238073" weight="1." delay="0.05 ms"/>
            <connectionWD id="1" preCellId="../CG3D_L6NonTuftRS/3/L6NonTuftedPyrRS" preSegmentId="98" preFractionAlong="0.502880988665" postCellId="../CG3D_L23PyrFRB/0/L23PyrFRB_varInit" postSegmentId="85" postFractionAlong="0.799124383187" weight="1." delay="0.05 ms"/>
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        </projection>
        <projection id="Proj69syn1_CG3D_L6NonTuftRS_CG3D_L23PyrFRB" presynapticPopulation="CG3D_L6NonTuftRS" postsynapticPopulation="CG3D_L23PyrFRB" synapse="Syn_NMDA_L6NT_SupPyr">
            <connectionWD id="0" preCellId="../CG3D_L6NonTuftRS/2/L6NonTuftedPyrRS" preSegmentId="94" preFractionAlong="0.434188142296" postCellId="../CG3D_L23PyrFRB/0/L23PyrFRB_varInit" postSegmentId="85" postFractionAlong="0.353491238073" weight="1." delay="0.05 ms"/>
            <connectionWD id="1" preCellId="../CG3D_L6NonTuftRS/3/L6NonTuftedPyrRS" preSegmentId="98" preFractionAlong="0.502880988665" postCellId="../CG3D_L23PyrFRB/0/L23PyrFRB_varInit" postSegmentId="85" postFractionAlong="0.799124383187" weight="1." delay="0.05 ms"/>
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        </projection>
        <projection id="Proj70syn0_CG3D_L6NonTuftRS_CG3D_SupLTS" presynapticPopulation="CG3D_L6NonTuftRS" postsynapticPopulation="CG3D_SupLTS" synapse="Syn_NMDA_L6NT_SupLTS">
            <connectionWD id="0" preCellId="../CG3D_L6NonTuftRS/3/L6NonTuftedPyrRS" preSegmentId="99" preFractionAlong="0.947800400653" postCellId="../CG3D_SupLTS/0/SupLTSInter" postSegmentId="90" postFractionAlong="0.743237396046" weight="2.5" delay="0.05 ms"/>
            <connectionWD id="1" preCellId="../CG3D_L6NonTuftRS/4/L6NonTuftedPyrRS" preSegmentId="99" preFractionAlong="0.805857132742" postCellId="../CG3D_SupLTS/0/SupLTSInter" postSegmentId="38" postFractionAlong="0.801021035975" weight="2.5" delay="0.05 ms"/>
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        </projection>
        <projection id="Proj70syn1_CG3D_L6NonTuftRS_CG3D_SupLTS" presynapticPopulation="CG3D_L6NonTuftRS" postsynapticPopulation="CG3D_SupLTS" synapse="Syn_AMPA_L6NT_SupLTS">
            <connectionWD id="0" preCellId="../CG3D_L6NonTuftRS/3/L6NonTuftedPyrRS" preSegmentId="99" preFractionAlong="0.947800400653" postCellId="../CG3D_SupLTS/0/SupLTSInter" postSegmentId="90" postFractionAlong="0.743237396046" weight="1." delay="0.05 ms"/>
            <connectionWD id="1" preCellId="../CG3D_L6NonTuftRS/4/L6NonTuftedPyrRS" preSegmentId="99" preFractionAlong="0.805857132742" postCellId="../CG3D_SupLTS/0/SupLTSInter" postSegmentId="38" postFractionAlong="0.801021035975" weight="1." delay="0.05 ms"/>
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        </projection>
        <projection id="Proj71syn0_CG3D_L6NonTuftRS_CG3D_SupBask" presynapticPopulation="CG3D_L6NonTuftRS" postsynapticPopulation="CG3D_SupBask" synapse="Syn_NMDA_L6NT_SupFS">
            <connectionWD id="0" preCellId="../CG3D_L6NonTuftRS/3/L6NonTuftedPyrRS" preSegmentId="98" preFractionAlong="0.274961324951" postCellId="../CG3D_SupBask/0/SupBasket" postSegmentId="64" postFractionAlong="0.153555319985" weight="2.5" delay="0.05 ms"/>
            <connectionWD id="1" preCellId="../CG3D_L6NonTuftRS/2/L6NonTuftedPyrRS" preSegmentId="94" preFractionAlong="0.262120798446" postCellId="../CG3D_SupBask/0/SupBasket" postSegmentId="95" postFractionAlong="0.77136128482" weight="2.5" delay="0.05 ms"/>
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        </projection>
        <projection id="Proj71syn1_CG3D_L6NonTuftRS_CG3D_SupBask" presynapticPopulation="CG3D_L6NonTuftRS" postsynapticPopulation="CG3D_SupBask" synapse="Syn_AMPA_L6NT_SupFS">
            <connectionWD id="0" preCellId="../CG3D_L6NonTuftRS/3/L6NonTuftedPyrRS" preSegmentId="98" preFractionAlong="0.274961324951" postCellId="../CG3D_SupBask/0/SupBasket" postSegmentId="64" postFractionAlong="0.153555319985" weight="1." delay="0.05 ms"/>
            <connectionWD id="1" preCellId="../CG3D_L6NonTuftRS/2/L6NonTuftedPyrRS" preSegmentId="94" preFractionAlong="0.262120798446" postCellId="../CG3D_SupBask/0/SupBasket" postSegmentId="95" postFractionAlong="0.77136128482" weight="1." delay="0.05 ms"/>
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        </projection>
        <projection id="Proj72syn0_CG3D_DeepBask_CG3D_DeepAxAx" presynapticPopulation="CG3D_DeepBask" postsynapticPopulation="CG3D_DeepAxAx" synapse="Syn_GABAA_DeepBask_DeepFS">
            <connectionWD id="0" preCellId="../CG3D_DeepBask/0/DeepBasket" preSegmentId="113" preFractionAlong="0.589719503217" postCellId="../CG3D_DeepAxAx/0/DeepAxAx" postSegmentId="66" postFractionAlong="0.684774700234" weight="0.05" delay="0.05 ms"/>
            <connectionWD id="1" preCellId="../CG3D_DeepBask/0/DeepBasket" preSegmentId="116" preFractionAlong="0.699390975118" postCellId="../CG3D_DeepAxAx/0/DeepAxAx" postSegmentId="19" postFractionAlong="0.357498537298" weight="0.05" delay="0.05 ms"/>
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        </projection>
        <projection id="Proj73syn0_CG3D_DeepBask_CG3D_DeepLTS" presynapticPopulation="CG3D_DeepBask" postsynapticPopulation="CG3D_DeepLTS" synapse="Syn_GABAA_DeepBask_DeepLTS">
            <connectionWD id="0" preCellId="../CG3D_DeepBask/0/DeepBasket" preSegmentId="117" preFractionAlong="0.561396307895" postCellId="../CG3D_DeepLTS/0/DeepLTSInter" postSegmentId="61" postFractionAlong="0.956169048102" weight="0.05" delay="0.05 ms"/>
            <connectionWD id="1" preCellId="../CG3D_DeepBask/0/DeepBasket" preSegmentId="112" preFractionAlong="0.496512486719" postCellId="../CG3D_DeepLTS/0/DeepLTSInter" postSegmentId="35" postFractionAlong="0.522035684598" weight="0.05" delay="0.05 ms"/>
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        </projection>
        <projection id="Proj74syn0_CG3D_DeepBask_CG3D_L4SpinStell" presynapticPopulation="CG3D_DeepBask" postsynapticPopulation="CG3D_L4SpinStell" synapse="Syn_GABAA_DeepFS_L4SS">
            <connectionWD id="0" preCellId="../CG3D_DeepBask/0/DeepBasket" preSegmentId="116" preFractionAlong="0.601082331627" postCellId="../CG3D_L4SpinStell/0/L4SpinyStellate" postSegmentId="28" postFractionAlong="0.444647580586" weight="0.05" delay="0.05 ms"/>
            <connectionWD id="1" preCellId="../CG3D_DeepBask/0/DeepBasket" preSegmentId="117" preFractionAlong="0.652419661626" postCellId="../CG3D_L4SpinStell/0/L4SpinyStellate" postFractionAlong="0.710944886879" weight="0.05" delay="0.05 ms"/>
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        </projection>
        <projection id="Proj75syn0_CG3D_DeepBask_CG3D_L5TuftIB" presynapticPopulation="CG3D_DeepBask" postsynapticPopulation="CG3D_L5TuftIB" synapse="Syn_GABAA_DeepBask_L5Pyr">
            <connectionWD id="0" preCellId="../CG3D_DeepBask/0/DeepBasket" preSegmentId="113" preFractionAlong="0.313870255247" postCellId="../CG3D_L5TuftIB/0/L5TuftedPyrIB" postSegmentId="68" postFractionAlong="0.945688581192" weight="0.05" delay="0.05 ms"/>
            <connectionWD id="1" preCellId="../CG3D_DeepBask/0/DeepBasket" preSegmentId="116" preFractionAlong="0.555022829506" postCellId="../CG3D_L5TuftIB/0/L5TuftedPyrIB" postSegmentId="68" postFractionAlong="0.779018333632" weight="0.05" delay="0.05 ms"/>
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        </projection>
        <projection id="Proj76syn0_CG3D_DeepBask_CG3D_L5TuftRS" presynapticPopulation="CG3D_DeepBask" postsynapticPopulation="CG3D_L5TuftRS" synapse="Syn_GABAA_DeepBask_L5Pyr">
            <connectionWD id="0" preCellId="../CG3D_DeepBask/0/DeepBasket" preSegmentId="112" preFractionAlong="0.494298566712" postCellId="../CG3D_L5TuftRS/0/L5TuftedPyrRS" postSegmentId="9" postFractionAlong="0.220825726386" weight="0.05" delay="0.05 ms"/>
            <connectionWD id="1" preCellId="../CG3D_DeepBask/0/DeepBasket" preSegmentId="112" preFractionAlong="0.977129038141" postCellId="../CG3D_L5TuftRS/0/L5TuftedPyrRS" postSegmentId="10" postFractionAlong="0.835693527135" weight="0.05" delay="0.05 ms"/>
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        </projection>
        <projection id="Proj77syn0_CG3D_DeepBask_CG3D_L6NonTuftRS" presynapticPopulation="CG3D_DeepBask" postsynapticPopulation="CG3D_L6NonTuftRS" synapse="Syn_GABAA_DeepBask_L6NT">
            <connectionWD id="0" preCellId="../CG3D_DeepBask/0/DeepBasket" preSegmentId="116" preFractionAlong="0.766450640534" postCellId="../CG3D_L6NonTuftRS/0/L6NonTuftedPyrRS" postSegmentId="6" postFractionAlong="0.965735946019" weight="0.05" delay="0.05 ms"/>
            <connectionWD id="1" preCellId="../CG3D_DeepBask/0/DeepBasket" preSegmentId="117" preFractionAlong="0.21682433421" postCellId="../CG3D_L6NonTuftRS/0/L6NonTuftedPyrRS" postSegmentId="11" postFractionAlong="0.145863281337" weight="0.05" delay="0.05 ms"/>
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        </projection>
        <projection id="Proj80syn0_CG3D_L23PyrRS_CG3D_DeepAxAx" presynapticPopulation="CG3D_L23PyrRS" postsynapticPopulation="CG3D_DeepAxAx" synapse="Syn_AMPA_SupPyr_DeepFS">
            <connectionWD id="0" preCellId="../CG3D_L23PyrRS/1/L23PyrRS" preSegmentId="143" preFractionAlong="0.856345552699" postCellId="../CG3D_DeepAxAx/0/DeepAxAx" postSegmentId="19" postFractionAlong="0.615108997934" weight="1." delay="0.05 ms"/>
            <connectionWD id="1" preCellId="../CG3D_L23PyrRS/3/L23PyrRS" preSegmentId="143" preFractionAlong="0.0378152669215" postCellId="../CG3D_DeepAxAx/0/DeepAxAx" postSegmentId="93" postFractionAlong="0.962526392333" weight="1." delay="0.05 ms"/>
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        </projection>
        <projection id="Proj80syn1_CG3D_L23PyrRS_CG3D_DeepAxAx" presynapticPopulation="CG3D_L23PyrRS" postsynapticPopulation="CG3D_DeepAxAx" synapse="Syn_NMDA_SupPyr_DeepFS">
            <connectionWD id="0" preCellId="../CG3D_L23PyrRS/1/L23PyrRS" preSegmentId="143" preFractionAlong="0.856345552699" postCellId="../CG3D_DeepAxAx/0/DeepAxAx" postSegmentId="19" postFractionAlong="0.615108997934" weight="2.5" delay="0.05 ms"/>
            <connectionWD id="1" preCellId="../CG3D_L23PyrRS/3/L23PyrRS" preSegmentId="143" preFractionAlong="0.0378152669215" postCellId="../CG3D_DeepAxAx/0/DeepAxAx" postSegmentId="93" postFractionAlong="0.962526392333" weight="2.5" delay="0.05 ms"/>
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        </projection>
        <projection id="Proj81syn0_CG3D_L23PyrRS_CG3D_DeepLTS" presynapticPopulation="CG3D_L23PyrRS" postsynapticPopulation="CG3D_DeepLTS" synapse="Syn_NMDA_RSPyr_DeepLTS">
            <connectionWD id="0" preCellId="../CG3D_L23PyrRS/8/L23PyrRS" preSegmentId="143" preFractionAlong="0.535924298037" postCellId="../CG3D_DeepLTS/0/DeepLTSInter" postSegmentId="17" postFractionAlong="0.47544381708" weight="2.5" delay="0.05 ms"/>
            <connectionWD id="1" preCellId="../CG3D_L23PyrRS/8/L23PyrRS" preSegmentId="147" preFractionAlong="0.890699790877" postCellId="../CG3D_DeepLTS/0/DeepLTSInter" postSegmentId="16" postFractionAlong="0.295566785306" weight="2.5" delay="0.05 ms"/>
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        </projection>
        <projection id="Proj81syn1_CG3D_L23PyrRS_CG3D_DeepLTS" presynapticPopulation="CG3D_L23PyrRS" postsynapticPopulation="CG3D_DeepLTS" synapse="Syn_AMPA_SupPyr_DeepLTS">
            <connectionWD id="0" preCellId="../CG3D_L23PyrRS/8/L23PyrRS" preSegmentId="143" preFractionAlong="0.535924298037" postCellId="../CG3D_DeepLTS/0/DeepLTSInter" postSegmentId="17" postFractionAlong="0.47544381708" weight="1." delay="0.05 ms"/>
            <connectionWD id="1" preCellId="../CG3D_L23PyrRS/8/L23PyrRS" preSegmentId="147" preFractionAlong="0.890699790877" postCellId="../CG3D_DeepLTS/0/DeepLTSInter" postSegmentId="16" postFractionAlong="0.295566785306" weight="1." delay="0.05 ms"/>
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        </projection>
        <projection id="Proj82syn0_CG3D_L23PyrRS_CG3D_L4SpinStell" presynapticPopulation="CG3D_L23PyrRS" postsynapticPopulation="CG3D_L4SpinStell" synapse="Syn_AMPA_SupPyr_L4SS">
            <connectionWD id="0" preCellId="../CG3D_L23PyrRS/9/L23PyrRS" preSegmentId="143" preFractionAlong="0.797813825525" postCellId="../CG3D_L4SpinStell/0/L4SpinyStellate" postSegmentId="13" postFractionAlong="0.942140142383" weight="1." delay="0.05 ms"/>
            <connectionWD id="1" preCellId="../CG3D_L23PyrRS/1/L23PyrRS" preSegmentId="146" preFractionAlong="0.0486543765847" postCellId="../CG3D_L4SpinStell/0/L4SpinyStellate" postSegmentId="38" postFractionAlong="0.686214735202" weight="1." delay="0.05 ms"/>
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        </projection>
        <projection id="Proj82syn1_CG3D_L23PyrRS_CG3D_L4SpinStell" presynapticPopulation="CG3D_L23PyrRS" postsynapticPopulation="CG3D_L4SpinStell" synapse="Syn_NMDA_SupPyr_L4SS">
            <connectionWD id="0" preCellId="../CG3D_L23PyrRS/9/L23PyrRS" preSegmentId="143" preFractionAlong="0.797813825525" postCellId="../CG3D_L4SpinStell/0/L4SpinyStellate" postSegmentId="13" postFractionAlong="0.942140142383" weight="1." delay="0.05 ms"/>
            <connectionWD id="1" preCellId="../CG3D_L23PyrRS/1/L23PyrRS" preSegmentId="146" preFractionAlong="0.0486543765847" postCellId="../CG3D_L4SpinStell/0/L4SpinyStellate" postSegmentId="38" postFractionAlong="0.686214735202" weight="1." delay="0.05 ms"/>
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        </projection>
        <projection id="Proj83syn0_CG3D_L23PyrRS_CG3D_L5TuftIB" presynapticPopulation="CG3D_L23PyrRS" postsynapticPopulation="CG3D_L5TuftIB" synapse="Syn_NMDA_SupPyr_L5Pyr">
            <connectionWD id="0" preCellId="../CG3D_L23PyrRS/4/L23PyrRS" preSegmentId="146" preFractionAlong="0.2494579495" postCellId="../CG3D_L5TuftIB/0/L5TuftedPyrIB" postSegmentId="77" postFractionAlong="0.307288820423" weight="1." delay="0.05 ms"/>
            <connectionWD id="1" preCellId="../CG3D_L23PyrRS/1/L23PyrRS" preSegmentId="143" preFractionAlong="0.984280986781" postCellId="../CG3D_L5TuftIB/0/L5TuftedPyrIB" postSegmentId="83" postFractionAlong="0.514627885196" weight="1." delay="0.05 ms"/>
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        </projection>
        <projection id="Proj83syn1_CG3D_L23PyrRS_CG3D_L5TuftIB" presynapticPopulation="CG3D_L23PyrRS" postsynapticPopulation="CG3D_L5TuftIB" synapse="Syn_AMPA_SupPyr_L5Pyr">
            <connectionWD id="0" preCellId="../CG3D_L23PyrRS/4/L23PyrRS" preSegmentId="146" preFractionAlong="0.2494579495" postCellId="../CG3D_L5TuftIB/0/L5TuftedPyrIB" postSegmentId="77" postFractionAlong="0.307288820423" weight="1." delay="0.05 ms"/>
            <connectionWD id="1" preCellId="../CG3D_L23PyrRS/1/L23PyrRS" preSegmentId="143" preFractionAlong="0.984280986781" postCellId="../CG3D_L5TuftIB/0/L5TuftedPyrIB" postSegmentId="83" postFractionAlong="0.514627885196" weight="1." delay="0.05 ms"/>
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        </projection>
        <projection id="Proj84syn0_CG3D_L23PyrRS_CG3D_L5TuftRS" presynapticPopulation="CG3D_L23PyrRS" postsynapticPopulation="CG3D_L5TuftRS" synapse="Syn_NMDA_SupPyr_L5Pyr">
            <connectionWD id="0" preCellId="../CG3D_L23PyrRS/8/L23PyrRS" preSegmentId="143" preFractionAlong="0.463223821303" postCellId="../CG3D_L5TuftRS/0/L5TuftedPyrRS" postSegmentId="77" postFractionAlong="0.681933541215" weight="1." delay="0.05 ms"/>
            <connectionWD id="1" preCellId="../CG3D_L23PyrRS/9/L23PyrRS" preSegmentId="147" preFractionAlong="0.458537775025" postCellId="../CG3D_L5TuftRS/0/L5TuftedPyrRS" postSegmentId="76" postFractionAlong="0.751064360055" weight="1." delay="0.05 ms"/>
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        </projection>
        <projection id="Proj84syn1_CG3D_L23PyrRS_CG3D_L5TuftRS" presynapticPopulation="CG3D_L23PyrRS" postsynapticPopulation="CG3D_L5TuftRS" synapse="Syn_AMPA_SupPyr_L5Pyr">
            <connectionWD id="0" preCellId="../CG3D_L23PyrRS/8/L23PyrRS" preSegmentId="143" preFractionAlong="0.463223821303" postCellId="../CG3D_L5TuftRS/0/L5TuftedPyrRS" postSegmentId="77" postFractionAlong="0.681933541215" weight="1." delay="0.05 ms"/>
            <connectionWD id="1" preCellId="../CG3D_L23PyrRS/9/L23PyrRS" preSegmentId="147" preFractionAlong="0.458537775025" postCellId="../CG3D_L5TuftRS/0/L5TuftedPyrRS" postSegmentId="76" postFractionAlong="0.751064360055" weight="1." delay="0.05 ms"/>
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        </projection>
        <projection id="Proj85syn0_CG3D_L23PyrRS_CG3D_L6NonTuftRS" presynapticPopulation="CG3D_L23PyrRS" postsynapticPopulation="CG3D_L6NonTuftRS" synapse="Syn_NMDA_SupPyr_L6NT">
            <connectionWD id="0" preCellId="../CG3D_L23PyrRS/4/L23PyrRS" preSegmentId="146" preFractionAlong="0.457738873412" postCellId="../CG3D_L6NonTuftRS/0/L6NonTuftedPyrRS" postSegmentId="82" postFractionAlong="0.155149296833" weight="1." delay="0.05 ms"/>
            <connectionWD id="1" preCellId="../CG3D_L23PyrRS/5/L23PyrRS" preSegmentId="147" preFractionAlong="0.575204531085" postCellId="../CG3D_L6NonTuftRS/0/L6NonTuftedPyrRS" postSegmentId="80" postFractionAlong="0.640779686285" weight="1." delay="0.05 ms"/>
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        </projection>
        <projection id="Proj85syn1_CG3D_L23PyrRS_CG3D_L6NonTuftRS" presynapticPopulation="CG3D_L23PyrRS" postsynapticPopulation="CG3D_L6NonTuftRS" synapse="Syn_AMPA_SupPyr_L6NT">
            <connectionWD id="0" preCellId="../CG3D_L23PyrRS/4/L23PyrRS" preSegmentId="146" preFractionAlong="0.457738873412" postCellId="../CG3D_L6NonTuftRS/0/L6NonTuftedPyrRS" postSegmentId="82" postFractionAlong="0.155149296833" weight="1." delay="0.05 ms"/>
            <connectionWD id="1" preCellId="../CG3D_L23PyrRS/5/L23PyrRS" preSegmentId="147" preFractionAlong="0.575204531085" postCellId="../CG3D_L6NonTuftRS/0/L6NonTuftedPyrRS" postSegmentId="80" postFractionAlong="0.640779686285" weight="1." delay="0.05 ms"/>
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        </projection>
        <projection id="Proj86syn0_CG3D_L23PyrRS_CG3D_DeepBask" presynapticPopulation="CG3D_L23PyrRS" postsynapticPopulation="CG3D_DeepBask" synapse="Syn_AMPA_SupPyr_DeepFS">
            <connectionWD id="0" preCellId="../CG3D_L23PyrRS/2/L23PyrRS" preSegmentId="146" preFractionAlong="0.499034658837" postCellId="../CG3D_DeepBask/0/DeepBasket" postSegmentId="38" postFractionAlong="0.860629842872" weight="1." delay="0.05 ms"/>
            <connectionWD id="1" preCellId="../CG3D_L23PyrRS/0/L23PyrRS" preSegmentId="147" preFractionAlong="0.0255515593741" postCellId="../CG3D_DeepBask/0/DeepBasket" postSegmentId="92" postFractionAlong="0.287571159061" weight="1." delay="0.05 ms"/>
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        </projection>
        <projection id="Proj86syn1_CG3D_L23PyrRS_CG3D_DeepBask" presynapticPopulation="CG3D_L23PyrRS" postsynapticPopulation="CG3D_DeepBask" synapse="Syn_NMDA_SupPyr_DeepFS">
            <connectionWD id="0" preCellId="../CG3D_L23PyrRS/2/L23PyrRS" preSegmentId="146" preFractionAlong="0.499034658837" postCellId="../CG3D_DeepBask/0/DeepBasket" postSegmentId="38" postFractionAlong="0.860629842872" weight="2.5" delay="0.05 ms"/>
            <connectionWD id="1" preCellId="../CG3D_L23PyrRS/0/L23PyrRS" preSegmentId="147" preFractionAlong="0.0255515593741" postCellId="../CG3D_DeepBask/0/DeepBasket" postSegmentId="92" postFractionAlong="0.287571159061" weight="2.5" delay="0.05 ms"/>
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        </projection>
        <projection id="Proj87syn0_CG3D_L23PyrRS_CG3D_L23PyrRS" presynapticPopulation="CG3D_L23PyrRS" postsynapticPopulation="CG3D_L23PyrRS" synapse="Syn_AMPA_SupPyr_SupPyr">
            <connectionWD id="0" preCellId="../CG3D_L23PyrRS/5/L23PyrRS" preSegmentId="147" preFractionAlong="0.287798361374" postCellId="../CG3D_L23PyrRS/0/L23PyrRS" postSegmentId="70" postFractionAlong="0.907294269288" weight="1." delay="0.05 ms"/>
            <connectionWD id="1" preCellId="../CG3D_L23PyrRS/3/L23PyrRS" preSegmentId="142" preFractionAlong="0.911188712894" postCellId="../CG3D_L23PyrRS/0/L23PyrRS" postSegmentId="40" postFractionAlong="0.759070309968" weight="1." delay="0.05 ms"/>
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        </projection>
        <projection id="Proj87syn1_CG3D_L23PyrRS_CG3D_L23PyrRS" presynapticPopulation="CG3D_L23PyrRS" postsynapticPopulation="CG3D_L23PyrRS" synapse="Syn_NMDA_SupPyr_SupPyr">
            <connectionWD id="0" preCellId="../CG3D_L23PyrRS/5/L23PyrRS" preSegmentId="147" preFractionAlong="0.287798361374" postCellId="../CG3D_L23PyrRS/0/L23PyrRS" postSegmentId="70" postFractionAlong="0.907294269288" weight="1." delay="0.05 ms"/>
            <connectionWD id="1" preCellId="../CG3D_L23PyrRS/3/L23PyrRS" preSegmentId="142" preFractionAlong="0.911188712894" postCellId="../CG3D_L23PyrRS/0/L23PyrRS" postSegmentId="40" postFractionAlong="0.759070309968" weight="1." delay="0.05 ms"/>
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        </projection>
        <projection id="Proj89syn0_CG3D_L23PyrRS_CG3D_SupAxAx" presynapticPopulation="CG3D_L23PyrRS" postsynapticPopulation="CG3D_SupAxAx" synapse="Syn_NMDA_RSPyr_SupFS">
            <connectionWD id="0" preCellId="../CG3D_L23PyrRS/2/L23PyrRS" preSegmentId="146" preFractionAlong="0.713175786755" postCellId="../CG3D_SupAxAx/0/SupAxAx" postSegmentId="13" postFractionAlong="0.291081835373" weight="2.5" delay="0.05 ms"/>
            <connectionWD id="1" preCellId="../CG3D_L23PyrRS/5/L23PyrRS" preSegmentId="142" preFractionAlong="0.987199364806" postCellId="../CG3D_SupAxAx/0/SupAxAx" postSegmentId="16" postFractionAlong="0.620957152476" weight="2.5" delay="0.05 ms"/>
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        </projection>
        <projection id="Proj89syn1_CG3D_L23PyrRS_CG3D_SupAxAx" presynapticPopulation="CG3D_L23PyrRS" postsynapticPopulation="CG3D_SupAxAx" synapse="Syn_AMPA_SupPyr_SupFS">
            <connectionWD id="0" preCellId="../CG3D_L23PyrRS/2/L23PyrRS" preSegmentId="146" preFractionAlong="0.713175786755" postCellId="../CG3D_SupAxAx/0/SupAxAx" postSegmentId="13" postFractionAlong="0.291081835373" weight="1." delay="0.05 ms"/>
            <connectionWD id="1" preCellId="../CG3D_L23PyrRS/5/L23PyrRS" preSegmentId="142" preFractionAlong="0.987199364806" postCellId="../CG3D_SupAxAx/0/SupAxAx" postSegmentId="16" postFractionAlong="0.620957152476" weight="1." delay="0.05 ms"/>
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        </projection>
        <projection id="Proj90syn0_CG3D_L23PyrRS_CG3D_L23PyrFRB" presynapticPopulation="CG3D_L23PyrRS" postsynapticPopulation="CG3D_L23PyrFRB" synapse="Syn_AMPA_SupPyr_SupPyr">
            <connectionWD id="0" preCellId="../CG3D_L23PyrRS/9/L23PyrRS" preSegmentId="147" preFractionAlong="0.113925150815" postCellId="../CG3D_L23PyrFRB/0/L23PyrFRB_varInit" postSegmentId="59" postFractionAlong="0.964958417491" weight="1." delay="0.05 ms"/>
            <connectionWD id="1" preCellId="../CG3D_L23PyrRS/5/L23PyrRS" preSegmentId="147" preFractionAlong="0.15989149849" postCellId="../CG3D_L23PyrFRB/0/L23PyrFRB_varInit" postSegmentId="66" postFractionAlong="0.672940196269" weight="1." delay="0.05 ms"/>
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        </projection>
        <projection id="Proj90syn1_CG3D_L23PyrRS_CG3D_L23PyrFRB" presynapticPopulation="CG3D_L23PyrRS" postsynapticPopulation="CG3D_L23PyrFRB" synapse="Syn_NMDA_SupPyr_SupPyr">
            <connectionWD id="0" preCellId="../CG3D_L23PyrRS/9/L23PyrRS" preSegmentId="147" preFractionAlong="0.113925150815" postCellId="../CG3D_L23PyrFRB/0/L23PyrFRB_varInit" postSegmentId="59" postFractionAlong="0.964958417491" weight="1." delay="0.05 ms"/>
            <connectionWD id="1" preCellId="../CG3D_L23PyrRS/5/L23PyrRS" preSegmentId="147" preFractionAlong="0.15989149849" postCellId="../CG3D_L23PyrFRB/0/L23PyrFRB_varInit" postSegmentId="66" postFractionAlong="0.672940196269" weight="1." delay="0.05 ms"/>
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        </projection>
        <projection id="Proj92syn0_CG3D_L23PyrRS_CG3D_SupLTS" presynapticPopulation="CG3D_L23PyrRS" postsynapticPopulation="CG3D_SupLTS" synapse="Syn_NMDA_RSPyr_SupLTS">
            <connectionWD id="0" preCellId="../CG3D_L23PyrRS/2/L23PyrRS" preSegmentId="146" preFractionAlong="0.195487564666" postCellId="../CG3D_SupLTS/0/SupLTSInter" postSegmentId="91" postFractionAlong="0.246256951005" weight="2.5" delay="0.05 ms"/>
            <connectionWD id="1" preCellId="../CG3D_L23PyrRS/6/L23PyrRS" preSegmentId="143" preFractionAlong="0.234875446287" postCellId="../CG3D_SupLTS/0/SupLTSInter" postSegmentId="95" postFractionAlong="0.306436229977" weight="2.5" delay="0.05 ms"/>
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        </projection>
        <projection id="Proj92syn1_CG3D_L23PyrRS_CG3D_SupLTS" presynapticPopulation="CG3D_L23PyrRS" postsynapticPopulation="CG3D_SupLTS" synapse="Syn_AMPA_SupPyr_SupLTS">
            <connectionWD id="0" preCellId="../CG3D_L23PyrRS/2/L23PyrRS" preSegmentId="146" preFractionAlong="0.195487564666" postCellId="../CG3D_SupLTS/0/SupLTSInter" postSegmentId="91" postFractionAlong="0.246256951005" weight="1." delay="0.05 ms"/>
            <connectionWD id="1" preCellId="../CG3D_L23PyrRS/6/L23PyrRS" preSegmentId="143" preFractionAlong="0.234875446287" postCellId="../CG3D_SupLTS/0/SupLTSInter" postSegmentId="95" postFractionAlong="0.306436229977" weight="1." delay="0.05 ms"/>
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        </projection>
        <projection id="Proj93syn0_CG3D_L23PyrRS_CG3D_SupBask" presynapticPopulation="CG3D_L23PyrRS" postsynapticPopulation="CG3D_SupBask" synapse="Syn_NMDA_RSPyr_SupFS">
            <connectionWD id="0" preCellId="../CG3D_L23PyrRS/1/L23PyrRS" preSegmentId="146" preFractionAlong="0.784850418284" postCellId="../CG3D_SupBask/0/SupBasket" postSegmentId="96" postFractionAlong="0.581518119695" weight="2.5" delay="0.05 ms"/>
            <connectionWD id="1" preCellId="../CG3D_L23PyrRS/7/L23PyrRS" preSegmentId="142" preFractionAlong="0.393470907396" postCellId="../CG3D_SupBask/0/SupBasket" postSegmentId="11" postFractionAlong="0.535823857655" weight="2.5" delay="0.05 ms"/>
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        </projection>
        <projection id="Proj93syn1_CG3D_L23PyrRS_CG3D_SupBask" presynapticPopulation="CG3D_L23PyrRS" postsynapticPopulation="CG3D_SupBask" synapse="Syn_AMPA_SupPyr_SupFS">
            <connectionWD id="0" preCellId="../CG3D_L23PyrRS/1/L23PyrRS" preSegmentId="146" preFractionAlong="0.784850418284" postCellId="../CG3D_SupBask/0/SupBasket" postSegmentId="96" postFractionAlong="0.581518119695" weight="1." delay="0.05 ms"/>
            <connectionWD id="1" preCellId="../CG3D_L23PyrRS/7/L23PyrRS" preSegmentId="142" preFractionAlong="0.393470907396" postCellId="../CG3D_SupBask/0/SupBasket" postSegmentId="11" postFractionAlong="0.535823857655" weight="1." delay="0.05 ms"/>
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        </projection>
        <projection id="Proj94syn0_CG3D_SupAxAx_CG3D_L4SpinStell" presynapticPopulation="CG3D_SupAxAx" postsynapticPopulation="CG3D_L4SpinStell" synapse="Syn_GABAA_SupAxAx_L4SS">
            <connectionWD id="0" preCellId="../CG3D_SupAxAx/0/SupAxAx" preSegmentId="116" preFractionAlong="0.904957903421" postCellId="../CG3D_L4SpinStell/0/L4SpinyStellate" postSegmentId="106" postFractionAlong="0.0869612967321" weight="0.05" delay="0.05 ms"/>
            <connectionWD id="1" preCellId="../CG3D_SupAxAx/0/SupAxAx" preSegmentId="113" preFractionAlong="0.538898490453" postCellId="../CG3D_L4SpinStell/0/L4SpinyStellate" postSegmentId="107" postFractionAlong="0.137624957044" weight="0.05" delay="0.05 ms"/>
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        </projection>
        <projection id="Proj95syn0_CG3D_SupAxAx_CG3D_L5TuftIB" presynapticPopulation="CG3D_SupAxAx" postsynapticPopulation="CG3D_L5TuftIB" synapse="Syn_GABAA_SupAxAx_DeepPyr">
            <connectionWD id="0" preCellId="../CG3D_SupAxAx/0/SupAxAx" preSegmentId="112" preFractionAlong="0.73251629864" postCellId="../CG3D_L5TuftIB/0/L5TuftedPyrIB" postSegmentId="111" postFractionAlong="0.649906668036" weight="0.05" delay="0.05 ms"/>
            <connectionWD id="1" preCellId="../CG3D_SupAxAx/0/SupAxAx" preSegmentId="112" preFractionAlong="0.868656489473" postCellId="../CG3D_L5TuftIB/0/L5TuftedPyrIB" postSegmentId="111" postFractionAlong="0.275396288731" weight="0.05" delay="0.05 ms"/>
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        </projection>
        <projection id="Proj96syn0_CG3D_SupAxAx_CG3D_L5TuftRS" presynapticPopulation="CG3D_SupAxAx" postsynapticPopulation="CG3D_L5TuftRS" synapse="Syn_GABAA_SupAxAx_DeepPyr">
            <connectionWD id="0" preCellId="../CG3D_SupAxAx/0/SupAxAx" preSegmentId="117" preFractionAlong="0.207507573465" postCellId="../CG3D_L5TuftRS/0/L5TuftedPyrRS" postSegmentId="111" postFractionAlong="0.582033673864" weight="0.05" delay="0.05 ms"/>
            <connectionWD id="1" preCellId="../CG3D_SupAxAx/0/SupAxAx" preSegmentId="113" preFractionAlong="0.25235684695" postCellId="../CG3D_L5TuftRS/0/L5TuftedPyrRS" postSegmentId="111" postFractionAlong="0.594407699388" weight="0.05" delay="0.05 ms"/>
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        </projection>
        <projection id="Proj97syn0_CG3D_SupAxAx_CG3D_L6NonTuftRS" presynapticPopulation="CG3D_SupAxAx" postsynapticPopulation="CG3D_L6NonTuftRS" synapse="Syn_GABAA_SupAxAx_DeepPyr">
            <connectionWD id="0" preCellId="../CG3D_SupAxAx/0/SupAxAx" preSegmentId="116" preFractionAlong="0.978760697328" postCellId="../CG3D_L6NonTuftRS/0/L6NonTuftedPyrRS" postSegmentId="89" postFractionAlong="0.623227711713" weight="0.05" delay="0.05 ms"/>
            <connectionWD id="1" preCellId="../CG3D_SupAxAx/0/SupAxAx" preSegmentId="116" preFractionAlong="0.264200181565" postCellId="../CG3D_L6NonTuftRS/0/L6NonTuftedPyrRS" postSegmentId="89" postFractionAlong="0.104037438841" weight="0.05" delay="0.05 ms"/>
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        </projection>
        <projection id="Proj98syn0_CG3D_SupAxAx_CG3D_L23PyrRS" presynapticPopulation="CG3D_SupAxAx" postsynapticPopulation="CG3D_L23PyrRS" synapse="Syn_GABAA_SupAxAx_SupPyr">
            <connectionWD id="0" preCellId="../CG3D_SupAxAx/0/SupAxAx" preSegmentId="116" preFractionAlong="0.0667668931308" postCellId="../CG3D_L23PyrRS/0/L23PyrRS" postSegmentId="137" postFractionAlong="0.143909444246" weight="0.05" delay="0.05 ms"/>
            <connectionWD id="1" preCellId="../CG3D_SupAxAx/0/SupAxAx" preSegmentId="112" preFractionAlong="0.265632116045" postCellId="../CG3D_L23PyrRS/0/L23PyrRS" postSegmentId="137" postFractionAlong="0.776232027287" weight="0.05" delay="0.05 ms"/>
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        </projection>
        <projection id="Proj99syn0_CG3D_SupAxAx_CG3D_L23PyrFRB" presynapticPopulation="CG3D_SupAxAx" postsynapticPopulation="CG3D_L23PyrFRB" synapse="Syn_GABAA_SupAxAx_SupPyr">
            <connectionWD id="0" preCellId="../CG3D_SupAxAx/0/SupAxAx" preSegmentId="113" preFractionAlong="0.700606081944" postCellId="../CG3D_L23PyrFRB/0/L23PyrFRB_varInit" postSegmentId="136" postFractionAlong="0.278343919938" weight="0.05" delay="0.05 ms"/>
            <connectionWD id="1" preCellId="../CG3D_SupAxAx/0/SupAxAx" preSegmentId="117" preFractionAlong="0.609578303765" postCellId="../CG3D_L23PyrFRB/0/L23PyrFRB_varInit" postSegmentId="137" postFractionAlong="0.0563948123533" weight="0.05" delay="0.05 ms"/>
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        </projection>
        <projection id="Proj100syn0_CG3D_L23PyrFRB_CG3D_DeepAxAx" presynapticPopulation="CG3D_L23PyrFRB" postsynapticPopulation="CG3D_DeepAxAx" synapse="Syn_AMPA_SupPyr_DeepFS">
            <connectionWD id="0" preCellId="../CG3D_L23PyrFRB/0/L23PyrFRB_varInit" preSegmentId="142" preFractionAlong="0.32705925694" postCellId="../CG3D_DeepAxAx/0/DeepAxAx" postSegmentId="69" postFractionAlong="0.591398201624" weight="1." delay="0.05 ms"/>
            <connectionWD id="1" preCellId="../CG3D_L23PyrFRB/0/L23PyrFRB_varInit" preSegmentId="146" preFractionAlong="0.148902776782" postCellId="../CG3D_DeepAxAx/0/DeepAxAx" postSegmentId="16" postFractionAlong="0.778914131199" weight="1." delay="0.05 ms"/>
            <connectionWD id="2" preCellId="../CG3D_L23PyrFRB/0/L23PyrFRB_varInit" preSegmentId="147" preFractionAlong="0.508063897329" postCellId="../CG3D_DeepAxAx/0/DeepAxAx" postSegmentId="97" postFractionAlong="0.508259464853" weight="1." delay="0.05 ms"/>
        </projection>
        <projection id="Proj100syn1_CG3D_L23PyrFRB_CG3D_DeepAxAx" presynapticPopulation="CG3D_L23PyrFRB" postsynapticPopulation="CG3D_DeepAxAx" synapse="Syn_NMDA_SupPyr_DeepFS">
            <connectionWD id="0" preCellId="../CG3D_L23PyrFRB/0/L23PyrFRB_varInit" preSegmentId="142" preFractionAlong="0.32705925694" postCellId="../CG3D_DeepAxAx/0/DeepAxAx" postSegmentId="69" postFractionAlong="0.591398201624" weight="2.5" delay="0.05 ms"/>
            <connectionWD id="1" preCellId="../CG3D_L23PyrFRB/0/L23PyrFRB_varInit" preSegmentId="146" preFractionAlong="0.148902776782" postCellId="../CG3D_DeepAxAx/0/DeepAxAx" postSegmentId="16" postFractionAlong="0.778914131199" weight="2.5" delay="0.05 ms"/>
            <connectionWD id="2" preCellId="../CG3D_L23PyrFRB/0/L23PyrFRB_varInit" preSegmentId="147" preFractionAlong="0.508063897329" postCellId="../CG3D_DeepAxAx/0/DeepAxAx" postSegmentId="97" postFractionAlong="0.508259464853" weight="2.5" delay="0.05 ms"/>
        </projection>
        <projection id="Proj101syn0_CG3D_L23PyrFRB_CG3D_DeepLTS" presynapticPopulation="CG3D_L23PyrFRB" postsynapticPopulation="CG3D_DeepLTS" synapse="Syn_NMDA_FRBPyr_DeepLTS">
            <connectionWD id="0" preCellId="../CG3D_L23PyrFRB/0/L23PyrFRB_varInit" preSegmentId="143" preFractionAlong="0.501573470377" postCellId="../CG3D_DeepLTS/0/DeepLTSInter" postSegmentId="36" postFractionAlong="0.392427614857" weight="2.5" delay="0.05 ms"/>
            <connectionWD id="1" preCellId="../CG3D_L23PyrFRB/0/L23PyrFRB_varInit" preSegmentId="147" preFractionAlong="0.360140064497" postCellId="../CG3D_DeepLTS/0/DeepLTSInter" postSegmentId="9" postFractionAlong="0.210435838718" weight="2.5" delay="0.05 ms"/>
            <connectionWD id="2" preCellId="../CG3D_L23PyrFRB/0/L23PyrFRB_varInit" preSegmentId="146" preFractionAlong="0.103207639272" postCellId="../CG3D_DeepLTS/0/DeepLTSInter" postSegmentId="17" postFractionAlong="0.0389317754488" weight="2.5" delay="0.05 ms"/>
        </projection>
        <projection id="Proj101syn1_CG3D_L23PyrFRB_CG3D_DeepLTS" presynapticPopulation="CG3D_L23PyrFRB" postsynapticPopulation="CG3D_DeepLTS" synapse="Syn_AMPA_SupPyr_DeepLTS">
            <connectionWD id="0" preCellId="../CG3D_L23PyrFRB/0/L23PyrFRB_varInit" preSegmentId="143" preFractionAlong="0.501573470377" postCellId="../CG3D_DeepLTS/0/DeepLTSInter" postSegmentId="36" postFractionAlong="0.392427614857" weight="1." delay="0.05 ms"/>
            <connectionWD id="1" preCellId="../CG3D_L23PyrFRB/0/L23PyrFRB_varInit" preSegmentId="147" preFractionAlong="0.360140064497" postCellId="../CG3D_DeepLTS/0/DeepLTSInter" postSegmentId="9" postFractionAlong="0.210435838718" weight="1." delay="0.05 ms"/>
            <connectionWD id="2" preCellId="../CG3D_L23PyrFRB/0/L23PyrFRB_varInit" preSegmentId="146" preFractionAlong="0.103207639272" postCellId="../CG3D_DeepLTS/0/DeepLTSInter" postSegmentId="17" postFractionAlong="0.0389317754488" weight="1." delay="0.05 ms"/>
        </projection>
        <projection id="Proj102syn0_CG3D_L23PyrFRB_CG3D_L4SpinStell" presynapticPopulation="CG3D_L23PyrFRB" postsynapticPopulation="CG3D_L4SpinStell" synapse="Syn_AMPA_SupPyr_L4SS">
            <connectionWD id="0" preCellId="../CG3D_L23PyrFRB/0/L23PyrFRB_varInit" preSegmentId="142" preFractionAlong="0.545717379506" postCellId="../CG3D_L4SpinStell/0/L4SpinyStellate" postSegmentId="88" postFractionAlong="0.542940026294" weight="1." delay="0.05 ms"/>
            <connectionWD id="1" preCellId="../CG3D_L23PyrFRB/0/L23PyrFRB_varInit" preSegmentId="146" preFractionAlong="0.644887789867" postCellId="../CG3D_L4SpinStell/1/L4SpinyStellate" postSegmentId="19" postFractionAlong="0.283572448064" weight="1." delay="0.05 ms"/>
        </projection>
        <projection id="Proj102syn1_CG3D_L23PyrFRB_CG3D_L4SpinStell" presynapticPopulation="CG3D_L23PyrFRB" postsynapticPopulation="CG3D_L4SpinStell" synapse="Syn_NMDA_SupPyr_L4SS">
            <connectionWD id="0" preCellId="../CG3D_L23PyrFRB/0/L23PyrFRB_varInit" preSegmentId="142" preFractionAlong="0.545717379506" postCellId="../CG3D_L4SpinStell/0/L4SpinyStellate" postSegmentId="88" postFractionAlong="0.542940026294" weight="1." delay="0.05 ms"/>
            <connectionWD id="1" preCellId="../CG3D_L23PyrFRB/0/L23PyrFRB_varInit" preSegmentId="146" preFractionAlong="0.644887789867" postCellId="../CG3D_L4SpinStell/1/L4SpinyStellate" postSegmentId="19" postFractionAlong="0.283572448064" weight="1." delay="0.05 ms"/>
        </projection>
        <projection id="Proj103syn0_CG3D_L23PyrFRB_CG3D_L5TuftIB" presynapticPopulation="CG3D_L23PyrFRB" postsynapticPopulation="CG3D_L5TuftIB" synapse="Syn_NMDA_SupPyr_L5Pyr">
            <connectionWD id="0" preCellId="../CG3D_L23PyrFRB/0/L23PyrFRB_varInit" preSegmentId="147" preFractionAlong="0.530101787716" postCellId="../CG3D_L5TuftIB/0/L5TuftedPyrIB" postSegmentId="86" postFractionAlong="0.716863317046" weight="1." delay="0.05 ms"/>
            <connectionWD id="1" preCellId="../CG3D_L23PyrFRB/0/L23PyrFRB_varInit" preSegmentId="146" preFractionAlong="0.163132126689" postCellId="../CG3D_L5TuftIB/0/L5TuftedPyrIB" postSegmentId="82" postFractionAlong="0.893083541909" weight="1." delay="0.05 ms"/>
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        </projection>
        <projection id="Proj103syn1_CG3D_L23PyrFRB_CG3D_L5TuftIB" presynapticPopulation="CG3D_L23PyrFRB" postsynapticPopulation="CG3D_L5TuftIB" synapse="Syn_AMPA_SupPyr_L5Pyr">
            <connectionWD id="0" preCellId="../CG3D_L23PyrFRB/0/L23PyrFRB_varInit" preSegmentId="147" preFractionAlong="0.530101787716" postCellId="../CG3D_L5TuftIB/0/L5TuftedPyrIB" postSegmentId="86" postFractionAlong="0.716863317046" weight="1." delay="0.05 ms"/>
            <connectionWD id="1" preCellId="../CG3D_L23PyrFRB/0/L23PyrFRB_varInit" preSegmentId="146" preFractionAlong="0.163132126689" postCellId="../CG3D_L5TuftIB/0/L5TuftedPyrIB" postSegmentId="82" postFractionAlong="0.893083541909" weight="1." delay="0.05 ms"/>
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        </projection>
        <projection id="Proj104syn0_CG3D_L23PyrFRB_CG3D_L5TuftRS" presynapticPopulation="CG3D_L23PyrFRB" postsynapticPopulation="CG3D_L5TuftRS" synapse="Syn_NMDA_SupPyr_L5Pyr">
            <connectionWD id="0" preCellId="../CG3D_L23PyrFRB/0/L23PyrFRB_varInit" preSegmentId="143" preFractionAlong="0.456027499567" postCellId="../CG3D_L5TuftRS/0/L5TuftedPyrRS" postSegmentId="91" postFractionAlong="0.860486492429" weight="1." delay="0.05 ms"/>
            <connectionWD id="1" preCellId="../CG3D_L23PyrFRB/0/L23PyrFRB_varInit" preSegmentId="147" preFractionAlong="0.569622331269" postCellId="../CG3D_L5TuftRS/0/L5TuftedPyrRS" postSegmentId="89" postFractionAlong="0.549759277047" weight="1." delay="0.05 ms"/>
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        </projection>
        <projection id="Proj104syn1_CG3D_L23PyrFRB_CG3D_L5TuftRS" presynapticPopulation="CG3D_L23PyrFRB" postsynapticPopulation="CG3D_L5TuftRS" synapse="Syn_AMPA_SupPyr_L5Pyr">
            <connectionWD id="0" preCellId="../CG3D_L23PyrFRB/0/L23PyrFRB_varInit" preSegmentId="143" preFractionAlong="0.456027499567" postCellId="../CG3D_L5TuftRS/0/L5TuftedPyrRS" postSegmentId="91" postFractionAlong="0.860486492429" weight="1." delay="0.05 ms"/>
            <connectionWD id="1" preCellId="../CG3D_L23PyrFRB/0/L23PyrFRB_varInit" preSegmentId="147" preFractionAlong="0.569622331269" postCellId="../CG3D_L5TuftRS/0/L5TuftedPyrRS" postSegmentId="89" postFractionAlong="0.549759277047" weight="1." delay="0.05 ms"/>
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        </projection>
        <projection id="Proj105syn0_CG3D_L23PyrFRB_CG3D_L6NonTuftRS" presynapticPopulation="CG3D_L23PyrFRB" postsynapticPopulation="CG3D_L6NonTuftRS" synapse="Syn_NMDA_SupPyr_L6NT">
            <connectionWD id="0" preCellId="../CG3D_L23PyrFRB/0/L23PyrFRB_varInit" preSegmentId="146" preFractionAlong="0.966507934516" postCellId="../CG3D_L6NonTuftRS/0/L6NonTuftedPyrRS" postSegmentId="85" postFractionAlong="0.496858268508" weight="1." delay="0.05 ms"/>
            <connectionWD id="1" preCellId="../CG3D_L23PyrFRB/0/L23PyrFRB_varInit" preSegmentId="147" preFractionAlong="0.565695878556" postCellId="../CG3D_L6NonTuftRS/1/L6NonTuftedPyrRS" postSegmentId="86" postFractionAlong="0.957939975328" weight="1." delay="0.05 ms"/>
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        </projection>
        <projection id="Proj105syn1_CG3D_L23PyrFRB_CG3D_L6NonTuftRS" presynapticPopulation="CG3D_L23PyrFRB" postsynapticPopulation="CG3D_L6NonTuftRS" synapse="Syn_AMPA_SupPyr_L6NT">
            <connectionWD id="0" preCellId="../CG3D_L23PyrFRB/0/L23PyrFRB_varInit" preSegmentId="146" preFractionAlong="0.966507934516" postCellId="../CG3D_L6NonTuftRS/0/L6NonTuftedPyrRS" postSegmentId="85" postFractionAlong="0.496858268508" weight="1." delay="0.05 ms"/>
            <connectionWD id="1" preCellId="../CG3D_L23PyrFRB/0/L23PyrFRB_varInit" preSegmentId="147" preFractionAlong="0.565695878556" postCellId="../CG3D_L6NonTuftRS/1/L6NonTuftedPyrRS" postSegmentId="86" postFractionAlong="0.957939975328" weight="1." delay="0.05 ms"/>
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        </projection>
        <projection id="Proj106syn0_CG3D_L23PyrFRB_CG3D_DeepBask" presynapticPopulation="CG3D_L23PyrFRB" postsynapticPopulation="CG3D_DeepBask" synapse="Syn_AMPA_SupPyr_DeepFS">
            <connectionWD id="0" preCellId="../CG3D_L23PyrFRB/0/L23PyrFRB_varInit" preSegmentId="147" preFractionAlong="0.136301173755" postCellId="../CG3D_DeepBask/0/DeepBasket" postSegmentId="97" postFractionAlong="0.292746542127" weight="1." delay="0.05 ms"/>
            <connectionWD id="1" preCellId="../CG3D_L23PyrFRB/0/L23PyrFRB_varInit" preSegmentId="146" preFractionAlong="0.114759574661" postCellId="../CG3D_DeepBask/0/DeepBasket" postSegmentId="96" postFractionAlong="0.279977306996" weight="1." delay="0.05 ms"/>
            <connectionWD id="2" preCellId="../CG3D_L23PyrFRB/0/L23PyrFRB_varInit" preSegmentId="142" preFractionAlong="0.0656947425746" postCellId="../CG3D_DeepBask/0/DeepBasket" postSegmentId="60" postFractionAlong="0.586312911604" weight="1." delay="0.05 ms"/>
        </projection>
        <projection id="Proj106syn1_CG3D_L23PyrFRB_CG3D_DeepBask" presynapticPopulation="CG3D_L23PyrFRB" postsynapticPopulation="CG3D_DeepBask" synapse="Syn_NMDA_SupPyr_DeepFS">
            <connectionWD id="0" preCellId="../CG3D_L23PyrFRB/0/L23PyrFRB_varInit" preSegmentId="147" preFractionAlong="0.136301173755" postCellId="../CG3D_DeepBask/0/DeepBasket" postSegmentId="97" postFractionAlong="0.292746542127" weight="2.5" delay="0.05 ms"/>
            <connectionWD id="1" preCellId="../CG3D_L23PyrFRB/0/L23PyrFRB_varInit" preSegmentId="146" preFractionAlong="0.114759574661" postCellId="../CG3D_DeepBask/0/DeepBasket" postSegmentId="96" postFractionAlong="0.279977306996" weight="2.5" delay="0.05 ms"/>
            <connectionWD id="2" preCellId="../CG3D_L23PyrFRB/0/L23PyrFRB_varInit" preSegmentId="142" preFractionAlong="0.0656947425746" postCellId="../CG3D_DeepBask/0/DeepBasket" postSegmentId="60" postFractionAlong="0.586312911604" weight="2.5" delay="0.05 ms"/>
        </projection>
        <projection id="Proj107syn0_CG3D_L23PyrFRB_CG3D_L23PyrRS" presynapticPopulation="CG3D_L23PyrFRB" postsynapticPopulation="CG3D_L23PyrRS" synapse="Syn_AMPA_SupPyr_SupPyr">
            <connectionWD id="0" preCellId="../CG3D_L23PyrFRB/0/L23PyrFRB_varInit" preSegmentId="146" preFractionAlong="0.671458807525" postCellId="../CG3D_L23PyrRS/0/L23PyrRS" postSegmentId="15" postFractionAlong="0.312167718129" weight="1." delay="0.05 ms"/>
            <connectionWD id="1" preCellId="../CG3D_L23PyrFRB/0/L23PyrFRB_varInit" preSegmentId="143" preFractionAlong="0.620841555848" postCellId="../CG3D_L23PyrRS/0/L23PyrRS" postSegmentId="9" postFractionAlong="0.837582815909" weight="1." delay="0.05 ms"/>
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        </projection>
        <projection id="Proj107syn1_CG3D_L23PyrFRB_CG3D_L23PyrRS" presynapticPopulation="CG3D_L23PyrFRB" postsynapticPopulation="CG3D_L23PyrRS" synapse="Syn_NMDA_SupPyr_SupPyr">
            <connectionWD id="0" preCellId="../CG3D_L23PyrFRB/0/L23PyrFRB_varInit" preSegmentId="146" preFractionAlong="0.671458807525" postCellId="../CG3D_L23PyrRS/0/L23PyrRS" postSegmentId="15" postFractionAlong="0.312167718129" weight="1." delay="0.05 ms"/>
            <connectionWD id="1" preCellId="../CG3D_L23PyrFRB/0/L23PyrFRB_varInit" preSegmentId="143" preFractionAlong="0.620841555848" postCellId="../CG3D_L23PyrRS/0/L23PyrRS" postSegmentId="9" postFractionAlong="0.837582815909" weight="1." delay="0.05 ms"/>
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        </projection>
        <projection id="Proj108syn0_CG3D_L23PyrFRB_CG3D_SupAxAx" presynapticPopulation="CG3D_L23PyrFRB" postsynapticPopulation="CG3D_SupAxAx" synapse="Syn_AMPA_SupPyr_SupFS">
            <connectionWD id="0" preCellId="../CG3D_L23PyrFRB/0/L23PyrFRB_varInit" preSegmentId="142" preFractionAlong="0.140071753237" postCellId="../CG3D_SupAxAx/0/SupAxAx" postSegmentId="17" postFractionAlong="0.784060769643" weight="1." delay="0.05 ms"/>
            <connectionWD id="1" preCellId="../CG3D_L23PyrFRB/0/L23PyrFRB_varInit" preSegmentId="146" preFractionAlong="0.251809929262" postCellId="../CG3D_SupAxAx/0/SupAxAx" postSegmentId="64" postFractionAlong="0.816416485391" weight="1." delay="0.05 ms"/>
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        </projection>
        <projection id="Proj108syn1_CG3D_L23PyrFRB_CG3D_SupAxAx" presynapticPopulation="CG3D_L23PyrFRB" postsynapticPopulation="CG3D_SupAxAx" synapse="Syn_NMDA_FRBPyr_SupFS">
            <connectionWD id="0" preCellId="../CG3D_L23PyrFRB/0/L23PyrFRB_varInit" preSegmentId="142" preFractionAlong="0.140071753237" postCellId="../CG3D_SupAxAx/0/SupAxAx" postSegmentId="17" postFractionAlong="0.784060769643" weight="2.5" delay="0.05 ms"/>
            <connectionWD id="1" preCellId="../CG3D_L23PyrFRB/0/L23PyrFRB_varInit" preSegmentId="146" preFractionAlong="0.251809929262" postCellId="../CG3D_SupAxAx/0/SupAxAx" postSegmentId="64" postFractionAlong="0.816416485391" weight="2.5" delay="0.05 ms"/>
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        </projection>
        <projection id="Proj111syn0_CG3D_L23PyrFRB_CG3D_SupLTS" presynapticPopulation="CG3D_L23PyrFRB" postsynapticPopulation="CG3D_SupLTS" synapse="Syn_NMDA_FRBPyr_SupLTS">
            <connectionWD id="0" preCellId="../CG3D_L23PyrFRB/0/L23PyrFRB_varInit" preSegmentId="142" preFractionAlong="0.139098831248" postCellId="../CG3D_SupLTS/0/SupLTSInter" postSegmentId="90" postFractionAlong="0.0145249401429" weight="2.5" delay="0.05 ms"/>
            <connectionWD id="1" preCellId="../CG3D_L23PyrFRB/0/L23PyrFRB_varInit" preSegmentId="147" preFractionAlong="0.972988378367" postCellId="../CG3D_SupLTS/0/SupLTSInter" postSegmentId="63" postFractionAlong="0.0326666567496" weight="2.5" delay="0.05 ms"/>
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        </projection>
        <projection id="Proj111syn1_CG3D_L23PyrFRB_CG3D_SupLTS" presynapticPopulation="CG3D_L23PyrFRB" postsynapticPopulation="CG3D_SupLTS" synapse="Syn_AMPA_SupPyr_SupLTS">
            <connectionWD id="0" preCellId="../CG3D_L23PyrFRB/0/L23PyrFRB_varInit" preSegmentId="142" preFractionAlong="0.139098831248" postCellId="../CG3D_SupLTS/0/SupLTSInter" postSegmentId="90" postFractionAlong="0.0145249401429" weight="1." delay="0.05 ms"/>
            <connectionWD id="1" preCellId="../CG3D_L23PyrFRB/0/L23PyrFRB_varInit" preSegmentId="147" preFractionAlong="0.972988378367" postCellId="../CG3D_SupLTS/0/SupLTSInter" postSegmentId="63" postFractionAlong="0.0326666567496" weight="1." delay="0.05 ms"/>
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        </projection>
        <projection id="Proj112syn0_CG3D_L23PyrFRB_CG3D_SupBask" presynapticPopulation="CG3D_L23PyrFRB" postsynapticPopulation="CG3D_SupBask" synapse="Syn_AMPA_SupPyr_SupFS">
            <connectionWD id="0" preCellId="../CG3D_L23PyrFRB/0/L23PyrFRB_varInit" preSegmentId="143" preFractionAlong="0.282447057671" postCellId="../CG3D_SupBask/0/SupBasket" postSegmentId="87" postFractionAlong="0.886182977226" weight="1." delay="0.05 ms"/>
            <connectionWD id="1" preCellId="../CG3D_L23PyrFRB/0/L23PyrFRB_varInit" preSegmentId="147" preFractionAlong="0.00168760607495" postCellId="../CG3D_SupBask/0/SupBasket" postSegmentId="15" postFractionAlong="0.07253081649" weight="1." delay="0.05 ms"/>
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        </projection>
        <projection id="Proj112syn1_CG3D_L23PyrFRB_CG3D_SupBask" presynapticPopulation="CG3D_L23PyrFRB" postsynapticPopulation="CG3D_SupBask" synapse="Syn_NMDA_FRBPyr_SupFS">
            <connectionWD id="0" preCellId="../CG3D_L23PyrFRB/0/L23PyrFRB_varInit" preSegmentId="143" preFractionAlong="0.282447057671" postCellId="../CG3D_SupBask/0/SupBasket" postSegmentId="87" postFractionAlong="0.886182977226" weight="2.5" delay="0.05 ms"/>
            <connectionWD id="1" preCellId="../CG3D_L23PyrFRB/0/L23PyrFRB_varInit" preSegmentId="147" preFractionAlong="0.00168760607495" postCellId="../CG3D_SupBask/0/SupBasket" postSegmentId="15" postFractionAlong="0.07253081649" weight="2.5" delay="0.05 ms"/>
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        </projection>
        <projection id="Proj113syn0_CG3D_SupLTS_CG3D_DeepAxAx" presynapticPopulation="CG3D_SupLTS" postsynapticPopulation="CG3D_DeepAxAx" synapse="Syn_GABAA_SupLTS_FS">
            <connectionWD id="0" preCellId="../CG3D_SupLTS/0/SupLTSInter" preSegmentId="117" preFractionAlong="0.975144749439" postCellId="../CG3D_DeepAxAx/0/DeepAxAx" postSegmentId="12" postFractionAlong="0.290803898634" weight="0.05" delay="0.05 ms"/>
            <connectionWD id="1" preCellId="../CG3D_SupLTS/0/SupLTSInter" preSegmentId="112" preFractionAlong="0.889606724361" postCellId="../CG3D_DeepAxAx/0/DeepAxAx" postSegmentId="62" postFractionAlong="0.811859324024" weight="0.05" delay="0.05 ms"/>
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        </projection>
        <projection id="Proj114syn0_CG3D_SupLTS_CG3D_DeepLTS" presynapticPopulation="CG3D_SupLTS" postsynapticPopulation="CG3D_DeepLTS" synapse="Syn_GABAA_SupLTS_LTS">
            <connectionWD id="0" preCellId="../CG3D_SupLTS/0/SupLTSInter" preSegmentId="113" preFractionAlong="0.385930220213" postCellId="../CG3D_DeepLTS/0/DeepLTSInter" postSegmentId="66" postFractionAlong="0.735018055741" weight="0.05" delay="0.05 ms"/>
            <connectionWD id="1" preCellId="../CG3D_SupLTS/0/SupLTSInter" preSegmentId="113" preFractionAlong="0.209485307848" postCellId="../CG3D_DeepLTS/0/DeepLTSInter" postSegmentId="66" postFractionAlong="0.196247902953" weight="0.05" delay="0.05 ms"/>
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        </projection>
        <projection id="Proj115syn0_CG3D_SupLTS_CG3D_L4SpinStell" presynapticPopulation="CG3D_SupLTS" postsynapticPopulation="CG3D_L4SpinStell" synapse="Syn_GABAA_SupLTS_L4SS">
            <connectionWD id="0" preCellId="../CG3D_SupLTS/0/SupLTSInter" preSegmentId="113" preFractionAlong="0.737648354617" postCellId="../CG3D_L4SpinStell/0/L4SpinyStellate" postSegmentId="69" postFractionAlong="0.387559782775" weight="0.05" delay="0.05 ms"/>
            <connectionWD id="1" preCellId="../CG3D_SupLTS/0/SupLTSInter" preSegmentId="113" preFractionAlong="0.553489245041" postCellId="../CG3D_L4SpinStell/0/L4SpinyStellate" postSegmentId="25" postFractionAlong="0.597210836316" weight="0.05" delay="0.05 ms"/>
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        </projection>
        <projection id="Proj116syn0_CG3D_SupLTS_CG3D_L5TuftIB" presynapticPopulation="CG3D_SupLTS" postsynapticPopulation="CG3D_L5TuftIB" synapse="Syn_GABAA_SupLTS_L5Pyr">
            <connectionWD id="0" preCellId="../CG3D_SupLTS/0/SupLTSInter" preSegmentId="116" preFractionAlong="0.528291444688" postCellId="../CG3D_L5TuftIB/0/L5TuftedPyrIB" postSegmentId="67" postFractionAlong="0.85645512508" weight="0.05" delay="0.05 ms"/>
            <connectionWD id="1" preCellId="../CG3D_SupLTS/0/SupLTSInter" preSegmentId="116" preFractionAlong="0.975515758352" postCellId="../CG3D_L5TuftIB/0/L5TuftedPyrIB" postSegmentId="99" postFractionAlong="0.154739369062" weight="0.05" delay="0.05 ms"/>
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        </projection>
        <projection id="Proj117syn0_CG3D_SupLTS_CG3D_L5TuftRS" presynapticPopulation="CG3D_SupLTS" postsynapticPopulation="CG3D_L5TuftRS" synapse="Syn_GABAA_SupLTS_L5Pyr">
            <connectionWD id="0" preCellId="../CG3D_SupLTS/0/SupLTSInter" preSegmentId="113" preFractionAlong="0.766968804261" postCellId="../CG3D_L5TuftRS/0/L5TuftedPyrRS" postSegmentId="103" postFractionAlong="0.556077017046" weight="0.05" delay="0.05 ms"/>
            <connectionWD id="1" preCellId="../CG3D_SupLTS/0/SupLTSInter" preSegmentId="117" preFractionAlong="0.800192639001" postCellId="../CG3D_L5TuftRS/0/L5TuftedPyrRS" postSegmentId="67" postFractionAlong="0.0134528394029" weight="0.05" delay="0.05 ms"/>
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        </projection>
        <projection id="Proj118syn0_CG3D_SupLTS_CG3D_L6NonTuftRS" presynapticPopulation="CG3D_SupLTS" postsynapticPopulation="CG3D_L6NonTuftRS" synapse="Syn_GABAA_SupLTS_L6NT">
            <connectionWD id="0" preCellId="../CG3D_SupLTS/0/SupLTSInter" preSegmentId="116" preFractionAlong="0.417582013063" postCellId="../CG3D_L6NonTuftRS/0/L6NonTuftedPyrRS" postSegmentId="54" postFractionAlong="0.00810264540726" weight="0.05" delay="0.05 ms"/>
            <connectionWD id="1" preCellId="../CG3D_SupLTS/0/SupLTSInter" preSegmentId="113" preFractionAlong="0.807110122908" postCellId="../CG3D_L6NonTuftRS/0/L6NonTuftedPyrRS" postSegmentId="45" postFractionAlong="0.863720574724" weight="0.05" delay="0.05 ms"/>
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        </projection>
        <projection id="Proj119syn0_CG3D_SupLTS_CG3D_DeepBask" presynapticPopulation="CG3D_SupLTS" postsynapticPopulation="CG3D_DeepBask" synapse="Syn_GABAA_SupLTS_FS">
            <connectionWD id="0" preCellId="../CG3D_SupLTS/0/SupLTSInter" preSegmentId="112" preFractionAlong="0.506722791196" postCellId="../CG3D_DeepBask/0/DeepBasket" postSegmentId="69" postFractionAlong="0.198493011597" weight="0.05" delay="0.05 ms"/>
            <connectionWD id="1" preCellId="../CG3D_SupLTS/0/SupLTSInter" preSegmentId="112" preFractionAlong="0.674696918008" postCellId="../CG3D_DeepBask/0/DeepBasket" postSegmentId="95" postFractionAlong="0.604157193383" weight="0.05" delay="0.05 ms"/>
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        </projection>
        <projection id="Proj120syn0_CG3D_SupLTS_CG3D_L23PyrRS" presynapticPopulation="CG3D_SupLTS" postsynapticPopulation="CG3D_L23PyrRS" synapse="Syn_GABAA_SupLTS_SupPyr">
            <connectionWD id="0" preCellId="../CG3D_SupLTS/0/SupLTSInter" preSegmentId="112" preFractionAlong="0.394657012102" postCellId="../CG3D_L23PyrRS/0/L23PyrRS" postSegmentId="108" postFractionAlong="0.717081781327" weight="0.05" delay="0.05 ms"/>
            <connectionWD id="1" preCellId="../CG3D_SupLTS/0/SupLTSInter" preSegmentId="116" preFractionAlong="0.111281321861" postCellId="../CG3D_L23PyrRS/0/L23PyrRS" postSegmentId="34" postFractionAlong="0.0373082807599" weight="0.05" delay="0.05 ms"/>
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        </projection>
        <projection id="Proj121syn0_CG3D_SupLTS_CG3D_SupAxAx" presynapticPopulation="CG3D_SupLTS" postsynapticPopulation="CG3D_SupAxAx" synapse="Syn_GABAA_SupLTS_FS">
            <connectionWD id="0" preCellId="../CG3D_SupLTS/0/SupLTSInter" preSegmentId="113" preFractionAlong="0.679420634867" postCellId="../CG3D_SupAxAx/0/SupAxAx" postSegmentId="70" postFractionAlong="0.385846837912" weight="0.05" delay="0.05 ms"/>
            <connectionWD id="1" preCellId="../CG3D_SupLTS/0/SupLTSInter" preSegmentId="113" preFractionAlong="0.281232013618" postCellId="../CG3D_SupAxAx/0/SupAxAx" postSegmentId="97" postFractionAlong="0.765566104202" weight="0.05" delay="0.05 ms"/>
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        </projection>
        <projection id="Proj122syn0_CG3D_SupLTS_CG3D_L23PyrFRB" presynapticPopulation="CG3D_SupLTS" postsynapticPopulation="CG3D_L23PyrFRB" synapse="Syn_GABAA_SupLTS_SupPyr">
            <connectionWD id="0" preCellId="../CG3D_SupLTS/0/SupLTSInter" preSegmentId="116" preFractionAlong="0.49224592614" postCellId="../CG3D_L23PyrFRB/0/L23PyrFRB_varInit" postSegmentId="30" postFractionAlong="0.1850514387" weight="0.05" delay="0.05 ms"/>
            <connectionWD id="1" preCellId="../CG3D_SupLTS/0/SupLTSInter" preSegmentId="117" preFractionAlong="0.947588014837" postCellId="../CG3D_L23PyrFRB/0/L23PyrFRB_varInit" postSegmentId="118" postFractionAlong="0.272244401784" weight="0.05" delay="0.05 ms"/>
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        </projection>
        <projection id="Proj125syn0_CG3D_SupLTS_CG3D_SupBask" presynapticPopulation="CG3D_SupLTS" postsynapticPopulation="CG3D_SupBask" synapse="Syn_GABAA_SupLTS_FS">
            <connectionWD id="0" preCellId="../CG3D_SupLTS/0/SupLTSInter" preSegmentId="112" preFractionAlong="0.480483294583" postCellId="../CG3D_SupBask/0/SupBasket" postSegmentId="52" postFractionAlong="0.159243211518" weight="0.05" delay="0.05 ms"/>
            <connectionWD id="1" preCellId="../CG3D_SupLTS/0/SupLTSInter" preSegmentId="117" preFractionAlong="0.424876709478" postCellId="../CG3D_SupBask/0/SupBasket" postSegmentId="100" postFractionAlong="0.0981634172473" weight="0.05" delay="0.05 ms"/>
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        </projection>
        <projection id="Proj126syn0_CG3D_SupBask_CG3D_L4SpinStell" presynapticPopulation="CG3D_SupBask" postsynapticPopulation="CG3D_L4SpinStell" synapse="Syn_GABAA_SupBask_L4SS">
            <connectionWD id="0" preCellId="../CG3D_SupBask/0/SupBasket" preSegmentId="117" preFractionAlong="0.696672804334" postCellId="../CG3D_L4SpinStell/0/L4SpinyStellate" postSegmentId="28" postFractionAlong="0.917193056391" weight="0.05" delay="0.05 ms"/>
            <connectionWD id="1" preCellId="../CG3D_SupBask/0/SupBasket" preSegmentId="112" preFractionAlong="0.55025664355" postCellId="../CG3D_L4SpinStell/0/L4SpinyStellate" postSegmentId="3" postFractionAlong="0.251887851679" weight="0.05" delay="0.05 ms"/>
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        </projection>
        <projection id="Proj127syn0_CG3D_SupBask_CG3D_L23PyrRS" presynapticPopulation="CG3D_SupBask" postsynapticPopulation="CG3D_L23PyrRS" synapse="Syn_GABAA_SupBask_SupPyr">
            <connectionWD id="0" preCellId="../CG3D_SupBask/0/SupBasket" preSegmentId="113" preFractionAlong="0.254323516368" postCellId="../CG3D_L23PyrRS/0/L23PyrRS" postSegmentId="7" postFractionAlong="0.924701750249" weight="0.05" delay="0.05 ms"/>
            <connectionWD id="1" preCellId="../CG3D_SupBask/0/SupBasket" preSegmentId="112" preFractionAlong="0.929320561809" postCellId="../CG3D_L23PyrRS/0/L23PyrRS" postSegmentId="11" postFractionAlong="0.800588804051" weight="0.05" delay="0.05 ms"/>
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        </projection>
        <projection id="Proj128syn0_CG3D_SupBask_CG3D_SupAxAx" presynapticPopulation="CG3D_SupBask" postsynapticPopulation="CG3D_SupAxAx" synapse="Syn_GABAA_SupBask_SupAxAx">
            <connectionWD id="0" preCellId="../CG3D_SupBask/0/SupBasket" preSegmentId="117" preFractionAlong="0.82530267554" postCellId="../CG3D_SupAxAx/0/SupAxAx" postSegmentId="92" postFractionAlong="0.128231314517" weight="0.05" delay="0.05 ms"/>
            <connectionWD id="1" preCellId="../CG3D_SupBask/0/SupBasket" preSegmentId="112" preFractionAlong="0.0913920449662" postCellId="../CG3D_SupAxAx/0/SupAxAx" postSegmentId="93" postFractionAlong="0.411856492647" weight="0.05" delay="0.05 ms"/>
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        </projection>
        <projection id="Proj129syn0_CG3D_SupBask_CG3D_L23PyrFRB" presynapticPopulation="CG3D_SupBask" postsynapticPopulation="CG3D_L23PyrFRB" synapse="Syn_GABAA_SupBask_SupPyr">
            <connectionWD id="0" preCellId="../CG3D_SupBask/0/SupBasket" preSegmentId="112" preFractionAlong="0.252183093465" postCellId="../CG3D_L23PyrFRB/0/L23PyrFRB_varInit" postSegmentId="14" postFractionAlong="0.390049408774" weight="0.05" delay="0.05 ms"/>
            <connectionWD id="1" preCellId="../CG3D_SupBask/0/SupBasket" preSegmentId="117" preFractionAlong="0.737076783656" postCellId="../CG3D_L23PyrFRB/0/L23PyrFRB_varInit" postSegmentId="6" postFractionAlong="0.412184305142" weight="0.05" delay="0.05 ms"/>
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        </projection>
        <projection id="Proj130syn0_CG3D_SupBask_CG3D_SupLTS" presynapticPopulation="CG3D_SupBask" postsynapticPopulation="CG3D_SupLTS" synapse="Syn_GABAA_SupBask_SupLTS">
            <connectionWD id="0" preCellId="../CG3D_SupBask/0/SupBasket" preSegmentId="112" preFractionAlong="0.892197654333" postCellId="../CG3D_SupLTS/0/SupLTSInter" postSegmentId="88" postFractionAlong="0.69868563456" weight="0.05" delay="0.05 ms"/>
            <connectionWD id="1" preCellId="../CG3D_SupBask/0/SupBasket" preSegmentId="117" preFractionAlong="0.630411985398" postCellId="../CG3D_SupLTS/0/SupLTSInter" postSegmentId="60" postFractionAlong="0.628298660515" weight="0.05" delay="0.05 ms"/>
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        </projection>
        <inputList id="DepCurr_L4SS_TO_CG3D_L4SpinStell_0_0" population="CG3D_L4SpinStell" component="DepCurr_L4SS_TO_CG3D_L4SpinStell_Pulse">
            <inputW id="0" target="../CG3D_L4SpinStell/0/L4SpinyStellate" destination="synapses" segmentId="0" fractionAlong="0.500000" weight="0.000080364545144"/>
            <inputW id="1" target="../CG3D_L4SpinStell/1/L4SpinyStellate" destination="synapses" segmentId="0" fractionAlong="0.500000" weight="0.000053259575158"/>
        </inputList>
        <inputList id="BackgroundL5_TO_CG3D_L5TuftIB_0_0" population="CG3D_L5TuftIB" component="BackgroundL5_TO_CG3D_L5TuftIB_PoiSyn0">
            <input id="0" target="../CG3D_L5TuftIB/7/L5TuftedPyrIB" destination="synapses" segmentId="66" fractionAlong="0.832679"/>
            <input id="1" target="../CG3D_L5TuftIB/7/L5TuftedPyrIB" destination="synapses" segmentId="88" fractionAlong="0.133389"/>
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        </inputList>
        <inputList id="EctopicStimL5IB_TO_CG3D_L5TuftIB_0_0" population="CG3D_L5TuftIB" component="EctopicStimL5IB_TO_CG3D_L5TuftIB_PoiSyn0">
            <input id="0" target="../CG3D_L5TuftIB/2/L5TuftedPyrIB" destination="synapses" segmentId="119" fractionAlong="0.500000"/>
            <input id="1" target="../CG3D_L5TuftIB/6/L5TuftedPyrIB" destination="synapses" segmentId="119" fractionAlong="0.500000"/>
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        </inputList>
        <inputList id="DepCurr_L5IB_TO_CG3D_L5TuftIB_0_0" population="CG3D_L5TuftIB" component="DepCurr_L5IB_TO_CG3D_L5TuftIB_Pulse">
            <inputW id="0" target="../CG3D_L5TuftIB/1/L5TuftedPyrIB" destination="synapses" segmentId="0" fractionAlong="0.500000" weight="0.000080393968382"/>
            <inputW id="1" target="../CG3D_L5TuftIB/3/L5TuftedPyrIB" destination="synapses" segmentId="0" fractionAlong="0.500000" weight="0.000063036731692"/>
            <inputW id="2" target="../CG3D_L5TuftIB/0/L5TuftedPyrIB" destination="synapses" segmentId="0" fractionAlong="0.500000" weight="0.000064081194817"/>
            <inputW id="3" target="../CG3D_L5TuftIB/5/L5TuftedPyrIB" destination="synapses" segmentId="0" fractionAlong="0.500000" weight="0.000083385565568"/>
            <inputW id="4" target="../CG3D_L5TuftIB/6/L5TuftedPyrIB" destination="synapses" segmentId="0" fractionAlong="0.500000" weight="0.000063932835754"/>
            <inputW id="5" target="../CG3D_L5TuftIB/2/L5TuftedPyrIB" destination="synapses" segmentId="0" fractionAlong="0.500000" weight="0.000055976289136"/>
            <inputW id="6" target="../CG3D_L5TuftIB/7/L5TuftedPyrIB" destination="synapses" segmentId="0" fractionAlong="0.500000" weight="0.000087114108558"/>
            <inputW id="7" target="../CG3D_L5TuftIB/4/L5TuftedPyrIB" destination="synapses" segmentId="0" fractionAlong="0.500000" weight="0.000066980711624"/>
        </inputList>
        <inputList id="EctopicStimL23FRB_TO_CG3D_L23PyrFRB_0_0" population="CG3D_L23PyrFRB" component="EctopicStimL23FRB_TO_CG3D_L23PyrFRB_PoiSyn0">
            <input id="0" target="../CG3D_L23PyrFRB/0/L23PyrFRB_varInit" destination="synapses" segmentId="143" fractionAlong="0.500000"/>
        </inputList>
        <inputList id="DepCurr_L23FRB_TO_CG3D_L23PyrFRB_0_0" population="CG3D_L23PyrFRB" component="DepCurr_L23FRB_TO_CG3D_L23PyrFRB_Pulse">
            <inputW id="0" target="../CG3D_L23PyrFRB/0/L23PyrFRB_varInit" destination="synapses" segmentId="0" fractionAlong="0.500000" weight="0.000253295947845"/>
        </inputList>
        <inputList id="EctopicStimL6NT_TO_CG3D_L6NonTuftRS_0_0" population="CG3D_L6NonTuftRS" component="EctopicStimL6NT_TO_CG3D_L6NonTuftRS_PoiSyn0">
            <input id="0" target="../CG3D_L6NonTuftRS/4/L6NonTuftedPyrRS" destination="synapses" segmentId="95" fractionAlong="0.500000"/>
            <input id="1" target="../CG3D_L6NonTuftRS/3/L6NonTuftedPyrRS" destination="synapses" segmentId="95" fractionAlong="0.500000"/>
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        </inputList>
        <inputList id="DepCurr_L6NT_TO_CG3D_L6NonTuftRS_0_0" population="CG3D_L6NonTuftRS" component="DepCurr_L6NT_TO_CG3D_L6NonTuftRS_Pulse">
            <inputW id="0" target="../CG3D_L6NonTuftRS/1/L6NonTuftedPyrRS" destination="synapses" segmentId="0" fractionAlong="0.500000" weight="0.000058176470205"/>
            <inputW id="1" target="../CG3D_L6NonTuftRS/2/L6NonTuftedPyrRS" destination="synapses" segmentId="0" fractionAlong="0.500000" weight="0.000063919510553"/>
            <inputW id="2" target="../CG3D_L6NonTuftRS/3/L6NonTuftedPyrRS" destination="synapses" segmentId="0" fractionAlong="0.500000" weight="0.000058592185866"/>
            <inputW id="3" target="../CG3D_L6NonTuftRS/4/L6NonTuftedPyrRS" destination="synapses" segmentId="0" fractionAlong="0.500000" weight="0.00009474869595"/>
            <inputW id="4" target="../CG3D_L6NonTuftRS/0/L6NonTuftedPyrRS" destination="synapses" segmentId="0" fractionAlong="0.500000" weight="0.000094232030182"/>
        </inputList>
        <inputList id="DepCurr_L23RS_TO_CG3D_L23PyrRS_0_0" population="CG3D_L23PyrRS" component="DepCurr_L23RS_TO_CG3D_L23PyrRS_Pulse">
            <inputW id="0" target="../CG3D_L23PyrRS/4/L23PyrRS" destination="synapses" segmentId="0" fractionAlong="0.500000" weight="0.000073833435611"/>
            <inputW id="1" target="../CG3D_L23PyrRS/9/L23PyrRS" destination="synapses" segmentId="0" fractionAlong="0.500000" weight="0.000077726256972"/>
            <inputW id="2" target="../CG3D_L23PyrRS/6/L23PyrRS" destination="synapses" segmentId="0" fractionAlong="0.500000" weight="0.000065144345726"/>
            <inputW id="3" target="../CG3D_L23PyrRS/7/L23PyrRS" destination="synapses" segmentId="0" fractionAlong="0.500000" weight="0.000068263644444"/>
            <inputW id="4" target="../CG3D_L23PyrRS/2/L23PyrRS" destination="synapses" segmentId="0" fractionAlong="0.500000" weight="0.000058578161503"/>
            <inputW id="5" target="../CG3D_L23PyrRS/8/L23PyrRS" destination="synapses" segmentId="0" fractionAlong="0.500000" weight="0.000058313123457"/>
            <inputW id="6" target="../CG3D_L23PyrRS/0/L23PyrRS" destination="synapses" segmentId="0" fractionAlong="0.500000" weight="0.00005054794139"/>
            <inputW id="7" target="../CG3D_L23PyrRS/1/L23PyrRS" destination="synapses" segmentId="0" fractionAlong="0.500000" weight="0.000056618047438"/>
            <inputW id="8" target="../CG3D_L23PyrRS/5/L23PyrRS" destination="synapses" segmentId="0" fractionAlong="0.500000" weight="0.000095482581677"/>
            <inputW id="9" target="../CG3D_L23PyrRS/3/L23PyrRS" destination="synapses" segmentId="0" fractionAlong="0.500000" weight="0.000091234609697"/>
        </inputList>
        <inputList id="BackgroundL23RS_TO_CG3D_L23PyrRS_0_0" population="CG3D_L23PyrRS" component="BackgroundL23RS_TO_CG3D_L23PyrRS_PoiSyn0">
            <input id="0" target="../CG3D_L23PyrRS/8/L23PyrRS" destination="synapses" segmentId="31" fractionAlong="0.141502"/>
            <input id="1" target="../CG3D_L23PyrRS/8/L23PyrRS" destination="synapses" segmentId="86" fractionAlong="0.583407"/>
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        </inputList>
        <inputList id="EctopicStimL23RS_TO_CG3D_L23PyrRS_0_0" population="CG3D_L23PyrRS" component="EctopicStimL23RS_TO_CG3D_L23PyrRS_PoiSyn0">
            <input id="0" target="../CG3D_L23PyrRS/8/L23PyrRS" destination="synapses" segmentId="143" fractionAlong="0.500000"/>
            <input id="1" target="../CG3D_L23PyrRS/0/L23PyrRS" destination="synapses" segmentId="143" fractionAlong="0.500000"/>
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        </inputList>
        <inputList id="EctopicStimL5RS_TO_CG3D_L5TuftRS_0_0" population="CG3D_L5TuftRS" component="EctopicStimL5RS_TO_CG3D_L5TuftRS_PoiSyn0">
            <input id="0" target="../CG3D_L5TuftRS/1/L5TuftedPyrRS" destination="synapses" segmentId="119" fractionAlong="0.500000"/>
            <input id="1" target="../CG3D_L5TuftRS/0/L5TuftedPyrRS" destination="synapses" segmentId="119" fractionAlong="0.500000"/>
        </inputList>
        <inputList id="DepCurr_L5RS_TO_CG3D_L5TuftRS_0_0" population="CG3D_L5TuftRS" component="DepCurr_L5RS_TO_CG3D_L5TuftRS_Pulse">
            <inputW id="0" target="../CG3D_L5TuftRS/0/L5TuftedPyrRS" destination="synapses" segmentId="0" fractionAlong="0.500000" weight="0.000089546625985"/>
            <inputW id="1" target="../CG3D_L5TuftRS/1/L5TuftedPyrRS" destination="synapses" segmentId="0" fractionAlong="0.500000" weight="0.000083917225175"/>
        </inputList>
    </network>
</neuroml>
