<neuroml xmlns="http://www.neuroml.org/schema/neuroml2"  xmlns:xs="http://www.w3.org/2001/XMLSchema" xmlns:xsi="http://www.w3.org/2001/XMLSchema-instance" xsi:schemaLocation="http://www.neuroml.org/schema/neuroml2 https://raw.github.com/NeuroML/NeuroML2/development/Schemas/NeuroML2/NeuroML_v2beta5.xsd" id="TestSmall">
    <notes>

This NeuroML 2 file was generated by OpenCortex v0.0.8 using:
    libNeuroML v0.2.26
    pyNeuroML v0.2.6

    </notes>
    <property tag="Python random seed" value="134344"/>
    <include href="TestSmall/L5TuftedPyrRS.cell.nml"></include>
    <include href="TestSmall/ar__m00_25.channel.nml"></include>
    <include href="TestSmall/cad__beta0_01__phi4333_33.nml"></include>
    <include href="TestSmall/cad__beta0_02__phi86666_7.nml"></include>
    <include href="TestSmall/cad__beta0_075__phi86666_7.nml"></include>
    <include href="TestSmall/cal.channel.nml"></include>
    <include href="TestSmall/cat.channel.nml"></include>
    <include href="TestSmall/k2.channel.nml"></include>
    <include href="TestSmall/ka.channel.nml"></include>
    <include href="TestSmall/kahp_deeppyr.channel.nml"></include>
    <include href="TestSmall/kc.channel.nml"></include>
    <include href="TestSmall/kdr.channel.nml"></include>
    <include href="TestSmall/km.channel.nml"></include>
    <include href="TestSmall/naf__a0__b0__c0__d0__fastNa_shiftmin3_5.channel.nml"></include>
    <include href="TestSmall/nap.channel.nml"></include>
    <include href="TestSmall/pas.channel.nml"></include>
    <include href="TestSmall/L5TuftedPyrIB.cell.nml"></include>
    <include href="TestSmall/ar__m00_25.channel.nml"></include>
    <include href="TestSmall/cad__beta0_01__phi4333_33.nml"></include>
    <include href="TestSmall/cad__beta0_02__phi86666_7.nml"></include>
    <include href="TestSmall/cad__beta0_075__phi86666_7.nml"></include>
    <include href="TestSmall/cal.channel.nml"></include>
    <include href="TestSmall/cat.channel.nml"></include>
    <include href="TestSmall/k2.channel.nml"></include>
    <include href="TestSmall/ka_ib.channel.nml"></include>
    <include href="TestSmall/kahp_deeppyr.channel.nml"></include>
    <include href="TestSmall/kc.channel.nml"></include>
    <include href="TestSmall/kdr.channel.nml"></include>
    <include href="TestSmall/km.channel.nml"></include>
    <include href="TestSmall/naf__a0__b0__c0__d0__fastNa_shiftmin3_5.channel.nml"></include>
    <include href="TestSmall/nap.channel.nml"></include>
    <include href="TestSmall/pas.channel.nml"></include>
    <include href="TestSmall/L4SpinyStellate.cell.nml"></include>
    <include href="TestSmall/ar__m00.channel.nml"></include>
    <include href="TestSmall/cad__beta0_02__phi260000.nml"></include>
    <include href="TestSmall/cad__beta0_05__phi260000.nml"></include>
    <include href="TestSmall/cal.channel.nml"></include>
    <include href="TestSmall/cat_a.channel.nml"></include>
    <include href="TestSmall/k2.channel.nml"></include>
    <include href="TestSmall/ka.channel.nml"></include>
    <include href="TestSmall/kahp_slower.channel.nml"></include>
    <include href="TestSmall/kc_fast.channel.nml"></include>
    <include href="TestSmall/kdr_fs.channel.nml"></include>
    <include href="TestSmall/km.channel.nml"></include>
    <include href="TestSmall/naf2__a0__b0__c0__d0__fastNa_shiftmin2_5.channel.nml"></include>
    <include href="TestSmall/napf_spinstell__a0__b0__c0__d0__shmin2_5.channel.nml"></include>
    <include href="TestSmall/pas.channel.nml"></include>
    <include href="TestSmall/L6NonTuftedPyrRS.cell.nml"></include>
    <include href="TestSmall/ar__m00_25.channel.nml"></include>
    <include href="TestSmall/cad__beta0_01__phi13000.nml"></include>
    <include href="TestSmall/cad__beta0_05__phi65000.nml"></include>
    <include href="TestSmall/cal.channel.nml"></include>
    <include href="TestSmall/cat.channel.nml"></include>
    <include href="TestSmall/k2.channel.nml"></include>
    <include href="TestSmall/ka.channel.nml"></include>
    <include href="TestSmall/kahp_deeppyr.channel.nml"></include>
    <include href="TestSmall/kc.channel.nml"></include>
    <include href="TestSmall/kdr.channel.nml"></include>
    <include href="TestSmall/km.channel.nml"></include>
    <include href="TestSmall/naf__a0__b0__c0__d0__fastNa_shiftmin3_5.channel.nml"></include>
    <include href="TestSmall/nap.channel.nml"></include>
    <include href="TestSmall/pas.channel.nml"></include>
    <include href="TestSmall/L23PyrRS.cell.nml"></include>
    <include href="TestSmall/ar__m00_25.channel.nml"></include>
    <include href="TestSmall/cad__beta0_01__phi26000.nml"></include>
    <include href="TestSmall/cad__beta0_05__phi52000.nml"></include>
    <include href="TestSmall/cal.channel.nml"></include>
    <include href="TestSmall/cat.channel.nml"></include>
    <include href="TestSmall/k2.channel.nml"></include>
    <include href="TestSmall/ka.channel.nml"></include>
    <include href="TestSmall/kahp.channel.nml"></include>
    <include href="TestSmall/kc.channel.nml"></include>
    <include href="TestSmall/kdr.channel.nml"></include>
    <include href="TestSmall/km.channel.nml"></include>
    <include href="TestSmall/naf__a0__b0__c0__d0__fastNa_shiftmin3_5.channel.nml"></include>
    <include href="TestSmall/nap.channel.nml"></include>
    <include href="TestSmall/pas.channel.nml"></include>
    <include href="TestSmall/Syn_AMPA_L4SS_L4SS.synapse.nml"></include>
    <include href="TestSmall/Syn_AMPA_L4SS_Pyr.synapse.nml"></include>
    <include href="TestSmall/Syn_AMPA_L5IB_L4SS.synapse.nml"></include>
    <include href="TestSmall/Syn_AMPA_L5IB_L5Pyr.synapse.nml"></include>
    <include href="TestSmall/Syn_AMPA_L5IB_L6NT.synapse.nml"></include>
    <include href="TestSmall/Syn_AMPA_L5IB_SupPyr.synapse.nml"></include>
    <include href="TestSmall/Syn_AMPA_L5RS_L4SS.synapse.nml"></include>
    <include href="TestSmall/Syn_AMPA_L5RS_L5Pyr.synapse.nml"></include>
    <include href="TestSmall/Syn_AMPA_L5RS_L6NT.synapse.nml"></include>
    <include href="TestSmall/Syn_AMPA_L5RS_SupPyr.synapse.nml"></include>
    <include href="TestSmall/Syn_AMPA_L6NT_L4SS.synapse.nml"></include>
    <include href="TestSmall/Syn_AMPA_L6NT_L5Pyr.synapse.nml"></include>
    <include href="TestSmall/Syn_AMPA_L6NT_L6NT.synapse.nml"></include>
    <include href="TestSmall/Syn_AMPA_L6NT_SupPyr.synapse.nml"></include>
    <include href="TestSmall/Syn_AMPA_SupPyr_L4SS.synapse.nml"></include>
    <include href="TestSmall/Syn_AMPA_SupPyr_L5Pyr.synapse.nml"></include>
    <include href="TestSmall/Syn_AMPA_SupPyr_L6NT.synapse.nml"></include>
    <include href="TestSmall/Syn_AMPA_SupPyr_SupPyr.synapse.nml"></include>
    <include href="TestSmall/Syn_NMDA_L4SS_L4SS.synapse.nml"></include>
    <include href="TestSmall/Syn_NMDA_L4SS_Pyr.synapse.nml"></include>
    <include href="TestSmall/Syn_NMDA_L5IB_DeepPyr.synapse.nml"></include>
    <include href="TestSmall/Syn_NMDA_L5IB_L4SS.synapse.nml"></include>
    <include href="TestSmall/Syn_NMDA_L5IB_SupPyr.synapse.nml"></include>
    <include href="TestSmall/Syn_NMDA_L5RS_DeepPyr.synapse.nml"></include>
    <include href="TestSmall/Syn_NMDA_L5RS_L4SS.synapse.nml"></include>
    <include href="TestSmall/Syn_NMDA_L5RS_SupPyr.synapse.nml"></include>
    <include href="TestSmall/Syn_NMDA_L6NT_DeepPyr.synapse.nml"></include>
    <include href="TestSmall/Syn_NMDA_L6NT_L4SS.synapse.nml"></include>
    <include href="TestSmall/Syn_NMDA_L6NT_SupPyr.synapse.nml"></include>
    <include href="TestSmall/Syn_NMDA_SupPyr_L4SS.synapse.nml"></include>
    <include href="TestSmall/Syn_NMDA_SupPyr_L5Pyr.synapse.nml"></include>
    <include href="TestSmall/Syn_NMDA_SupPyr_L6NT.synapse.nml"></include>
    <include href="TestSmall/Syn_NMDA_SupPyr_SupPyr.synapse.nml"></include>
    <include href="TestSmall/SynForEctStim.synapse.nml"></include>
    <pulseGenerator id="DepCurr_L5IB_TO_CG3D_L5TuftIB_Pulse0_Cell1" delay="0.000000 ms" duration="20000.000000 ms" amplitude="0.000097 uA"/>
    <pulseGenerator id="DepCurr_L5IB_TO_CG3D_L5TuftIB_Pulse0_Cell0" delay="0.000000 ms" duration="20000.000000 ms" amplitude="0.000089 uA"/>
    <pulseGenerator id="DepCurr_L4SS_TO_CG3D_L4SpinStell_Pulse0_Cell0" delay="0.000000 ms" duration="20000.000000 ms" amplitude="0.000073 uA"/>
    <pulseGenerator id="DepCurr_L6NT_TO_CG3D_L6NonTuftRS_Pulse0_Cell0" delay="0.000000 ms" duration="20000.000000 ms" amplitude="0.000074 uA"/>
    <pulseGenerator id="DepCurr_L6NT_TO_CG3D_L6NonTuftRS_Pulse0_Cell1" delay="0.000000 ms" duration="20000.000000 ms" amplitude="0.000053 uA"/>
    <pulseGenerator id="DepCurr_L5RS_TO_CG3D_L5TuftRS_Pulse0_Cell0" delay="0.000000 ms" duration="20000.000000 ms" amplitude="0.000095 uA"/>
    <pulseGenerator id="DepCurr_L23RS_TO_CG3D_L23PyrRS_Pulse0_Cell2" delay="0.000000 ms" duration="20000.000000 ms" amplitude="0.000059 uA"/>
    <pulseGenerator id="DepCurr_L23RS_TO_CG3D_L23PyrRS_Pulse0_Cell1" delay="0.000000 ms" duration="20000.000000 ms" amplitude="0.000065 uA"/>
    <pulseGenerator id="DepCurr_L23RS_TO_CG3D_L23PyrRS_Pulse0_Cell0" delay="0.000000 ms" duration="20000.000000 ms" amplitude="0.000062 uA"/>
    <poissonFiringSynapse id="BackgroundL5_TO_CG3D_L5TuftIB_PoiSyn0" averageRate="30.000000 Hz" synapse="Syn_AMPA_L5RS_L5Pyr" spikeTarget="./Syn_AMPA_L5RS_L5Pyr"/>
    <poissonFiringSynapse id="EctopicStimL5IB_TO_CG3D_L5TuftIB_PoiSyn0" averageRate="1.000000 Hz" synapse="SynForEctStim" spikeTarget="./SynForEctStim"/>
    <poissonFiringSynapse id="EctopicStimL6NT_TO_CG3D_L6NonTuftRS_PoiSyn0" averageRate="1.000000 Hz" synapse="SynForEctStim" spikeTarget="./SynForEctStim"/>
    <poissonFiringSynapse id="EctopicStimL5RS_TO_CG3D_L5TuftRS_PoiSyn0" averageRate="1.000000 Hz" synapse="SynForEctStim" spikeTarget="./SynForEctStim"/>
    <poissonFiringSynapse id="BackgroundL23RS_TO_CG3D_L23PyrRS_PoiSyn0" averageRate="30.000000 Hz" synapse="Syn_AMPA_SupPyr_SupPyr" spikeTarget="./Syn_AMPA_SupPyr_SupPyr"/>
    <poissonFiringSynapse id="EctopicStimL23RS_TO_CG3D_L23PyrRS_PoiSyn0" averageRate="0.100000 Hz" synapse="SynForEctStim" spikeTarget="./SynForEctStim"/>
    <network id="TestSmall" type="networkWithTemperature" temperature="32degC">
        <population id="CG3D_L4SpinStell" component="L4SpinyStellate" size="1" type="populationList">
            <instance id="0">
                <location x="-158.841310297000007" y="-672.047599831999946" z="10.9331207863"/>
            </instance>
        </population>
        <population id="CG3D_L5TuftIB" component="L5TuftedPyrIB" size="2" type="populationList">
            <instance id="0">
                <location x="141.792475313000011" y="-875.116129127000022" z="151.145387168000013"/>
            </instance>
            <instance id="1">
                <location x="-97.095312510799999" y="-987.151085117999969" z="201.078817444999999"/>
            </instance>
        </population>
        <population id="CG3D_L5TuftRS" component="L5TuftedPyrRS" size="1" type="populationList">
            <instance id="0">
                <location x="-143.090450519000001" y="-909.186095551999983" z="-9.63519612084"/>
            </instance>
        </population>
        <population id="CG3D_L6NonTuftRS" component="L6NonTuftedPyrRS" size="2" type="populationList">
            <instance id="0">
                <location x="61.440847859400002" y="-1110.916380160000017" z="135.961968380000002"/>
            </instance>
            <instance id="1">
                <location x="-16.360709678500001" y="-1178.307646449999993" z="68.076998188100006"/>
            </instance>
        </population>
        <population id="CG3D_L23PyrRS" component="L23PyrRS" size="3" type="populationList">
            <instance id="0">
                <location x="162.030723585999993" y="-241.849860095999986" z="16.7264562748"/>
            </instance>
            <instance id="1">
                <location x="38.544948929" y="-318.042282290999992" z="180.780087866000002"/>
            </instance>
            <instance id="2">
                <location x="153.102393696999997" y="-390.971665221000023" z="-136.505549086999991"/>
            </instance>
        </population>
        <projection id="Proj0syn0_CG3D_L5TuftIB_CG3D_L5TuftIB" presynapticPopulation="CG3D_L5TuftIB" postsynapticPopulation="CG3D_L5TuftIB" synapse="Syn_AMPA_L5IB_L5Pyr">
            <connectionWD id="0" preCellId="../CG3D_L5TuftIB/1/L5TuftedPyrIB" preSegmentId="121" preFractionAlong="0.192353020671" postCellId="../CG3D_L5TuftIB/0/L5TuftedPyrIB" postSegmentId="59" postFractionAlong="0.830753163919" weight="1." delay="0.05 ms"/>
            <connectionWD id="1" preCellId="../CG3D_L5TuftIB/1/L5TuftedPyrIB" preSegmentId="119" preFractionAlong="0.137920205094" postCellId="../CG3D_L5TuftIB/0/L5TuftedPyrIB" postSegmentId="71" postFractionAlong="0.246594993646" weight="1." delay="0.05 ms"/>
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        </projection>
        <projection id="Proj0syn1_CG3D_L5TuftIB_CG3D_L5TuftIB" presynapticPopulation="CG3D_L5TuftIB" postsynapticPopulation="CG3D_L5TuftIB" synapse="Syn_NMDA_L5IB_DeepPyr">
            <connectionWD id="0" preCellId="../CG3D_L5TuftIB/1/L5TuftedPyrIB" preSegmentId="121" preFractionAlong="0.192353020671" postCellId="../CG3D_L5TuftIB/0/L5TuftedPyrIB" postSegmentId="59" postFractionAlong="0.830753163919" weight="1." delay="0.05 ms"/>
            <connectionWD id="1" preCellId="../CG3D_L5TuftIB/1/L5TuftedPyrIB" preSegmentId="119" preFractionAlong="0.137920205094" postCellId="../CG3D_L5TuftIB/0/L5TuftedPyrIB" postSegmentId="71" postFractionAlong="0.246594993646" weight="1." delay="0.05 ms"/>
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        </projection>
        <projection id="Proj2syn0_CG3D_L5TuftIB_CG3D_L5TuftRS" presynapticPopulation="CG3D_L5TuftIB" postsynapticPopulation="CG3D_L5TuftRS" synapse="Syn_AMPA_L5IB_L5Pyr">
            <connectionWD id="0" preCellId="../CG3D_L5TuftIB/1/L5TuftedPyrIB" preSegmentId="120" preFractionAlong="0.038267533521" postCellId="../CG3D_L5TuftRS/0/L5TuftedPyrRS" postSegmentId="7" postFractionAlong="0.357775780504" weight="1." delay="0.05 ms"/>
            <connectionWD id="1" preCellId="../CG3D_L5TuftIB/1/L5TuftedPyrIB" preSegmentId="119" preFractionAlong="0.427228456981" postCellId="../CG3D_L5TuftRS/0/L5TuftedPyrRS" postSegmentId="7" postFractionAlong="0.943505693622" weight="1." delay="0.05 ms"/>
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        </projection>
        <projection id="Proj2syn1_CG3D_L5TuftIB_CG3D_L5TuftRS" presynapticPopulation="CG3D_L5TuftIB" postsynapticPopulation="CG3D_L5TuftRS" synapse="Syn_NMDA_L5IB_DeepPyr">
            <connectionWD id="0" preCellId="../CG3D_L5TuftIB/1/L5TuftedPyrIB" preSegmentId="120" preFractionAlong="0.038267533521" postCellId="../CG3D_L5TuftRS/0/L5TuftedPyrRS" postSegmentId="7" postFractionAlong="0.357775780504" weight="1." delay="0.05 ms"/>
            <connectionWD id="1" preCellId="../CG3D_L5TuftIB/1/L5TuftedPyrIB" preSegmentId="119" preFractionAlong="0.427228456981" postCellId="../CG3D_L5TuftRS/0/L5TuftedPyrRS" postSegmentId="7" postFractionAlong="0.943505693622" weight="1." delay="0.05 ms"/>
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        </projection>
        <projection id="Proj4syn0_CG3D_L5TuftIB_CG3D_L6NonTuftRS" presynapticPopulation="CG3D_L5TuftIB" postsynapticPopulation="CG3D_L6NonTuftRS" synapse="Syn_NMDA_L5IB_DeepPyr">
            <connectionWD id="0" preCellId="../CG3D_L5TuftIB/1/L5TuftedPyrIB" preSegmentId="120" preFractionAlong="0.07646664735" postCellId="../CG3D_L6NonTuftRS/0/L6NonTuftedPyrRS" postSegmentId="32" postFractionAlong="0.598381064498" weight="1." delay="0.05 ms"/>
            <connectionWD id="1" preCellId="../CG3D_L5TuftIB/1/L5TuftedPyrIB" preSegmentId="121" preFractionAlong="0.692077675352" postCellId="../CG3D_L6NonTuftRS/0/L6NonTuftedPyrRS" postSegmentId="19" postFractionAlong="0.520630691834" weight="1." delay="0.05 ms"/>
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        </projection>
        <projection id="Proj4syn1_CG3D_L5TuftIB_CG3D_L6NonTuftRS" presynapticPopulation="CG3D_L5TuftIB" postsynapticPopulation="CG3D_L6NonTuftRS" synapse="Syn_AMPA_L5IB_L6NT">
            <connectionWD id="0" preCellId="../CG3D_L5TuftIB/1/L5TuftedPyrIB" preSegmentId="120" preFractionAlong="0.07646664735" postCellId="../CG3D_L6NonTuftRS/0/L6NonTuftedPyrRS" postSegmentId="32" postFractionAlong="0.598381064498" weight="1." delay="0.05 ms"/>
            <connectionWD id="1" preCellId="../CG3D_L5TuftIB/1/L5TuftedPyrIB" preSegmentId="121" preFractionAlong="0.692077675352" postCellId="../CG3D_L6NonTuftRS/0/L6NonTuftedPyrRS" postSegmentId="19" postFractionAlong="0.520630691834" weight="1." delay="0.05 ms"/>
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        </projection>
        <projection id="Proj5syn0_CG3D_L5TuftIB_CG3D_L4SpinStell" presynapticPopulation="CG3D_L5TuftIB" postsynapticPopulation="CG3D_L4SpinStell" synapse="Syn_AMPA_L5IB_L4SS">
            <connectionWD id="0" preCellId="../CG3D_L5TuftIB/1/L5TuftedPyrIB" preSegmentId="118" preFractionAlong="0.0136999033644" postCellId="../CG3D_L4SpinStell/0/L4SpinyStellate" postSegmentId="92" postFractionAlong="0.936738090139" weight="1." delay="0.05 ms"/>
            <connectionWD id="1" preCellId="../CG3D_L5TuftIB/0/L5TuftedPyrIB" preSegmentId="120" preFractionAlong="0.417247005599" postCellId="../CG3D_L4SpinStell/0/L4SpinyStellate" postSegmentId="34" postFractionAlong="0.946490105296" weight="1." delay="0.05 ms"/>
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        </projection>
        <projection id="Proj5syn1_CG3D_L5TuftIB_CG3D_L4SpinStell" presynapticPopulation="CG3D_L5TuftIB" postsynapticPopulation="CG3D_L4SpinStell" synapse="Syn_NMDA_L5IB_L4SS">
            <connectionWD id="0" preCellId="../CG3D_L5TuftIB/1/L5TuftedPyrIB" preSegmentId="118" preFractionAlong="0.0136999033644" postCellId="../CG3D_L4SpinStell/0/L4SpinyStellate" postSegmentId="92" postFractionAlong="0.936738090139" weight="1." delay="0.05 ms"/>
            <connectionWD id="1" preCellId="../CG3D_L5TuftIB/0/L5TuftedPyrIB" preSegmentId="120" preFractionAlong="0.417247005599" postCellId="../CG3D_L4SpinStell/0/L4SpinyStellate" postSegmentId="34" postFractionAlong="0.946490105296" weight="1." delay="0.05 ms"/>
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        </projection>
        <projection id="Proj6syn0_CG3D_L5TuftIB_CG3D_L23PyrRS" presynapticPopulation="CG3D_L5TuftIB" postsynapticPopulation="CG3D_L23PyrRS" synapse="Syn_NMDA_L5IB_SupPyr">
            <connectionWD id="0" preCellId="../CG3D_L5TuftIB/0/L5TuftedPyrIB" preSegmentId="119" preFractionAlong="0.538272709649" postCellId="../CG3D_L23PyrRS/0/L23PyrRS" postSegmentId="82" postFractionAlong="0.078994668707" weight="1." delay="0.05 ms"/>
            <connectionWD id="1" preCellId="../CG3D_L5TuftIB/1/L5TuftedPyrIB" preSegmentId="118" preFractionAlong="0.222110827933" postCellId="../CG3D_L23PyrRS/0/L23PyrRS" postSegmentId="97" postFractionAlong="0.32781027631" weight="1." delay="0.05 ms"/>
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        </projection>
        <projection id="Proj6syn1_CG3D_L5TuftIB_CG3D_L23PyrRS" presynapticPopulation="CG3D_L5TuftIB" postsynapticPopulation="CG3D_L23PyrRS" synapse="Syn_AMPA_L5IB_SupPyr">
            <connectionWD id="0" preCellId="../CG3D_L5TuftIB/0/L5TuftedPyrIB" preSegmentId="119" preFractionAlong="0.538272709649" postCellId="../CG3D_L23PyrRS/0/L23PyrRS" postSegmentId="82" postFractionAlong="0.078994668707" weight="1." delay="0.05 ms"/>
            <connectionWD id="1" preCellId="../CG3D_L5TuftIB/1/L5TuftedPyrIB" preSegmentId="118" preFractionAlong="0.222110827933" postCellId="../CG3D_L23PyrRS/0/L23PyrRS" postSegmentId="97" postFractionAlong="0.32781027631" weight="1." delay="0.05 ms"/>
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        </projection>
        <projection id="Proj7syn0_CG3D_L5TuftRS_CG3D_L5TuftIB" presynapticPopulation="CG3D_L5TuftRS" postsynapticPopulation="CG3D_L5TuftIB" synapse="Syn_NMDA_L5RS_DeepPyr">
            <connectionWD id="0" preCellId="../CG3D_L5TuftRS/0/L5TuftedPyrRS" preSegmentId="120" preFractionAlong="0.805818681771" postCellId="../CG3D_L5TuftIB/0/L5TuftedPyrIB" postSegmentId="73" postFractionAlong="0.0376218150416" weight="1." delay="0.05 ms"/>
            <connectionWD id="1" preCellId="../CG3D_L5TuftRS/0/L5TuftedPyrRS" preSegmentId="120" preFractionAlong="0.585012191052" postCellId="../CG3D_L5TuftIB/0/L5TuftedPyrIB" postSegmentId="82" postFractionAlong="0.498120842078" weight="1." delay="0.05 ms"/>
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        </projection>
        <projection id="Proj7syn1_CG3D_L5TuftRS_CG3D_L5TuftIB" presynapticPopulation="CG3D_L5TuftRS" postsynapticPopulation="CG3D_L5TuftIB" synapse="Syn_AMPA_L5RS_L5Pyr">
            <connectionWD id="0" preCellId="../CG3D_L5TuftRS/0/L5TuftedPyrRS" preSegmentId="120" preFractionAlong="0.805818681771" postCellId="../CG3D_L5TuftIB/0/L5TuftedPyrIB" postSegmentId="73" postFractionAlong="0.0376218150416" weight="1." delay="0.05 ms"/>
            <connectionWD id="1" preCellId="../CG3D_L5TuftRS/0/L5TuftedPyrRS" preSegmentId="120" preFractionAlong="0.585012191052" postCellId="../CG3D_L5TuftIB/0/L5TuftedPyrIB" postSegmentId="82" postFractionAlong="0.498120842078" weight="1." delay="0.05 ms"/>
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        </projection>
        <projection id="Proj10syn0_CG3D_L5TuftRS_CG3D_L6NonTuftRS" presynapticPopulation="CG3D_L5TuftRS" postsynapticPopulation="CG3D_L6NonTuftRS" synapse="Syn_NMDA_L5RS_DeepPyr">
            <connectionWD id="0" preCellId="../CG3D_L5TuftRS/0/L5TuftedPyrRS" preSegmentId="121" preFractionAlong="0.660150101128" postCellId="../CG3D_L6NonTuftRS/0/L6NonTuftedPyrRS" postSegmentId="31" postFractionAlong="0.139972867208" weight="1." delay="0.05 ms"/>
            <connectionWD id="1" preCellId="../CG3D_L5TuftRS/0/L5TuftedPyrRS" preSegmentId="118" preFractionAlong="0.203238158745" postCellId="../CG3D_L6NonTuftRS/0/L6NonTuftedPyrRS" postSegmentId="35" postFractionAlong="0.208642251461" weight="1." delay="0.05 ms"/>
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        </projection>
        <projection id="Proj10syn1_CG3D_L5TuftRS_CG3D_L6NonTuftRS" presynapticPopulation="CG3D_L5TuftRS" postsynapticPopulation="CG3D_L6NonTuftRS" synapse="Syn_AMPA_L5RS_L6NT">
            <connectionWD id="0" preCellId="../CG3D_L5TuftRS/0/L5TuftedPyrRS" preSegmentId="121" preFractionAlong="0.660150101128" postCellId="../CG3D_L6NonTuftRS/0/L6NonTuftedPyrRS" postSegmentId="31" postFractionAlong="0.139972867208" weight="1." delay="0.05 ms"/>
            <connectionWD id="1" preCellId="../CG3D_L5TuftRS/0/L5TuftedPyrRS" preSegmentId="118" preFractionAlong="0.203238158745" postCellId="../CG3D_L6NonTuftRS/0/L6NonTuftedPyrRS" postSegmentId="35" postFractionAlong="0.208642251461" weight="1." delay="0.05 ms"/>
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        </projection>
        <projection id="Proj11syn0_CG3D_L5TuftRS_CG3D_L4SpinStell" presynapticPopulation="CG3D_L5TuftRS" postsynapticPopulation="CG3D_L4SpinStell" synapse="Syn_AMPA_L5RS_L4SS">
            <connectionWD id="0" preCellId="../CG3D_L5TuftRS/0/L5TuftedPyrRS" preSegmentId="120" preFractionAlong="0.57291240721" postCellId="../CG3D_L4SpinStell/0/L4SpinyStellate" postSegmentId="38" postFractionAlong="0.677189435865" weight="1." delay="0.05 ms"/>
            <connectionWD id="1" preCellId="../CG3D_L5TuftRS/0/L5TuftedPyrRS" preSegmentId="120" preFractionAlong="0.16959641959" postCellId="../CG3D_L4SpinStell/0/L4SpinyStellate" postSegmentId="41" postFractionAlong="0.7590256275" weight="1." delay="0.05 ms"/>
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        </projection>
        <projection id="Proj11syn1_CG3D_L5TuftRS_CG3D_L4SpinStell" presynapticPopulation="CG3D_L5TuftRS" postsynapticPopulation="CG3D_L4SpinStell" synapse="Syn_NMDA_L5RS_L4SS">
            <connectionWD id="0" preCellId="../CG3D_L5TuftRS/0/L5TuftedPyrRS" preSegmentId="120" preFractionAlong="0.57291240721" postCellId="../CG3D_L4SpinStell/0/L4SpinyStellate" postSegmentId="38" postFractionAlong="0.677189435865" weight="1." delay="0.05 ms"/>
            <connectionWD id="1" preCellId="../CG3D_L5TuftRS/0/L5TuftedPyrRS" preSegmentId="120" preFractionAlong="0.16959641959" postCellId="../CG3D_L4SpinStell/0/L4SpinyStellate" postSegmentId="41" postFractionAlong="0.7590256275" weight="1." delay="0.05 ms"/>
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        </projection>
        <projection id="Proj12syn0_CG3D_L5TuftRS_CG3D_L23PyrRS" presynapticPopulation="CG3D_L5TuftRS" postsynapticPopulation="CG3D_L23PyrRS" synapse="Syn_NMDA_L5RS_SupPyr">
            <connectionWD id="0" preCellId="../CG3D_L5TuftRS/0/L5TuftedPyrRS" preSegmentId="121" preFractionAlong="0.580607500156" postCellId="../CG3D_L23PyrRS/0/L23PyrRS" postSegmentId="102" postFractionAlong="0.281528164209" weight="1." delay="0.05 ms"/>
            <connectionWD id="1" preCellId="../CG3D_L5TuftRS/0/L5TuftedPyrRS" preSegmentId="119" preFractionAlong="0.925842193159" postCellId="../CG3D_L23PyrRS/0/L23PyrRS" postSegmentId="94" postFractionAlong="0.827526615396" weight="1." delay="0.05 ms"/>
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        </projection>
        <projection id="Proj12syn1_CG3D_L5TuftRS_CG3D_L23PyrRS" presynapticPopulation="CG3D_L5TuftRS" postsynapticPopulation="CG3D_L23PyrRS" synapse="Syn_AMPA_L5RS_SupPyr">
            <connectionWD id="0" preCellId="../CG3D_L5TuftRS/0/L5TuftedPyrRS" preSegmentId="121" preFractionAlong="0.580607500156" postCellId="../CG3D_L23PyrRS/0/L23PyrRS" postSegmentId="102" postFractionAlong="0.281528164209" weight="1." delay="0.05 ms"/>
            <connectionWD id="1" preCellId="../CG3D_L5TuftRS/0/L5TuftedPyrRS" preSegmentId="119" preFractionAlong="0.925842193159" postCellId="../CG3D_L23PyrRS/0/L23PyrRS" postSegmentId="94" postFractionAlong="0.827526615396" weight="1." delay="0.05 ms"/>
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        </projection>
        <projection id="Proj13syn0_CG3D_L6NonTuftRS_CG3D_L5TuftIB" presynapticPopulation="CG3D_L6NonTuftRS" postsynapticPopulation="CG3D_L5TuftIB" synapse="Syn_AMPA_L6NT_L5Pyr">
            <connectionWD id="0" preCellId="../CG3D_L6NonTuftRS/1/L6NonTuftedPyrRS" preSegmentId="94" preFractionAlong="0.958091953828" postCellId="../CG3D_L5TuftIB/0/L5TuftedPyrIB" postSegmentId="61" postFractionAlong="0.345001962133" weight="1." delay="0.05 ms"/>
            <connectionWD id="1" preCellId="../CG3D_L6NonTuftRS/0/L6NonTuftedPyrRS" preSegmentId="94" preFractionAlong="0.0284545602355" postCellId="../CG3D_L5TuftIB/0/L5TuftedPyrIB" postSegmentId="7" postFractionAlong="0.952266720322" weight="1." delay="0.05 ms"/>
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        </projection>
        <projection id="Proj13syn1_CG3D_L6NonTuftRS_CG3D_L5TuftIB" presynapticPopulation="CG3D_L6NonTuftRS" postsynapticPopulation="CG3D_L5TuftIB" synapse="Syn_NMDA_L6NT_DeepPyr">
            <connectionWD id="0" preCellId="../CG3D_L6NonTuftRS/1/L6NonTuftedPyrRS" preSegmentId="94" preFractionAlong="0.958091953828" postCellId="../CG3D_L5TuftIB/0/L5TuftedPyrIB" postSegmentId="61" postFractionAlong="0.345001962133" weight="1." delay="0.05 ms"/>
            <connectionWD id="1" preCellId="../CG3D_L6NonTuftRS/0/L6NonTuftedPyrRS" preSegmentId="94" preFractionAlong="0.0284545602355" postCellId="../CG3D_L5TuftIB/0/L5TuftedPyrIB" postSegmentId="7" postFractionAlong="0.952266720322" weight="1." delay="0.05 ms"/>
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        </projection>
        <projection id="Proj14syn0_CG3D_L6NonTuftRS_CG3D_L5TuftRS" presynapticPopulation="CG3D_L6NonTuftRS" postsynapticPopulation="CG3D_L5TuftRS" synapse="Syn_AMPA_L6NT_L5Pyr">
            <connectionWD id="0" preCellId="../CG3D_L6NonTuftRS/0/L6NonTuftedPyrRS" preSegmentId="98" preFractionAlong="0.366190843669" postCellId="../CG3D_L5TuftRS/0/L5TuftedPyrRS" postSegmentId="41" postFractionAlong="0.541998954303" weight="1." delay="0.05 ms"/>
            <connectionWD id="1" preCellId="../CG3D_L6NonTuftRS/0/L6NonTuftedPyrRS" preSegmentId="94" preFractionAlong="0.138265868552" postCellId="../CG3D_L5TuftRS/0/L5TuftedPyrRS" postSegmentId="44" postFractionAlong="0.530943879257" weight="1." delay="0.05 ms"/>
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        </projection>
        <projection id="Proj14syn1_CG3D_L6NonTuftRS_CG3D_L5TuftRS" presynapticPopulation="CG3D_L6NonTuftRS" postsynapticPopulation="CG3D_L5TuftRS" synapse="Syn_NMDA_L6NT_DeepPyr">
            <connectionWD id="0" preCellId="../CG3D_L6NonTuftRS/0/L6NonTuftedPyrRS" preSegmentId="98" preFractionAlong="0.366190843669" postCellId="../CG3D_L5TuftRS/0/L5TuftedPyrRS" postSegmentId="41" postFractionAlong="0.541998954303" weight="1." delay="0.05 ms"/>
            <connectionWD id="1" preCellId="../CG3D_L6NonTuftRS/0/L6NonTuftedPyrRS" preSegmentId="94" preFractionAlong="0.138265868552" postCellId="../CG3D_L5TuftRS/0/L5TuftedPyrRS" postSegmentId="44" postFractionAlong="0.530943879257" weight="1." delay="0.05 ms"/>
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        </projection>
        <projection id="Proj15syn0_CG3D_L6NonTuftRS_CG3D_L6NonTuftRS" presynapticPopulation="CG3D_L6NonTuftRS" postsynapticPopulation="CG3D_L6NonTuftRS" synapse="Syn_NMDA_L6NT_DeepPyr">
            <connectionWD id="0" preCellId="../CG3D_L6NonTuftRS/1/L6NonTuftedPyrRS" preSegmentId="95" preFractionAlong="0.935444829517" postCellId="../CG3D_L6NonTuftRS/0/L6NonTuftedPyrRS" postSegmentId="24" postFractionAlong="0.504136694083" weight="1." delay="0.05 ms"/>
            <connectionWD id="1" preCellId="../CG3D_L6NonTuftRS/1/L6NonTuftedPyrRS" preSegmentId="94" preFractionAlong="0.139670625852" postCellId="../CG3D_L6NonTuftRS/0/L6NonTuftedPyrRS" postSegmentId="85" postFractionAlong="0.383898223842" weight="1." delay="0.05 ms"/>
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        </projection>
        <projection id="Proj15syn1_CG3D_L6NonTuftRS_CG3D_L6NonTuftRS" presynapticPopulation="CG3D_L6NonTuftRS" postsynapticPopulation="CG3D_L6NonTuftRS" synapse="Syn_AMPA_L6NT_L6NT">
            <connectionWD id="0" preCellId="../CG3D_L6NonTuftRS/1/L6NonTuftedPyrRS" preSegmentId="95" preFractionAlong="0.935444829517" postCellId="../CG3D_L6NonTuftRS/0/L6NonTuftedPyrRS" postSegmentId="24" postFractionAlong="0.504136694083" weight="1." delay="0.05 ms"/>
            <connectionWD id="1" preCellId="../CG3D_L6NonTuftRS/1/L6NonTuftedPyrRS" preSegmentId="94" preFractionAlong="0.139670625852" postCellId="../CG3D_L6NonTuftRS/0/L6NonTuftedPyrRS" postSegmentId="85" postFractionAlong="0.383898223842" weight="1." delay="0.05 ms"/>
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        </projection>
        <projection id="Proj17syn0_CG3D_L6NonTuftRS_CG3D_L4SpinStell" presynapticPopulation="CG3D_L6NonTuftRS" postsynapticPopulation="CG3D_L4SpinStell" synapse="Syn_AMPA_L6NT_L4SS">
            <connectionWD id="0" preCellId="../CG3D_L6NonTuftRS/0/L6NonTuftedPyrRS" preSegmentId="99" preFractionAlong="0.759158373251" postCellId="../CG3D_L4SpinStell/0/L4SpinyStellate" postSegmentId="70" postFractionAlong="0.291798190207" weight="1." delay="0.05 ms"/>
            <connectionWD id="1" preCellId="../CG3D_L6NonTuftRS/1/L6NonTuftedPyrRS" preSegmentId="95" preFractionAlong="0.91963116374" postCellId="../CG3D_L4SpinStell/0/L4SpinyStellate" postSegmentId="89" postFractionAlong="0.563886588108" weight="1." delay="0.05 ms"/>
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        </projection>
        <projection id="Proj17syn1_CG3D_L6NonTuftRS_CG3D_L4SpinStell" presynapticPopulation="CG3D_L6NonTuftRS" postsynapticPopulation="CG3D_L4SpinStell" synapse="Syn_NMDA_L6NT_L4SS">
            <connectionWD id="0" preCellId="../CG3D_L6NonTuftRS/0/L6NonTuftedPyrRS" preSegmentId="99" preFractionAlong="0.759158373251" postCellId="../CG3D_L4SpinStell/0/L4SpinyStellate" postSegmentId="70" postFractionAlong="0.291798190207" weight="1." delay="0.05 ms"/>
            <connectionWD id="1" preCellId="../CG3D_L6NonTuftRS/1/L6NonTuftedPyrRS" preSegmentId="95" preFractionAlong="0.91963116374" postCellId="../CG3D_L4SpinStell/0/L4SpinyStellate" postSegmentId="89" postFractionAlong="0.563886588108" weight="1." delay="0.05 ms"/>
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        </projection>
        <projection id="Proj18syn0_CG3D_L6NonTuftRS_CG3D_L23PyrRS" presynapticPopulation="CG3D_L6NonTuftRS" postsynapticPopulation="CG3D_L23PyrRS" synapse="Syn_AMPA_L6NT_SupPyr">
            <connectionWD id="0" preCellId="../CG3D_L6NonTuftRS/1/L6NonTuftedPyrRS" preSegmentId="95" preFractionAlong="0.114270514753" postCellId="../CG3D_L23PyrRS/0/L23PyrRS" postSegmentId="80" postFractionAlong="0.396450806477" weight="1." delay="0.05 ms"/>
            <connectionWD id="1" preCellId="../CG3D_L6NonTuftRS/1/L6NonTuftedPyrRS" preSegmentId="94" preFractionAlong="0.304590489329" postCellId="../CG3D_L23PyrRS/0/L23PyrRS" postSegmentId="80" postFractionAlong="0.865657819641" weight="1." delay="0.05 ms"/>
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        </projection>
        <projection id="Proj18syn1_CG3D_L6NonTuftRS_CG3D_L23PyrRS" presynapticPopulation="CG3D_L6NonTuftRS" postsynapticPopulation="CG3D_L23PyrRS" synapse="Syn_NMDA_L6NT_SupPyr">
            <connectionWD id="0" preCellId="../CG3D_L6NonTuftRS/1/L6NonTuftedPyrRS" preSegmentId="95" preFractionAlong="0.114270514753" postCellId="../CG3D_L23PyrRS/0/L23PyrRS" postSegmentId="80" postFractionAlong="0.396450806477" weight="1." delay="0.05 ms"/>
            <connectionWD id="1" preCellId="../CG3D_L6NonTuftRS/1/L6NonTuftedPyrRS" preSegmentId="94" preFractionAlong="0.304590489329" postCellId="../CG3D_L23PyrRS/0/L23PyrRS" postSegmentId="80" postFractionAlong="0.865657819641" weight="1." delay="0.05 ms"/>
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        </projection>
        <projection id="Proj19syn0_CG3D_L4SpinStell_CG3D_L5TuftIB" presynapticPopulation="CG3D_L4SpinStell" postsynapticPopulation="CG3D_L5TuftIB" synapse="Syn_NMDA_L4SS_Pyr">
            <connectionWD id="0" preCellId="../CG3D_L4SpinStell/0/L4SpinyStellate" preSegmentId="116" preFractionAlong="0.666765690336" postCellId="../CG3D_L5TuftIB/0/L5TuftedPyrIB" postSegmentId="15" postFractionAlong="0.172813704443" weight="1." delay="0.05 ms"/>
            <connectionWD id="1" preCellId="../CG3D_L4SpinStell/0/L4SpinyStellate" preSegmentId="117" preFractionAlong="0.818508781084" postCellId="../CG3D_L5TuftIB/0/L5TuftedPyrIB" postSegmentId="82" postFractionAlong="0.590478976769" weight="1." delay="0.05 ms"/>
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        </projection>
        <projection id="Proj19syn1_CG3D_L4SpinStell_CG3D_L5TuftIB" presynapticPopulation="CG3D_L4SpinStell" postsynapticPopulation="CG3D_L5TuftIB" synapse="Syn_AMPA_L4SS_Pyr">
            <connectionWD id="0" preCellId="../CG3D_L4SpinStell/0/L4SpinyStellate" preSegmentId="116" preFractionAlong="0.666765690336" postCellId="../CG3D_L5TuftIB/0/L5TuftedPyrIB" postSegmentId="15" postFractionAlong="0.172813704443" weight="1." delay="0.05 ms"/>
            <connectionWD id="1" preCellId="../CG3D_L4SpinStell/0/L4SpinyStellate" preSegmentId="117" preFractionAlong="0.818508781084" postCellId="../CG3D_L5TuftIB/0/L5TuftedPyrIB" postSegmentId="82" postFractionAlong="0.590478976769" weight="1." delay="0.05 ms"/>
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        </projection>
        <projection id="Proj20syn0_CG3D_L4SpinStell_CG3D_L5TuftRS" presynapticPopulation="CG3D_L4SpinStell" postsynapticPopulation="CG3D_L5TuftRS" synapse="Syn_NMDA_L4SS_Pyr">
            <connectionWD id="0" preCellId="../CG3D_L4SpinStell/0/L4SpinyStellate" preSegmentId="117" preFractionAlong="0.726822624709" postCellId="../CG3D_L5TuftRS/0/L5TuftedPyrRS" postSegmentId="20" postFractionAlong="0.212596473065" weight="1." delay="0.05 ms"/>
            <connectionWD id="1" preCellId="../CG3D_L4SpinStell/0/L4SpinyStellate" preSegmentId="116" preFractionAlong="0.0813104062101" postCellId="../CG3D_L5TuftRS/0/L5TuftedPyrRS" postSegmentId="6" postFractionAlong="0.832641968071" weight="1." delay="0.05 ms"/>
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        </projection>
        <projection id="Proj20syn1_CG3D_L4SpinStell_CG3D_L5TuftRS" presynapticPopulation="CG3D_L4SpinStell" postsynapticPopulation="CG3D_L5TuftRS" synapse="Syn_AMPA_L4SS_Pyr">
            <connectionWD id="0" preCellId="../CG3D_L4SpinStell/0/L4SpinyStellate" preSegmentId="117" preFractionAlong="0.726822624709" postCellId="../CG3D_L5TuftRS/0/L5TuftedPyrRS" postSegmentId="20" postFractionAlong="0.212596473065" weight="1." delay="0.05 ms"/>
            <connectionWD id="1" preCellId="../CG3D_L4SpinStell/0/L4SpinyStellate" preSegmentId="116" preFractionAlong="0.0813104062101" postCellId="../CG3D_L5TuftRS/0/L5TuftedPyrRS" postSegmentId="6" postFractionAlong="0.832641968071" weight="1." delay="0.05 ms"/>
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        </projection>
        <projection id="Proj21syn0_CG3D_L4SpinStell_CG3D_L6NonTuftRS" presynapticPopulation="CG3D_L4SpinStell" postsynapticPopulation="CG3D_L6NonTuftRS" synapse="Syn_NMDA_L4SS_Pyr">
            <connectionWD id="0" preCellId="../CG3D_L4SpinStell/0/L4SpinyStellate" preSegmentId="112" preFractionAlong="0.42948676606" postCellId="../CG3D_L6NonTuftRS/0/L6NonTuftedPyrRS" postSegmentId="79" postFractionAlong="0.334149489851" weight="1." delay="0.05 ms"/>
            <connectionWD id="1" preCellId="../CG3D_L4SpinStell/0/L4SpinyStellate" preSegmentId="113" preFractionAlong="0.583084849195" postCellId="../CG3D_L6NonTuftRS/0/L6NonTuftedPyrRS" postSegmentId="75" postFractionAlong="0.348920765175" weight="1." delay="0.05 ms"/>
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        </projection>
        <projection id="Proj21syn1_CG3D_L4SpinStell_CG3D_L6NonTuftRS" presynapticPopulation="CG3D_L4SpinStell" postsynapticPopulation="CG3D_L6NonTuftRS" synapse="Syn_AMPA_L4SS_Pyr">
            <connectionWD id="0" preCellId="../CG3D_L4SpinStell/0/L4SpinyStellate" preSegmentId="112" preFractionAlong="0.42948676606" postCellId="../CG3D_L6NonTuftRS/0/L6NonTuftedPyrRS" postSegmentId="79" postFractionAlong="0.334149489851" weight="1." delay="0.05 ms"/>
            <connectionWD id="1" preCellId="../CG3D_L4SpinStell/0/L4SpinyStellate" preSegmentId="113" preFractionAlong="0.583084849195" postCellId="../CG3D_L6NonTuftRS/0/L6NonTuftedPyrRS" postSegmentId="75" postFractionAlong="0.348920765175" weight="1." delay="0.05 ms"/>
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        </projection>
        <projection id="Proj24syn0_CG3D_L4SpinStell_CG3D_L23PyrRS" presynapticPopulation="CG3D_L4SpinStell" postsynapticPopulation="CG3D_L23PyrRS" synapse="Syn_NMDA_L4SS_Pyr">
            <connectionWD id="0" preCellId="../CG3D_L4SpinStell/0/L4SpinyStellate" preSegmentId="116" preFractionAlong="0.69342577125" postCellId="../CG3D_L23PyrRS/0/L23PyrRS" postSegmentId="34" postFractionAlong="0.570175422017" weight="1." delay="0.05 ms"/>
            <connectionWD id="1" preCellId="../CG3D_L4SpinStell/0/L4SpinyStellate" preSegmentId="113" preFractionAlong="0.31722627525" postCellId="../CG3D_L23PyrRS/0/L23PyrRS" postSegmentId="26" postFractionAlong="0.0600478492324" weight="1." delay="0.05 ms"/>
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        </projection>
        <projection id="Proj24syn1_CG3D_L4SpinStell_CG3D_L23PyrRS" presynapticPopulation="CG3D_L4SpinStell" postsynapticPopulation="CG3D_L23PyrRS" synapse="Syn_AMPA_L4SS_Pyr">
            <connectionWD id="0" preCellId="../CG3D_L4SpinStell/0/L4SpinyStellate" preSegmentId="116" preFractionAlong="0.69342577125" postCellId="../CG3D_L23PyrRS/0/L23PyrRS" postSegmentId="34" postFractionAlong="0.570175422017" weight="1." delay="0.05 ms"/>
            <connectionWD id="1" preCellId="../CG3D_L4SpinStell/0/L4SpinyStellate" preSegmentId="113" preFractionAlong="0.31722627525" postCellId="../CG3D_L23PyrRS/0/L23PyrRS" postSegmentId="26" postFractionAlong="0.0600478492324" weight="1." delay="0.05 ms"/>
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        </projection>
        <projection id="Proj25syn0_CG3D_L23PyrRS_CG3D_L5TuftIB" presynapticPopulation="CG3D_L23PyrRS" postsynapticPopulation="CG3D_L5TuftIB" synapse="Syn_NMDA_SupPyr_L5Pyr">
            <connectionWD id="0" preCellId="../CG3D_L23PyrRS/2/L23PyrRS" preSegmentId="147" preFractionAlong="0.755293757622" postCellId="../CG3D_L5TuftIB/0/L5TuftedPyrIB" postSegmentId="90" postFractionAlong="0.406151875555" weight="1." delay="0.05 ms"/>
            <connectionWD id="1" preCellId="../CG3D_L23PyrRS/0/L23PyrRS" preSegmentId="142" preFractionAlong="0.363695485186" postCellId="../CG3D_L5TuftIB/0/L5TuftedPyrIB" postSegmentId="90" postFractionAlong="0.469309554595" weight="1." delay="0.05 ms"/>
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        </projection>
        <projection id="Proj25syn1_CG3D_L23PyrRS_CG3D_L5TuftIB" presynapticPopulation="CG3D_L23PyrRS" postsynapticPopulation="CG3D_L5TuftIB" synapse="Syn_AMPA_SupPyr_L5Pyr">
            <connectionWD id="0" preCellId="../CG3D_L23PyrRS/2/L23PyrRS" preSegmentId="147" preFractionAlong="0.755293757622" postCellId="../CG3D_L5TuftIB/0/L5TuftedPyrIB" postSegmentId="90" postFractionAlong="0.406151875555" weight="1." delay="0.05 ms"/>
            <connectionWD id="1" preCellId="../CG3D_L23PyrRS/0/L23PyrRS" preSegmentId="142" preFractionAlong="0.363695485186" postCellId="../CG3D_L5TuftIB/0/L5TuftedPyrIB" postSegmentId="90" postFractionAlong="0.469309554595" weight="1." delay="0.05 ms"/>
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        </projection>
        <projection id="Proj26syn0_CG3D_L23PyrRS_CG3D_L5TuftRS" presynapticPopulation="CG3D_L23PyrRS" postsynapticPopulation="CG3D_L5TuftRS" synapse="Syn_NMDA_SupPyr_L5Pyr">
            <connectionWD id="0" preCellId="../CG3D_L23PyrRS/1/L23PyrRS" preSegmentId="142" preFractionAlong="0.026495830077" postCellId="../CG3D_L5TuftRS/0/L5TuftedPyrRS" postSegmentId="81" postFractionAlong="0.768925604115" weight="1." delay="0.05 ms"/>
            <connectionWD id="1" preCellId="../CG3D_L23PyrRS/2/L23PyrRS" preSegmentId="146" preFractionAlong="0.566438516174" postCellId="../CG3D_L5TuftRS/0/L5TuftedPyrRS" postSegmentId="82" postFractionAlong="0.545333130592" weight="1." delay="0.05 ms"/>
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        </projection>
        <projection id="Proj26syn1_CG3D_L23PyrRS_CG3D_L5TuftRS" presynapticPopulation="CG3D_L23PyrRS" postsynapticPopulation="CG3D_L5TuftRS" synapse="Syn_AMPA_SupPyr_L5Pyr">
            <connectionWD id="0" preCellId="../CG3D_L23PyrRS/1/L23PyrRS" preSegmentId="142" preFractionAlong="0.026495830077" postCellId="../CG3D_L5TuftRS/0/L5TuftedPyrRS" postSegmentId="81" postFractionAlong="0.768925604115" weight="1." delay="0.05 ms"/>
            <connectionWD id="1" preCellId="../CG3D_L23PyrRS/2/L23PyrRS" preSegmentId="146" preFractionAlong="0.566438516174" postCellId="../CG3D_L5TuftRS/0/L5TuftedPyrRS" postSegmentId="82" postFractionAlong="0.545333130592" weight="1." delay="0.05 ms"/>
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        </projection>
        <projection id="Proj27syn0_CG3D_L23PyrRS_CG3D_L6NonTuftRS" presynapticPopulation="CG3D_L23PyrRS" postsynapticPopulation="CG3D_L6NonTuftRS" synapse="Syn_NMDA_SupPyr_L6NT">
            <connectionWD id="0" preCellId="../CG3D_L23PyrRS/1/L23PyrRS" preSegmentId="147" preFractionAlong="0.933266668401" postCellId="../CG3D_L6NonTuftRS/0/L6NonTuftedPyrRS" postSegmentId="80" postFractionAlong="0.153982433737" weight="1." delay="0.05 ms"/>
            <connectionWD id="1" preCellId="../CG3D_L23PyrRS/0/L23PyrRS" preSegmentId="143" preFractionAlong="0.739278414152" postCellId="../CG3D_L6NonTuftRS/0/L6NonTuftedPyrRS" postSegmentId="78" postFractionAlong="0.595528183774" weight="1." delay="0.05 ms"/>
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        </projection>
        <projection id="Proj27syn1_CG3D_L23PyrRS_CG3D_L6NonTuftRS" presynapticPopulation="CG3D_L23PyrRS" postsynapticPopulation="CG3D_L6NonTuftRS" synapse="Syn_AMPA_SupPyr_L6NT">
            <connectionWD id="0" preCellId="../CG3D_L23PyrRS/1/L23PyrRS" preSegmentId="147" preFractionAlong="0.933266668401" postCellId="../CG3D_L6NonTuftRS/0/L6NonTuftedPyrRS" postSegmentId="80" postFractionAlong="0.153982433737" weight="1." delay="0.05 ms"/>
            <connectionWD id="1" preCellId="../CG3D_L23PyrRS/0/L23PyrRS" preSegmentId="143" preFractionAlong="0.739278414152" postCellId="../CG3D_L6NonTuftRS/0/L6NonTuftedPyrRS" postSegmentId="78" postFractionAlong="0.595528183774" weight="1." delay="0.05 ms"/>
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        </projection>
        <projection id="Proj28syn0_CG3D_L23PyrRS_CG3D_L4SpinStell" presynapticPopulation="CG3D_L23PyrRS" postsynapticPopulation="CG3D_L4SpinStell" synapse="Syn_AMPA_SupPyr_L4SS">
            <connectionWD id="0" preCellId="../CG3D_L23PyrRS/0/L23PyrRS" preSegmentId="143" preFractionAlong="0.564807529204" postCellId="../CG3D_L4SpinStell/0/L4SpinyStellate" postSegmentId="86" postFractionAlong="0.67055157953" weight="1." delay="0.05 ms"/>
            <connectionWD id="1" preCellId="../CG3D_L23PyrRS/2/L23PyrRS" preSegmentId="142" preFractionAlong="0.823000308619" postCellId="../CG3D_L4SpinStell/0/L4SpinyStellate" postSegmentId="17" postFractionAlong="0.306341725795" weight="1." delay="0.05 ms"/>
            <connectionWD id="2" preCellId="../CG3D_L23PyrRS/1/L23PyrRS" preSegmentId="142" preFractionAlong="0.788600699079" postCellId="../CG3D_L4SpinStell/0/L4SpinyStellate" postSegmentId="67" postFractionAlong="0.835593432188" weight="1." delay="0.05 ms"/>
        </projection>
        <projection id="Proj28syn1_CG3D_L23PyrRS_CG3D_L4SpinStell" presynapticPopulation="CG3D_L23PyrRS" postsynapticPopulation="CG3D_L4SpinStell" synapse="Syn_NMDA_SupPyr_L4SS">
            <connectionWD id="0" preCellId="../CG3D_L23PyrRS/0/L23PyrRS" preSegmentId="143" preFractionAlong="0.564807529204" postCellId="../CG3D_L4SpinStell/0/L4SpinyStellate" postSegmentId="86" postFractionAlong="0.67055157953" weight="1." delay="0.05 ms"/>
            <connectionWD id="1" preCellId="../CG3D_L23PyrRS/2/L23PyrRS" preSegmentId="142" preFractionAlong="0.823000308619" postCellId="../CG3D_L4SpinStell/0/L4SpinyStellate" postSegmentId="17" postFractionAlong="0.306341725795" weight="1." delay="0.05 ms"/>
            <connectionWD id="2" preCellId="../CG3D_L23PyrRS/1/L23PyrRS" preSegmentId="142" preFractionAlong="0.788600699079" postCellId="../CG3D_L4SpinStell/0/L4SpinyStellate" postSegmentId="67" postFractionAlong="0.835593432188" weight="1." delay="0.05 ms"/>
        </projection>
        <projection id="Proj29syn0_CG3D_L23PyrRS_CG3D_L23PyrRS" presynapticPopulation="CG3D_L23PyrRS" postsynapticPopulation="CG3D_L23PyrRS" synapse="Syn_AMPA_SupPyr_SupPyr">
            <connectionWD id="0" preCellId="../CG3D_L23PyrRS/2/L23PyrRS" preSegmentId="142" preFractionAlong="0.0596113556678" postCellId="../CG3D_L23PyrRS/0/L23PyrRS" postSegmentId="55" postFractionAlong="0.0864300958514" weight="1." delay="0.05 ms"/>
            <connectionWD id="1" preCellId="../CG3D_L23PyrRS/1/L23PyrRS" preSegmentId="147" preFractionAlong="0.554967734631" postCellId="../CG3D_L23PyrRS/0/L23PyrRS" postSegmentId="3" postFractionAlong="0.404447673815" weight="1." delay="0.05 ms"/>
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        </projection>
        <projection id="Proj29syn1_CG3D_L23PyrRS_CG3D_L23PyrRS" presynapticPopulation="CG3D_L23PyrRS" postsynapticPopulation="CG3D_L23PyrRS" synapse="Syn_NMDA_SupPyr_SupPyr">
            <connectionWD id="0" preCellId="../CG3D_L23PyrRS/2/L23PyrRS" preSegmentId="142" preFractionAlong="0.0596113556678" postCellId="../CG3D_L23PyrRS/0/L23PyrRS" postSegmentId="55" postFractionAlong="0.0864300958514" weight="1." delay="0.05 ms"/>
            <connectionWD id="1" preCellId="../CG3D_L23PyrRS/1/L23PyrRS" preSegmentId="147" preFractionAlong="0.554967734631" postCellId="../CG3D_L23PyrRS/0/L23PyrRS" postSegmentId="3" postFractionAlong="0.404447673815" weight="1." delay="0.05 ms"/>
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        </projection>
        <inputList id="BackgroundL5_TO_CG3D_L5TuftIB_0_0" population="CG3D_L5TuftIB" component="BackgroundL5_TO_CG3D_L5TuftIB_PoiSyn0">
            <input id="0" target="../CG3D_L5TuftIB/0/L5TuftedPyrIB" destination="synapses" segmentId="48" fractionAlong="0.252271"/>
            <input id="1" target="../CG3D_L5TuftIB/0/L5TuftedPyrIB" destination="synapses" segmentId="87" fractionAlong="0.176231"/>
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        </inputList>
        <inputList id="EctopicStimL5IB_TO_CG3D_L5TuftIB_0_0" population="CG3D_L5TuftIB" component="EctopicStimL5IB_TO_CG3D_L5TuftIB_PoiSyn0">
            <input id="0" target="../CG3D_L5TuftIB/0/L5TuftedPyrIB" destination="synapses" segmentId="119" fractionAlong="0.500000"/>
            <input id="1" target="../CG3D_L5TuftIB/1/L5TuftedPyrIB" destination="synapses" segmentId="119" fractionAlong="0.500000"/>
        </inputList>
        <inputList id="DepCurr_L5IB_TO_CG3D_L5TuftIB_0_0" population="CG3D_L5TuftIB" component="DepCurr_L5IB_TO_CG3D_L5TuftIB_Pulse0_Cell1">
            <input id="0" target="../CG3D_L5TuftIB/1/L5TuftedPyrIB" destination="synapses" segmentId="0" fractionAlong="0.500000"/>
        </inputList>
        <inputList id="DepCurr_L5IB_TO_CG3D_L5TuftIB_1_0" population="CG3D_L5TuftIB" component="DepCurr_L5IB_TO_CG3D_L5TuftIB_Pulse0_Cell0">
            <input id="0" target="../CG3D_L5TuftIB/0/L5TuftedPyrIB" destination="synapses" segmentId="0" fractionAlong="0.500000"/>
        </inputList>
        <inputList id="DepCurr_L4SS_TO_CG3D_L4SpinStell_0_0" population="CG3D_L4SpinStell" component="DepCurr_L4SS_TO_CG3D_L4SpinStell_Pulse0_Cell0">
            <input id="0" target="../CG3D_L4SpinStell/0/L4SpinyStellate" destination="synapses" segmentId="0" fractionAlong="0.500000"/>
        </inputList>
        <inputList id="EctopicStimL6NT_TO_CG3D_L6NonTuftRS_0_0" population="CG3D_L6NonTuftRS" component="EctopicStimL6NT_TO_CG3D_L6NonTuftRS_PoiSyn0">
            <input id="0" target="../CG3D_L6NonTuftRS/1/L6NonTuftedPyrRS" destination="synapses" segmentId="95" fractionAlong="0.500000"/>
            <input id="1" target="../CG3D_L6NonTuftRS/0/L6NonTuftedPyrRS" destination="synapses" segmentId="95" fractionAlong="0.500000"/>
        </inputList>
        <inputList id="DepCurr_L6NT_TO_CG3D_L6NonTuftRS_0_0" population="CG3D_L6NonTuftRS" component="DepCurr_L6NT_TO_CG3D_L6NonTuftRS_Pulse0_Cell0">
            <input id="0" target="../CG3D_L6NonTuftRS/0/L6NonTuftedPyrRS" destination="synapses" segmentId="0" fractionAlong="0.500000"/>
        </inputList>
        <inputList id="DepCurr_L6NT_TO_CG3D_L6NonTuftRS_1_0" population="CG3D_L6NonTuftRS" component="DepCurr_L6NT_TO_CG3D_L6NonTuftRS_Pulse0_Cell1">
            <input id="0" target="../CG3D_L6NonTuftRS/1/L6NonTuftedPyrRS" destination="synapses" segmentId="0" fractionAlong="0.500000"/>
        </inputList>
        <inputList id="EctopicStimL5RS_TO_CG3D_L5TuftRS_0_0" population="CG3D_L5TuftRS" component="EctopicStimL5RS_TO_CG3D_L5TuftRS_PoiSyn0">
            <input id="0" target="../CG3D_L5TuftRS/0/L5TuftedPyrRS" destination="synapses" segmentId="119" fractionAlong="0.500000"/>
        </inputList>
        <inputList id="DepCurr_L5RS_TO_CG3D_L5TuftRS_0_0" population="CG3D_L5TuftRS" component="DepCurr_L5RS_TO_CG3D_L5TuftRS_Pulse0_Cell0">
            <input id="0" target="../CG3D_L5TuftRS/0/L5TuftedPyrRS" destination="synapses" segmentId="0" fractionAlong="0.500000"/>
        </inputList>
        <inputList id="DepCurr_L23RS_TO_CG3D_L23PyrRS_0_0" population="CG3D_L23PyrRS" component="DepCurr_L23RS_TO_CG3D_L23PyrRS_Pulse0_Cell2">
            <input id="0" target="../CG3D_L23PyrRS/2/L23PyrRS" destination="synapses" segmentId="0" fractionAlong="0.500000"/>
        </inputList>
        <inputList id="DepCurr_L23RS_TO_CG3D_L23PyrRS_1_0" population="CG3D_L23PyrRS" component="DepCurr_L23RS_TO_CG3D_L23PyrRS_Pulse0_Cell1">
            <input id="0" target="../CG3D_L23PyrRS/1/L23PyrRS" destination="synapses" segmentId="0" fractionAlong="0.500000"/>
        </inputList>
        <inputList id="DepCurr_L23RS_TO_CG3D_L23PyrRS_2_0" population="CG3D_L23PyrRS" component="DepCurr_L23RS_TO_CG3D_L23PyrRS_Pulse0_Cell0">
            <input id="0" target="../CG3D_L23PyrRS/0/L23PyrRS" destination="synapses" segmentId="0" fractionAlong="0.500000"/>
        </inputList>
        <inputList id="BackgroundL23RS_TO_CG3D_L23PyrRS_0_0" population="CG3D_L23PyrRS" component="BackgroundL23RS_TO_CG3D_L23PyrRS_PoiSyn0">
            <input id="0" target="../CG3D_L23PyrRS/2/L23PyrRS" destination="synapses" segmentId="35" fractionAlong="0.355825"/>
            <input id="1" target="../CG3D_L23PyrRS/2/L23PyrRS" destination="synapses" segmentId="5" fractionAlong="0.983199"/>
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        </inputList>
        <inputList id="EctopicStimL23RS_TO_CG3D_L23PyrRS_0_0" population="CG3D_L23PyrRS" component="EctopicStimL23RS_TO_CG3D_L23PyrRS_PoiSyn0">
            <input id="0" target="../CG3D_L23PyrRS/2/L23PyrRS" destination="synapses" segmentId="143" fractionAlong="0.500000"/>
            <input id="1" target="../CG3D_L23PyrRS/0/L23PyrRS" destination="synapses" segmentId="143" fractionAlong="0.500000"/>
            <input id="2" target="../CG3D_L23PyrRS/1/L23PyrRS" destination="synapses" segmentId="143" fractionAlong="0.500000"/>
        </inputList>
    </network>
</neuroml>
