<Lems>

    <!--

        This LEMS file has been automatically generated using PyNeuroML v0.1.13 (libNeuroML v0.2.19)

     -->

    <!-- Specify which component to run -->
    <Target component="Sim_Target"/>

    <!-- Include core NeuroML2 ComponentType definitions -->
    <Include file="Cells.xml"/>
    <Include file="Networks.xml"/>
    <Include file="Simulation.xml"/>

    <Include file="TCRFigA7_600.net.nml"/>
    <Include file="../channels/ar.channel.nml"/>
    <Include file="../channels/ar__m00_25.channel.nml"/>
    <Include file="../channels/ar__m00_25.channel.nml"/>
    <Include file="../channels/ar__m00_25.channel.nml"/>
    <Include file="../channels/cad.nml"/>
    <Include file="../channels/cad__beta0_02__phi52000.nml"/>
    <Include file="../channels/cad__beta0_05__phi104000.nml"/>
    <Include file="../channels/cal.channel.nml"/>
    <Include file="../channels/cat.channel.nml"/>
    <Include file="../channels/k2.channel.nml"/>
    <Include file="../channels/ka.channel.nml"/>
    <Include file="../channels/kahp_slower.channel.nml"/>
    <Include file="../channels/kc.channel.nml"/>
    <Include file="../channels/kdr.channel.nml"/>
    <Include file="../channels/km.channel.nml"/>
    <Include file="../channels/naf_tcr.channel.nml"/>
    <Include file="../channels/naf_tcr__shift_hnafmin7__shift_mnaf_initmin3__shift_mnaf_runmin2_5.channel.nml"/>
    <Include file="../channels/naf_tcr__shift_hnafmin7__shift_mnaf_initmin3__shift_mnaf_runmin2_5.channel.nml"/>
    <Include file="../channels/naf_tcr__shift_hnafmin7__shift_mnaf_initmin3__shift_mnaf_runmin2_5.channel.nml"/>
    <Include file="../channels/napf_tcr.channel.nml"/>
    <Include file="../channels/napf_tcr__a0__b0__c0__d0__fastNa_shift7.channel.nml"/>
    <Include file="../channels/napf_tcr__a0__b0__c0__d0__fastNa_shift7.channel.nml"/>
    <Include file="../channels/pas.channel.nml"/>
    <Include file="../cells/TCR.cell.nml"/>
    <Include file="../channels/ar__m00_25.channel.nml"/>
    <Include file="../channels/cad__beta0_02__phi52000.nml"/>
    <Include file="../channels/cad__beta0_05__phi104000.nml"/>
    <Include file="../channels/cal.channel.nml"/>
    <Include file="../channels/cat.channel.nml"/>
    <Include file="../channels/k2.channel.nml"/>
    <Include file="../channels/ka.channel.nml"/>
    <Include file="../channels/kahp_slower.channel.nml"/>
    <Include file="../channels/kc.channel.nml"/>
    <Include file="../channels/kdr.channel.nml"/>
    <Include file="../channels/km.channel.nml"/>
    <Include file="../channels/naf_tcr__shift_hnafmin7__shift_mnaf_initmin3__shift_mnaf_runmin2_5.channel.nml"/>
    <Include file="../channels/napf_tcr__a0__b0__c0__d0__fastNa_shift7.channel.nml"/>
    <Include file="../channels/pas.channel.nml"/>

    <Simulation id="Sim_Target" length="1500.0ms" step="0.01ms" target="Target" seed="12345">  <!-- Note seed: ensures same random numbers used every run -->

        <Display id="DispPop__CGTCR" title="Membrane potentials of cells in CGTCR" timeScale="1ms" xmin="-150.0" xmax="1650.0" ymin="-90" ymax="50">
            <Line id="CGTCR[0]: v" quantity="CGTCR/0/TCR/v" scale="1mV" color="#f7697f" timeScale="1ms"/>
        </Display>

        <OutputFile id="Volts_file__CGTCR" fileName="Sim_Target.CGTCR.v.dat">
            <OutputColumn id="v_CGTCR_0_TCR_v" quantity="CGTCR/0/TCR/v"/>
        </OutputFile>

    </Simulation>

</Lems>
