<Lems>

    <!--

        This LEMS file has been automatically generated using PyNeuroML v0.1.13 (libNeuroML v0.2.19)

     -->

    <!-- Specify which component to run -->
    <Target component="Sim_Target"/>

    <!-- Include core NeuroML2 ComponentType definitions -->
    <Include file="Cells.xml"/>
    <Include file="Networks.xml"/>
    <Include file="Simulation.xml"/>

    <Include file="supbaskFigA2a.net.nml"/>
    <Include file="../channels/ar.channel.nml"/>
    <Include file="../channels/ar__m00_25.channel.nml"/>
    <Include file="../channels/cad.nml"/>
    <Include file="../channels/cad__beta0_02__phi260000.nml"/>
    <Include file="../channels/cad__beta0_05__phi520000.nml"/>
    <Include file="../channels/cal.channel.nml"/>
    <Include file="../channels/cat.channel.nml"/>
    <Include file="../channels/k2.channel.nml"/>
    <Include file="../channels/ka.channel.nml"/>
    <Include file="../channels/kahp_slower.channel.nml"/>
    <Include file="../channels/kc_fast.channel.nml"/>
    <Include file="../channels/kdr_fs.channel.nml"/>
    <Include file="../channels/km.channel.nml"/>
    <Include file="../channels/naf2.channel.nml"/>
    <Include file="../channels/naf2__a0__b0__c0__d0__fastNa_shiftmin2_5.channel.nml"/>
    <Include file="../channels/naf2__a0__b0__c0__d0__fastNa_shiftmin2_5.channel.nml"/>
    <Include file="../channels/naf2__a0__b0__c0__d0__fastNa_shiftmin2_5.channel.nml"/>
    <Include file="../channels/nap.channel.nml"/>
    <Include file="../channels/pas.channel.nml"/>
    <Include file="../cells/SupBasket.cell.nml"/>
    <Include file="../channels/ar__m00_25.channel.nml"/>
    <Include file="../channels/cad__beta0_02__phi260000.nml"/>
    <Include file="../channels/cad__beta0_05__phi520000.nml"/>
    <Include file="../channels/cal.channel.nml"/>
    <Include file="../channels/cat.channel.nml"/>
    <Include file="../channels/k2.channel.nml"/>
    <Include file="../channels/ka.channel.nml"/>
    <Include file="../channels/kahp_slower.channel.nml"/>
    <Include file="../channels/kc_fast.channel.nml"/>
    <Include file="../channels/kdr_fs.channel.nml"/>
    <Include file="../channels/km.channel.nml"/>
    <Include file="../channels/naf2__a0__b0__c0__d0__fastNa_shiftmin2_5.channel.nml"/>
    <Include file="../channels/nap.channel.nml"/>
    <Include file="../channels/pas.channel.nml"/>

    <Simulation id="Sim_Target" length="300.0ms" step="0.005ms" target="Target" seed="12345">  <!-- Note seed: ensures same random numbers used every run -->

        <Display id="DispPop__CGsupbask" title="Membrane potentials of cells in CGsupbask" timeScale="1ms" xmin="-30.0" xmax="330.0" ymin="-90" ymax="50">
            <Line id="CGsupbask[0]: v" quantity="CGsupbask/0/SupBasket/v" scale="1mV" color="#f7697f" timeScale="1ms"/>
        </Display>

        <OutputFile id="Volts_file__CGsupbask" fileName="Sim_Target.CGsupbask.v.dat">
            <OutputColumn id="v_CGsupbask_0_SupBasket_v" quantity="CGsupbask/0/SupBasket/v"/>
        </OutputFile>

    </Simulation>

</Lems>
