<neuroml xmlns="http://www.neuroml.org/schema/neuroml2"  xmlns:xs="http://www.w3.org/2001/XMLSchema" xmlns:xsi="http://www.w3.org/2001/XMLSchema-instance" xsi:schemaLocation="http://www.neuroml.org/schema/neuroml2 https://raw.github.com/NeuroML/NeuroML2/development/Schemas/NeuroML2/NeuroML_v2beta4.xsd" id="Target">
    <notes>

Network structure (NeuroML 2beta4) for project: Thalamocortical saved with neuroConstruct v1.7.1 on: 11:38:35, 21-Jul-16

Cell Group: CGdeepLTS contains 1 cells

    </notes>
    <include href="../channels/ar.channel.nml"></include>
    <include href="../channels/ar__m00_25.channel.nml"></include>
    <include href="../channels/cad.nml"></include>
    <include href="../channels/cad__beta0_02__phi260000.nml"></include>
    <include href="../channels/cad__beta0_05__phi520000.nml"></include>
    <include href="../channels/cal.channel.nml"></include>
    <include href="../channels/cat_a.channel.nml"></include>
    <include href="../cells/DeepLTSInter.cell.nml"></include>
    <include href="../channels/k2.channel.nml"></include>
    <include href="../channels/ka.channel.nml"></include>
    <include href="../channels/kahp_slower.channel.nml"></include>
    <include href="../channels/kc_fast.channel.nml"></include>
    <include href="../channels/kdr_fs.channel.nml"></include>
    <include href="../channels/km.channel.nml"></include>
    <include href="../channels/naf2.channel.nml"></include>
    <include href="../channels/naf2__a0__b0__c0__d0__fastNa_shiftmin2_5.channel.nml"></include>
    <include href="../channels/naf2__a0__b0__c0__d0__fastNa_shiftmin2_5.channel.nml"></include>
    <include href="../channels/naf2__a0__b0__c0__d0__fastNa_shiftmin2_5.channel.nml"></include>
    <include href="../channels/nap.channel.nml"></include>
    <include href="../channels/pas.channel.nml"></include>
    <pulseGenerator id="Input_39" delay="100.0ms" duration="100.0ms" amplitude="4.0E-4uA"/>
    <pulseGenerator id="Input_38" delay="0.0ms" duration="100.0ms" amplitude="-1.0E-4uA"/>
    <network id="Target" type="networkWithTemperature" temperature="6.3 degC">
        <population id="CGdeepLTS" component="DeepLTSInter" size="1" type="populationList">
            <instance id="0">
                <location x="105.841933999999995" y="19.641500000000001" z="55.338721999999997"/>
            </instance>
        </population>
        <inputList id="Input_39" population="CGdeepLTS" component="Input_39">
            <input id="0" target="../CGdeepLTS/0/DeepLTSInter" destination="synapses"/>
        </inputList>
        <inputList id="Input_38" population="CGdeepLTS" component="Input_38">
            <input id="0" target="../CGdeepLTS/0/DeepLTSInter" destination="synapses"/>
        </inputList>
    </network>
</neuroml>
