<neuroml xmlns="http://www.neuroml.org/schema/neuroml2"  xmlns:xs="http://www.w3.org/2001/XMLSchema" xmlns:xsi="http://www.w3.org/2001/XMLSchema-instance" xsi:schemaLocation="http://www.neuroml.org/schema/neuroml2 https://raw.github.com/NeuroML/NeuroML2/development/Schemas/NeuroML2/NeuroML_v2beta4.xsd" id="Target">
    <notes>

Network structure (NeuroML 2beta4) for project: Thalamocortical saved with neuroConstruct v1.7.1 on: 11:28:05, 21-Jul-16

Cell Group: CGnontuftRS contains 1 cells

    </notes>
    <include href="../channels/ar.channel.nml"></include>
    <include href="../channels/ar__m00_25.channel.nml"></include>
    <include href="../channels/ar__m00_25.channel.nml"></include>
    <include href="../channels/cad.nml"></include>
    <include href="../channels/cad__beta0_01__phi13000.nml"></include>
    <include href="../channels/cad__beta0_05__phi65000.nml"></include>
    <include href="../channels/cal.channel.nml"></include>
    <include href="../channels/cat.channel.nml"></include>
    <include href="../channels/k2.channel.nml"></include>
    <include href="../channels/ka.channel.nml"></include>
    <include href="../channels/kahp_deeppyr.channel.nml"></include>
    <include href="../channels/kc.channel.nml"></include>
    <include href="../channels/kdr.channel.nml"></include>
    <include href="../channels/km.channel.nml"></include>
    <include href="../cells/L6NonTuftedPyrRS.cell.nml"></include>
    <include href="../channels/naf.channel.nml"></include>
    <include href="../channels/naf__a0__b0__c0__d0__fastNa_shiftmin3_5.channel.nml"></include>
    <include href="../channels/naf__a0__b0__c0__d0__fastNa_shiftmin3_5.channel.nml"></include>
    <include href="../channels/naf__a0__b0__c0__d0__fastNa_shiftmin3_5.channel.nml"></include>
    <include href="../channels/naf__a0__b0__c0__d0__fastNa_shiftmin3_5.channel.nml"></include>
    <include href="../channels/naf__a0__b0__c0__d0__fastNa_shiftmin3_5.channel.nml"></include>
    <include href="../channels/nap.channel.nml"></include>
    <include href="../channels/pas.channel.nml"></include>
    <pulseGenerator id="Input_30" delay="0.0ms" duration="300.0ms" amplitude="-2.5E-4uA"/>
    <pulseGenerator id="Input_30c" delay="300.0ms" duration="400.0ms" amplitude="0.001uA"/>
    <network id="Target" type="networkWithTemperature" temperature="6.3 degC">
        <population id="CGnontuftRS" component="L6NonTuftedPyrRS" size="1" type="populationList">
            <instance id="0">
                <location x="105.841933999999995" y="19.641500000000001" z="55.338721999999997"/>
            </instance>
        </population>
        <inputList id="Input_30" population="CGnontuftRS" component="Input_30">
            <input id="0" target="../CGnontuftRS/0/L6NonTuftedPyrRS" destination="synapses"/>
        </inputList>
        <inputList id="Input_30c" population="CGnontuftRS" component="Input_30c">
            <input id="0" target="../CGnontuftRS/0/L6NonTuftedPyrRS" destination="synapses"/>
        </inputList>
    </network>
</neuroml>
