<neuroml xmlns="http://www.neuroml.org/schema/neuroml2"  xmlns:xs="http://www.w3.org/2001/XMLSchema" xmlns:xsi="http://www.w3.org/2001/XMLSchema-instance" xsi:schemaLocation="http://www.neuroml.org/schema/neuroml2 https://raw.github.com/NeuroML/NeuroML2/development/Schemas/NeuroML2/NeuroML_v2beta4.xsd" id="Target">
    <notes>

Network structure (NeuroML 2beta4) for project: Thalamocortical saved with neuroConstruct v1.7.1 on: 11:23:33, 21-Jul-16

Cell Group: CGtuftIB contains 1 cells

    </notes>
    <include href="../channels/ar.channel.nml"></include>
    <include href="../channels/ar__m00_25.channel.nml"></include>
    <include href="../channels/ar__m00_25.channel.nml"></include>
    <include href="../channels/ar__m00_25.channel.nml"></include>
    <include href="../channels/cad.nml"></include>
    <include href="../channels/cad__beta0_01__phi4333_33.nml"></include>
    <include href="../channels/cad__beta0_02__phi86666_7.nml"></include>
    <include href="../channels/cad__beta0_075__phi86666_7.nml"></include>
    <include href="../channels/cal.channel.nml"></include>
    <include href="../channels/cat.channel.nml"></include>
    <include href="../channels/k2.channel.nml"></include>
    <include href="../channels/ka_ib.channel.nml"></include>
    <include href="../channels/kahp_deeppyr.channel.nml"></include>
    <include href="../channels/kc.channel.nml"></include>
    <include href="../channels/kdr.channel.nml"></include>
    <include href="../channels/km.channel.nml"></include>
    <include href="../cells/L5TuftedPyrIB.cell.nml"></include>
    <include href="../channels/naf.channel.nml"></include>
    <include href="../channels/naf__a0__b0__c0__d0__fastNa_shiftmin3_5.channel.nml"></include>
    <include href="../channels/naf__a0__b0__c0__d0__fastNa_shiftmin3_5.channel.nml"></include>
    <include href="../channels/naf__a0__b0__c0__d0__fastNa_shiftmin3_5.channel.nml"></include>
    <include href="../channels/naf__a0__b0__c0__d0__fastNa_shiftmin3_5.channel.nml"></include>
    <include href="../channels/naf__a0__b0__c0__d0__fastNa_shiftmin3_5.channel.nml"></include>
    <include href="../channels/naf__a0__b0__c0__d0__fastNa_shiftmin3_5.channel.nml"></include>
    <include href="../channels/nap.channel.nml"></include>
    <include href="../channels/pas.channel.nml"></include>
    <pulseGenerator id="Input_24_1" delay="0.0ms" duration="200.0ms" amplitude="-2.0E-4uA"/>
    <pulseGenerator id="Input_24c" delay="200.0ms" duration="400.0ms" amplitude="0.0013uA"/>
    <network id="Target" type="networkWithTemperature" temperature="6.3 degC">
        <population id="CGtuftIB" component="L5TuftedPyrIB" size="1" type="populationList">
            <instance id="0">
                <location x="88.862319999999997" y="11.026585000000001" z="48.060738000000001"/>
            </instance>
        </population>
        <inputList id="Input_24_1" population="CGtuftIB" component="Input_24_1">
            <input id="0" target="../CGtuftIB/0/L5TuftedPyrIB" destination="synapses"/>
        </inputList>
        <inputList id="Input_24c" population="CGtuftIB" component="Input_24c">
            <input id="0" target="../CGtuftIB/0/L5TuftedPyrIB" destination="synapses"/>
        </inputList>
    </network>
</neuroml>
