<?xml version="1.0" encoding="UTF-8"?>
<networkml xmlns="http://morphml.org/networkml/schema" xmlns:meta="http://morphml.org/metadata/schema" xmlns:xsi="http://www.w3.org/2001/XMLSchema-instance" xsi:schemaLocation="http://morphml.org/networkml/schema  http://www.neuroml.org/NeuroMLValidator/NeuroMLFiles/Schemata/v1.8.1/Level3/NetworkML_v1.8.1.xsd" lengthUnits="micrometer">

<meta:notes>

Network structure (NeuroML 1.x) for project: Thalamocortical saved with neuroConstruct v1.6.1 on: 18:57:00, 15-Nov-12

Cell Group: CG_C04_RS_sm contains 20 cells
Cell Group: CG_C04_AxAx_sm contains 10 cells
Cell Group: CG_C04_Bask_sm contains 10 cells
Cell Group: CG_C04_LTS_sm contains 10 cells
Cell Group: CG_C04_FRB_sm contains 6 cells

Network connection: RS_RS_gap_sm contains 24 individual synaptic connections
Network connection: AxAx_AxAx_gap_sm contains 20 individual synaptic connections
Network connection: LTS_AxAx_sm contains 200 individual synaptic connections
Network connection: Bask_FRB_sm contains 120 individual synaptic connections
Network connection: Bask_Bask_gap_sm contains 20 individual synaptic connections
Network connection: Bask_Bask_sm contains 200 individual synaptic connections
Network connection: LTS_RS_sm contains 1200 individual synaptic connections
Network connection: Bask_RS_sm contains 400 individual synaptic connections
Network connection: LTS_LTS_gap_sm contains 20 individual synaptic connections
Network connection: Bask_AxAx_sm contains 200 individual synaptic connections
Network connection: FRB_LTS_sm contains 100 individual synaptic connections
Network connection: AxAx_FRB_sm contains 120 individual synaptic connections
Network connection: RS_Bask_sm contains 900 individual synaptic connections
Network connection: FRB_RS_gap_sm contains 8 individual synaptic connections
Network connection: RS_AxAx_sm contains 900 individual synaptic connections
Network connection: FRB_Bask_sm contains 100 individual synaptic connections
Network connection: LTS_Pyr_sm contains 360 individual synaptic connections
Network connection: RS_LTS_sm contains 900 individual synaptic connections
Network connection: LTS_LTS_sm contains 200 individual synaptic connections
Network connection: Bask_LTS_sm contains 200 individual synaptic connections
Network connection: FRB_FRB_sm contains 30 individual synaptic connections
Network connection: FRB_RS_sm contains 100 individual synaptic connections
Network connection: AxAx_RS_sm contains 400 individual synaptic connections
Network connection: LTS_Bask_sm contains 200 individual synaptic connections
Network connection: FRB_AxAx_sm contains 100 individual synaptic connections
Network connection: RS_FRB_sm contains 270 individual synaptic connections
Network connection: RS_RS_sm contains 900 individual synaptic connections

</meta:notes>

<meta:properties>
    <meta:property tag="neuroConstruct_random_seed" value="214070497"/>

    <meta:property tag="neuroConstruct_sim_config" value="CunninghamEtAl04_small"/>

    <meta:property tag="neuroConstruct_sim_duration" value="500.0"/>

    <meta:property tag="neuroConstruct_sim_time_step" value="0.025"/>

    <meta:property tag="neuroConstruct_temperature" value="6.3"/>
</meta:properties>

        <populations>
    <population name="CG_C04_RS_sm" cell_type="L23PyrRS">
        <meta:properties>

        </meta:properties>
        <instances size="20">
            <instance id="0">
                <location x="-89.91492" y="-717.01624" z="551.12695"/>
            </instance>
            <instance id="1">
                <location x="-551.7483" y="-646.0416" z="612.3638"/>
            </instance>
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        </instances>
    </population>
    <population name="CG_C04_AxAx_sm" cell_type="SupAxAx">
        <meta:properties>

        </meta:properties>
        <instances size="10">
            <instance id="0">
                <location x="1023.83984" y="-665.4149" z="350.65466"/>
            </instance>
            <instance id="1">
                <location x="-1047.5491" y="-754.9961" z="349.69482"/>
            </instance>
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        </instances>
    </population>
    <population name="CG_C04_Bask_sm" cell_type="SupBasket">
        <meta:properties>

        </meta:properties>
        <instances size="10">
            <instance id="0">
                <location x="602.20605" y="-867.3182" z="1006.1543"/>
            </instance>
            <instance id="1">
                <location x="-455.52344" y="-639.2359" z="-546.1355"/>
            </instance>
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        </instances>
    </population>
    <population name="CG_C04_LTS_sm" cell_type="SupLTSInter">
        <meta:properties>

        </meta:properties>
        <instances size="10">
            <instance id="0">
                <location x="-475.771" y="-819.88275" z="1390.365"/>
            </instance>
            <instance id="1">
                <location x="977.6504" y="-831.8044" z="442.8413"/>
            </instance>
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        </instances>
    </population>
    <population name="CG_C04_FRB_sm" cell_type="L23PyrFRB_varInit">
        <meta:properties>

        </meta:properties>
        <instances size="6">
            <instance id="0">
                <location x="-109.832886" y="-855.5455" z="331.1859"/>
            </instance>
            <instance id="1">
                <location x="1407.1934" y="-657.9603" z="-100.17981"/>
            </instance>
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        </instances>
    </population>
</populations>

        <projections units="Physiological Units">
    <projection name="RS_RS_gap_sm" source="CG_C04_RS_sm" target="CG_C04_RS_sm">
        <synapse_props synapse_type="GapJuncCML" internal_delay="0.0" weight="0.7" threshold="0.0">
        </synapse_props>
        <connections size="24">
            <connection id="0" pre_cell_id="0" pre_segment_id="142" pre_fraction_along="0.08217337" post_cell_id="6" post_segment_id="146" post_fraction_along="0.6616763">
            </connection>
            <connection id="1" pre_cell_id="1" pre_segment_id="147" pre_fraction_along="0.3839931" post_cell_id="7" post_segment_id="146" post_fraction_along="0.7246069">
            </connection>
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        </connections>
    </projection>
    <projection name="AxAx_AxAx_gap_sm" source="CG_C04_AxAx_sm" target="CG_C04_AxAx_sm">
        <synapse_props synapse_type="GapJuncFS" internal_delay="0.0" weight="0.7" threshold="0.0">
        </synapse_props>
        <connections size="20">
            <connection id="0" pre_cell_id="0" pre_segment_id="60" pre_fraction_along="0.27716216" post_cell_id="2" post_segment_id="12" post_fraction_along="0.19816826">
            </connection>
            <connection id="1" pre_cell_id="0" pre_segment_id="10" pre_fraction_along="0.7115631" post_cell_id="9" post_segment_id="11" post_fraction_along="0.38632113">
            </connection>
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        </connections>
    </projection>
    <projection name="LTS_AxAx_sm" source="CG_C04_LTS_sm" target="CG_C04_AxAx_sm">
        <synapse_props synapse_type="Inh_LTS_FS" internal_delay="0.0" weight="1.0" threshold="0.0">
        </synapse_props>
        <connections size="200">
            <connection id="0" pre_cell_id="9" pre_segment_id="113" pre_fraction_along="0.7280189" post_cell_id="0" post_segment_id="7" post_fraction_along="0.3381287">
            </connection>
            <connection id="1" pre_cell_id="4" pre_segment_id="116" pre_fraction_along="0.49022433" post_cell_id="0" post_segment_id="84" post_fraction_along="0.97353953">
            </connection>
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        </connections>
    </projection>
    <projection name="Bask_FRB_sm" source="CG_C04_Bask_sm" target="CG_C04_FRB_sm">
        <synapse_props synapse_type="Inh_Bask_Pyr" internal_delay="0.0" weight="1.0" threshold="0.0">
        </synapse_props>
        <connections size="120">
            <connection id="0" pre_cell_id="9" pre_segment_id="113" pre_fraction_along="0.52739716" post_cell_id="0" post_segment_id="5" post_fraction_along="0.121168286">
            </connection>
            <connection id="1" pre_cell_id="3" pre_segment_id="113" pre_fraction_along="0.94690454" post_cell_id="0" post_segment_id="17" post_fraction_along="0.68510467">
            </connection>
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        </connections>
    </projection>
    <projection name="Bask_Bask_gap_sm" source="CG_C04_Bask_sm" target="CG_C04_Bask_sm">
        <synapse_props synapse_type="GapJuncFS" internal_delay="0.0" weight="0.7" threshold="0.0">
        </synapse_props>
        <connections size="20">
            <connection id="0" pre_cell_id="0" pre_segment_id="35" pre_fraction_along="0.39371008" post_cell_id="6" post_segment_id="34" post_fraction_along="0.2374115">
            </connection>
            <connection id="1" pre_cell_id="0" pre_segment_id="8" pre_fraction_along="0.73498535" post_cell_id="4" post_segment_id="12" post_fraction_along="0.25577286">
            </connection>
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        </connections>
    </projection>
    <projection name="Bask_Bask_sm" source="CG_C04_Bask_sm" target="CG_C04_Bask_sm">
        <synapse_props synapse_type="Inh_Bask_FS" internal_delay="0.0" weight="1.0" threshold="0.0">
        </synapse_props>
        <connections size="200">
            <connection id="0" pre_cell_id="8" pre_fraction_along="0.013685942" post_cell_id="0" post_segment_id="80" post_fraction_along="0.49373665">
            </connection>
            <connection id="1" pre_cell_id="5" pre_segment_id="1" pre_fraction_along="0.86312807" post_cell_id="0" post_segment_id="80" post_fraction_along="0.41812524">
            </connection>
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        </connections>
    </projection>
    <projection name="LTS_RS_sm" source="CG_C04_LTS_sm" target="CG_C04_RS_sm">
        <synapse_props synapse_type="Inh_LTS_Pyr" internal_delay="0.0" weight="1.0" threshold="0.0">
        </synapse_props>
        <connections size="1200">
            <connection id="0" pre_cell_id="9" pre_segment_id="112" pre_fraction_along="0.95250386" post_cell_id="0" post_segment_id="78" post_fraction_along="0.7887573">
            </connection>
            <connection id="1" pre_cell_id="5" pre_segment_id="117" pre_fraction_along="0.6470102" post_cell_id="0" post_segment_id="103" post_fraction_along="0.10099251">
            </connection>
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        </connections>
    </projection>
    <projection name="Bask_RS_sm" source="CG_C04_Bask_sm" target="CG_C04_RS_sm">
        <synapse_props synapse_type="Inh_Bask_Pyr" internal_delay="0.0" weight="1.0" threshold="0.0">
        </synapse_props>
        <connections size="400">
            <connection id="0" pre_cell_id="0" pre_segment_id="113" pre_fraction_along="0.47778738" post_cell_id="0" post_segment_id="17" post_fraction_along="0.5144882">
            </connection>
            <connection id="1" pre_cell_id="8" pre_segment_id="117" pre_fraction_along="0.45063937" post_cell_id="0" post_segment_id="74" post_fraction_along="0.8339621">
            </connection>
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        </connections>
    </projection>
    <projection name="LTS_LTS_gap_sm" source="CG_C04_LTS_sm" target="CG_C04_LTS_sm">
        <synapse_props synapse_type="GapJuncLTS" internal_delay="0.0" weight="0.7" threshold="0.0">
        </synapse_props>
        <connections size="20">
            <connection id="0" pre_cell_id="0" pre_segment_id="12" pre_fraction_along="0.71869695" post_cell_id="9" post_segment_id="13" post_fraction_along="0.5135547">
            </connection>
            <connection id="1" pre_cell_id="0" pre_segment_id="60" pre_fraction_along="0.21854858" post_cell_id="8" post_segment_id="91" post_fraction_along="0.9094718">
            </connection>
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        </connections>
    </projection>
    <projection name="Bask_AxAx_sm" source="CG_C04_Bask_sm" target="CG_C04_AxAx_sm">
        <synapse_props synapse_type="Inh_Bask_FS" internal_delay="0.0" weight="1.0" threshold="0.0">
        </synapse_props>
        <connections size="200">
            <connection id="0" pre_cell_id="3" pre_segment_id="1" pre_fraction_along="0.37301177" post_cell_id="0" post_segment_id="3" post_fraction_along="0.88206637">
            </connection>
            <connection id="1" pre_cell_id="6" pre_fraction_along="0.32128167" post_cell_id="0" post_segment_id="54" post_fraction_along="0.66797334">
            </connection>
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        </connections>
    </projection>
    <projection name="FRB_LTS_sm" source="CG_C04_FRB_sm" target="CG_C04_LTS_sm">
        <synapse_props synapse_type="Exc_Pyr_Int" internal_delay="0.0" weight="1.0" threshold="0.0">
        </synapse_props>
        <connections size="100">
            <connection id="0" pre_cell_id="1" pre_segment_id="142" pre_fraction_along="0.46097916" post_cell_id="0" post_segment_id="7" post_fraction_along="0.5809693">
            </connection>
            <connection id="1" pre_cell_id="4" pre_segment_id="143" pre_fraction_along="0.49176684" post_cell_id="0" post_segment_id="94" post_fraction_along="0.58538234">
            </connection>
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        </connections>
    </projection>
    <projection name="AxAx_FRB_sm" source="CG_C04_AxAx_sm" target="CG_C04_FRB_sm">
        <synapse_props synapse_type="Inh_Axo_Pyr" internal_delay="0.0" weight="1.0" threshold="0.0">
        </synapse_props>
        <connections size="120">
            <connection id="0" pre_cell_id="8" pre_segment_id="117" pre_fraction_along="0.9845875" post_cell_id="0" post_segment_id="136" post_fraction_along="0.74303377">
            </connection>
            <connection id="1" pre_cell_id="1" pre_segment_id="117" pre_fraction_along="0.30443317" post_cell_id="0" post_segment_id="137" post_fraction_along="0.8471178">
            </connection>
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        </connections>
    </projection>
    <projection name="RS_Bask_sm" source="CG_C04_RS_sm" target="CG_C04_Bask_sm">
        <synapse_props synapse_type="Exc_Pyr_Int" internal_delay="0.0" weight="1.0" threshold="0.0">
        </synapse_props>
        <connections size="900">
            <connection id="0" pre_cell_id="14" pre_segment_id="147" pre_fraction_along="0.8230807" post_cell_id="0" post_segment_id="81" post_fraction_along="0.8010847">
            </connection>
            <connection id="1" pre_cell_id="4" pre_segment_id="147" pre_fraction_along="0.730669" post_cell_id="0" post_segment_id="55" post_fraction_along="0.1468277">
            </connection>
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        </connections>
    </projection>
    <projection name="FRB_RS_gap_sm" source="CG_C04_FRB_sm" target="CG_C04_RS_sm">
        <synapse_props synapse_type="GapJuncCML" internal_delay="0.0" weight="0.7" threshold="0.0">
        </synapse_props>
        <connections size="8">
            <connection id="0" pre_cell_id="0" pre_segment_id="142" pre_fraction_along="0.18484427" post_cell_id="18" post_segment_id="143" post_fraction_along="0.8169379">
            </connection>
            <connection id="1" pre_cell_id="0" pre_segment_id="143" pre_fraction_along="0.7199029" post_cell_id="13" post_segment_id="146" post_fraction_along="0.039193377">
            </connection>
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        </connections>
    </projection>
    <projection name="RS_AxAx_sm" source="CG_C04_RS_sm" target="CG_C04_AxAx_sm">
        <synapse_props synapse_type="Exc_Pyr_Int" internal_delay="0.0" weight="1.0" threshold="0.0">
        </synapse_props>
        <connections size="900">
            <connection id="0" pre_cell_id="8" pre_segment_id="142" pre_fraction_along="0.50068915" post_cell_id="0" post_segment_id="20" post_fraction_along="0.34354606">
            </connection>
            <connection id="1" pre_cell_id="6" pre_segment_id="146" pre_fraction_along="0.20881647" post_cell_id="0" post_segment_id="3" post_fraction_along="0.3844536">
            </connection>
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        </connections>
    </projection>
    <projection name="FRB_Bask_sm" source="CG_C04_FRB_sm" target="CG_C04_Bask_sm">
        <synapse_props synapse_type="Exc_Pyr_Int" internal_delay="0.0" weight="1.0" threshold="0.0">
        </synapse_props>
        <connections size="100">
            <connection id="0" pre_cell_id="5" pre_segment_id="143" pre_fraction_along="0.70640284" post_cell_id="0" post_segment_id="70" post_fraction_along="0.5854391">
            </connection>
            <connection id="1" pre_cell_id="2" pre_segment_id="147" pre_fraction_along="0.80030686" post_cell_id="0" post_segment_id="59" post_fraction_along="0.36098883">
            </connection>
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        </connections>
    </projection>
    <projection name="LTS_Pyr_sm" source="CG_C04_LTS_sm" target="CG_C04_FRB_sm">
        <synapse_props synapse_type="Inh_LTS_Pyr" internal_delay="0.0" weight="1.0" threshold="0.0">
        </synapse_props>
        <connections size="360">
            <connection id="0" pre_cell_id="7" pre_segment_id="112" pre_fraction_along="0.15726075" post_cell_id="0" post_segment_id="36" post_fraction_along="0.36613405">
            </connection>
            <connection id="1" pre_cell_id="5" pre_segment_id="112" pre_fraction_along="0.099931635" post_cell_id="0" post_segment_id="36" post_fraction_along="0.22736481">
            </connection>
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        </connections>
    </projection>
    <projection name="RS_LTS_sm" source="CG_C04_RS_sm" target="CG_C04_LTS_sm">
        <synapse_props synapse_type="Exc_Pyr_Int" internal_delay="0.0" weight="1.0" threshold="0.0">
        </synapse_props>
        <connections size="900">
            <connection id="0" pre_cell_id="10" pre_segment_id="146" pre_fraction_along="0.09161088" post_cell_id="0" post_segment_id="7" post_fraction_along="0.7649064">
            </connection>
            <connection id="1" pre_cell_id="5" pre_segment_id="142" pre_fraction_along="0.24237818" post_cell_id="0" post_segment_id="40" post_fraction_along="0.18024968">
            </connection>
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        </connections>
    </projection>
    <projection name="LTS_LTS_sm" source="CG_C04_LTS_sm" target="CG_C04_LTS_sm">
        <synapse_props synapse_type="Inh_LTS_LTS" internal_delay="0.0" weight="1.0" threshold="0.0">
        </synapse_props>
        <connections size="200">
            <connection id="0" pre_cell_id="9" pre_segment_id="116" pre_fraction_along="0.0140497405" post_cell_id="0" post_segment_id="86" post_fraction_along="0.797139">
            </connection>
            <connection id="1" pre_cell_id="5" pre_segment_id="116" pre_fraction_along="0.50918925" post_cell_id="0" post_segment_id="31" post_fraction_along="0.18057938">
            </connection>
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        </connections>
    </projection>
    <projection name="Bask_LTS_sm" source="CG_C04_Bask_sm" target="CG_C04_LTS_sm">
        <synapse_props synapse_type="Inh_Bask_LTS" internal_delay="0.0" weight="1.0" threshold="0.0">
        </synapse_props>
        <connections size="200">
            <connection id="0" pre_cell_id="6" pre_segment_id="113" pre_fraction_along="0.33446202" post_cell_id="0" post_segment_id="33" post_fraction_along="0.5615752">
            </connection>
            <connection id="1" pre_cell_id="4" pre_segment_id="112" pre_fraction_along="0.25492328" post_cell_id="0" post_segment_id="61" post_fraction_along="0.16014847">
            </connection>
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        </connections>
    </projection>
    <projection name="FRB_FRB_sm" source="CG_C04_FRB_sm" target="CG_C04_FRB_sm">
        <synapse_props synapse_type="Exc_Pyr_Pyr" internal_delay="0.0" weight="1.0" threshold="0.0">
        </synapse_props>
        <connections size="30">
            <connection id="0" pre_cell_id="5" pre_segment_id="143" pre_fraction_along="0.92935413" post_cell_id="0" post_segment_id="36" post_fraction_along="0.5801327">
            </connection>
            <connection id="1" pre_cell_id="1" pre_segment_id="143" pre_fraction_along="0.69877696" post_cell_id="0" post_segment_id="54" post_fraction_along="0.21836476">
            </connection>
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        </connections>
    </projection>
    <projection name="FRB_RS_sm" source="CG_C04_FRB_sm" target="CG_C04_RS_sm">
        <synapse_props synapse_type="Exc_Pyr_Pyr" internal_delay="0.0" weight="1.0" threshold="0.0">
        </synapse_props>
        <connections size="100">
            <connection id="0" pre_cell_id="2" pre_segment_id="147" pre_fraction_along="0.48409352" post_cell_id="0" post_segment_id="65" post_fraction_along="0.27358153">
            </connection>
            <connection id="1" pre_cell_id="3" pre_segment_id="142" pre_fraction_along="0.33976123" post_cell_id="0" post_segment_id="39" post_fraction_along="0.09371887">
            </connection>
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        </connections>
    </projection>
    <projection name="AxAx_RS_sm" source="CG_C04_AxAx_sm" target="CG_C04_RS_sm">
        <synapse_props synapse_type="Inh_Axo_Pyr" internal_delay="0.0" weight="1.0" threshold="0.0">
        </synapse_props>
        <connections size="400">
            <connection id="0" pre_cell_id="8" pre_segment_id="116" pre_fraction_along="0.8561749" post_cell_id="0" post_segment_id="137" post_fraction_along="0.43653458">
            </connection>
            <connection id="1" pre_cell_id="6" pre_segment_id="113" pre_fraction_along="0.79331833" post_cell_id="0" post_segment_id="137" post_fraction_along="0.34778214">
            </connection>
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        </connections>
    </projection>
    <projection name="LTS_Bask_sm" source="CG_C04_LTS_sm" target="CG_C04_Bask_sm">
        <synapse_props synapse_type="Inh_LTS_FS" internal_delay="0.0" weight="1.0" threshold="0.0">
        </synapse_props>
        <connections size="200">
            <connection id="0" pre_cell_id="5" pre_segment_id="113" pre_fraction_along="0.7795702" post_cell_id="0" post_segment_id="12" post_fraction_along="0.11299661">
            </connection>
            <connection id="1" pre_cell_id="9" pre_segment_id="117" pre_fraction_along="0.8998053" post_cell_id="0" post_segment_id="38" post_fraction_along="0.29566446">
            </connection>
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        </connections>
    </projection>
    <projection name="FRB_AxAx_sm" source="CG_C04_FRB_sm" target="CG_C04_AxAx_sm">
        <synapse_props synapse_type="Exc_Pyr_Int" internal_delay="0.0" weight="1.0" threshold="0.0">
        </synapse_props>
        <connections size="100">
            <connection id="0" pre_cell_id="4" pre_segment_id="143" pre_fraction_along="0.56873405" post_cell_id="0" post_segment_id="33" post_fraction_along="0.076600626">
            </connection>
            <connection id="1" pre_cell_id="1" pre_segment_id="147" pre_fraction_along="0.4036831" post_cell_id="0" post_segment_id="99" post_fraction_along="0.35108408">
            </connection>
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        </connections>
    </projection>
    <projection name="RS_FRB_sm" source="CG_C04_RS_sm" target="CG_C04_FRB_sm">
        <synapse_props synapse_type="Exc_Pyr_Pyr" internal_delay="0.0" weight="1.0" threshold="0.0">
        </synapse_props>
        <connections size="270">
            <connection id="0" pre_cell_id="14" pre_segment_id="144" pre_fraction_along="0.47957656" post_cell_id="0" post_segment_id="64" post_fraction_along="0.5953723">
            </connection>
            <connection id="1" pre_cell_id="18" pre_segment_id="139" pre_fraction_along="0.7214163" post_cell_id="0" post_segment_id="56" post_fraction_along="0.12354067">
            </connection>
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        </connections>
    </projection>
    <projection name="RS_RS_sm" source="CG_C04_RS_sm" target="CG_C04_RS_sm">
        <synapse_props synapse_type="Exc_Pyr_Pyr" internal_delay="0.0" weight="1.0" threshold="0.0">
        </synapse_props>
        <connections size="900">
            <connection id="0" pre_cell_id="10" pre_segment_id="142" pre_fraction_along="0.21955235" post_cell_id="0" post_segment_id="31" post_fraction_along="0.35112724">
            </connection>
            <connection id="1" pre_cell_id="9" pre_segment_id="139" pre_fraction_along="0.18482803" post_cell_id="0" post_segment_id="41" post_fraction_along="0.41010833">
            </connection>
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        </connections>
    </projection>
</projections>

        <inputs units="Physiological Units">
    <input name="Input_3">
        <pulse_input delay="0.0" duration="100000.0" amplitude="1.0E-5"/>
        <target population="CG_C04_Bask_sm">
            <sites size="10">
                <site cell_id="0" segment_id="0" fraction_along="0.5">
                    <!--Adding the site specific props-->
                    <pulse_input_instance delay="0.0" duration="100000.0" amplitude="1.339379E-5"/>
                </site>
                <site cell_id="1" segment_id="0" fraction_along="0.5">
                    <!--Adding the site specific props-->
                    <pulse_input_instance delay="0.0" duration="100000.0" amplitude="1.574433E-5"/>
                </site>
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            </sites>
        </target>
    </input>
    <input name="Input_13">
        <pulse_input delay="0.0" duration="100000.0" amplitude="1.0E-5"/>
        <target population="CG_C04_AxAx_sm">
            <sites size="10">
                <site cell_id="0" segment_id="0" fraction_along="0.5">
                    <!--Adding the site specific props-->
                    <pulse_input_instance delay="0.0" duration="100000.0" amplitude="1.242387E-5"/>
                </site>
                <site cell_id="1" segment_id="0" fraction_along="0.5">
                    <!--Adding the site specific props-->
                    <pulse_input_instance delay="0.0" duration="100000.0" amplitude="1.407056E-5"/>
                </site>
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            </sites>
        </target>
    </input>
    <input name="Input_1">
        <pulse_input delay="1000.0" duration="0.4" amplitude="4.0E-4"/>
        <target population="CG_C04_RS_sm">
            <sites size="20">
                <site cell_id="0" segment_id="147" fraction_along="0.5">
                    <!--Adding the site specific props-->
                    <pulse_input_instance delay="344.22864" duration="0.4" amplitude="4.0E-4"/>
                </site>
                <site cell_id="1" segment_id="147" fraction_along="0.5">
                    <!--Adding the site specific props-->
                    <pulse_input_instance delay="1331.5183" duration="0.4" amplitude="4.0E-4"/>
                </site>
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            </sites>
        </target>
    </input>
    <input name="C04_FRB_RandPulses">
        <pulse_input delay="0.0" duration="1000000.0" amplitude="2.0E-4"/>
        <target population="CG_C04_FRB_sm">
            <sites size="6">
                <site cell_id="0" segment_id="0" fraction_along="0.5">
                    <!--Adding the site specific props-->
                    <pulse_input_instance delay="0.0" duration="1000000.0" amplitude="2.242123E-4"/>
                </site>
                <site cell_id="1" segment_id="0" fraction_along="0.5">
                    <!--Adding the site specific props-->
                    <pulse_input_instance delay="0.0" duration="1000000.0" amplitude="1.859943E-4"/>
                </site>
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            </sites>
        </target>
    </input>
    <input name="Input_0">
        <pulse_input delay="0.0" duration="100000.0" amplitude="1.0E-4"/>
        <target population="CG_C04_LTS_sm">
            <sites size="10">
                <site cell_id="0" segment_id="0" fraction_along="0.5">
                    <!--Adding the site specific props-->
                    <pulse_input_instance delay="0.0" duration="100000.0" amplitude="2.50715E-6"/>
                </site>
                <site cell_id="1" segment_id="0" fraction_along="0.5">
                    <!--Adding the site specific props-->
                    <pulse_input_instance delay="0.0" duration="100000.0" amplitude="2.664282E-5"/>
                </site>
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            </sites>
        </target>
    </input>
</inputs>

</networkml>
