<?xml version="1.0" encoding="UTF-8"?>
<neuroml xmlns="http://morphml.org/neuroml/schema" xmlns:meta="http://morphml.org/metadata/schema" xmlns:mml="http://morphml.org/morphml/schema" xmlns:bio="http://morphml.org/biophysics/schema" xmlns:cml="http://morphml.org/channelml/schema" xmlns:net="http://morphml.org/networkml/schema" xmlns:xsi="http://www.w3.org/2001/XMLSchema-instance" xsi:schemaLocation="http://morphml.org/neuroml/schema  http://www.neuroml.org/NeuroMLValidator/NeuroMLFiles/Schemata/v1.8.1/Level3/NeuroML_Level3_v1.8.1.xsd" lengthUnits="micron">

    <cells>
        <cell name="L23PyrFRB_varInit">

            <meta:notes>Cell: suppyrFRB_0 exported from NEURON ModelView

NOTE: This is a variant of L23PyrFRB which has a variable initial potential. This is used in the network model to initialise the FRB cells at different voltages, and so ensure they fire out of synchrony</meta:notes>

            <mml:segments>

                <mml:segment id="0" name="Seg0_comp_1" cable="0">
                    <mml:proximal x="0.0" y="0.0" z="0.0" diameter="16.0"/>
                    <mml:distal x="0.0" y="7.5" z="0.0" diameter="16.0"/>
                </mml:segment>

                <mml:segment id="1" name="Seg1_comp_1" parent="0" cable="0">
                    <mml:distal x="-0.0" y="15.0" z="0.0" diameter="16.0"/>
                </mml:segment>

                <mml:segment id="136" name="Seg0_comp_69" parent="0" cable="1">
                    <mml:proximal x="0.0" y="0.0" z="0.0" diameter="1.8"/>
                    <mml:distal x="-0.0" y="-12.5" z="0.0" diameter="1.8"/>
                </mml:segment>

                <mml:segment id="137" name="Seg1_comp_69" parent="136" cable="1">
                    <mml:distal x="-0.0" y="-25.0" z="0.0" diameter="1.8"/>
                </mml:segment>

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
            </mml:segments>

            <mml:cables>

                <mml:cable id="0" name="comp_1">
                    <meta:properties>

                    <meta:property tag="numberInternalDivisions" value="6"/>

                    </meta:properties>

                    <meta:group>all</meta:group>
                    <meta:group>ModelViewParmSubset_1</meta:group>
                    <meta:group>ModelViewParmSubset_3</meta:group>
                    <meta:group>ModelViewParmSubset_8</meta:group>
                    <meta:group>OneSecGrp_SectionRef_1</meta:group>
                    <meta:group>soma_group</meta:group>
                    <meta:group>prox_dends_soma</meta:group>
                </mml:cable>

                <mml:cable id="1" name="comp_69" fract_along_parent="0.0">
                    <meta:properties>

                    <meta:property tag="numberInternalDivisions" value="12"/>

                    </meta:properties>

                    <meta:group>all</meta:group>
                    <meta:group>ModelViewParmSubset_2</meta:group>
                    <meta:group>ModelViewParmSubset_3</meta:group>
                    <meta:group>axon_group</meta:group>
                    <meta:group>prox_axon</meta:group>
                </mml:cable>

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
            </mml:cables>

            <!--Adding the biophysical parameters-->

            <biophysics units="Physiological Units">

                <bio:mechanism name="ar" type="Channel Mechanism">
                    <bio:parameter name="gmax" value="0.25">
                        <bio:group>OneSecGrp_SectionRef_1</bio:group>
                    </bio:parameter>
                    <bio:parameter name="erev" value="-35.0">    <!--Note: Units of extra parameters are not known, except if it's e!!-->

                        <bio:group>OneSecGrp_SectionRef_1</bio:group>
                    </bio:parameter>
                    <bio:parameter name="m0" value="0.25">    <!--Note: Units of extra parameters are not known, except if it's e!!-->

                        <bio:group>OneSecGrp_SectionRef_1</bio:group>
                    </bio:parameter>
                </bio:mechanism>

                <bio:mechanism name="ar" type="Channel Mechanism">
                    <bio:parameter name="gmax" value="0.5">
                        <bio:group>ModelViewParmSubset_4</bio:group>
                    </bio:parameter>
                    <bio:parameter name="erev" value="-35.0">    <!--Note: Units of extra parameters are not known, except if it's e!!-->

                        <bio:group>ModelViewParmSubset_4</bio:group>
                    </bio:parameter>
                    <bio:parameter name="m0" value="0.25">    <!--Note: Units of extra parameters are not known, except if it's e!!-->

                        <bio:group>ModelViewParmSubset_4</bio:group>
                    </bio:parameter>
                </bio:mechanism>

                <bio:mechanism name="cad" type="Ion Concentration">
                    <bio:parameter name="gmax" value="-1.0E8">
                        <bio:group>OneSecGrp_SectionRef_1</bio:group>
                    </bio:parameter>
                    <bio:parameter name="beta" value="0.01">    <!--Note: Units of extra parameters are not known, except if it's e!!-->

                        <bio:group>OneSecGrp_SectionRef_1</bio:group>
                    </bio:parameter>
                    <bio:parameter name="phi" value="26000.0">    <!--Note: Units of extra parameters are not known, except if it's e!!-->

                        <bio:group>OneSecGrp_SectionRef_1</bio:group>
                    </bio:parameter>
                </bio:mechanism>

                <bio:mechanism name="cad" type="Ion Concentration">
                    <bio:parameter name="gmax" value="-1.0E8">
                        <bio:group>ModelViewParmSubset_4</bio:group>
                    </bio:parameter>
                    <bio:parameter name="beta" value="0.05">    <!--Note: Units of extra parameters are not known, except if it's e!!-->

                        <bio:group>ModelViewParmSubset_4</bio:group>
                    </bio:parameter>
                    <bio:parameter name="phi" value="52000.0">    <!--Note: Units of extra parameters are not known, except if it's e!!-->

                        <bio:group>ModelViewParmSubset_4</bio:group>
                    </bio:parameter>
                </bio:mechanism>

                <bio:mechanism name="cal" type="Channel Mechanism">
                    <bio:parameter name="gmax" value="1.0">
                        <bio:group>OneSecGrp_SectionRef_1</bio:group>
                    </bio:parameter>
                </bio:mechanism>

                <bio:mechanism name="cal" type="Channel Mechanism">
                    <bio:parameter name="gmax" value="2.0">
                        <bio:group>ModelViewParmSubset_4</bio:group>
                    </bio:parameter>
                </bio:mechanism>

                <bio:mechanism name="cat" type="Channel Mechanism">
                    <bio:parameter name="gmax" value="0.1">
                        <bio:group>OneSecGrp_SectionRef_1</bio:group>
                    </bio:parameter>
                </bio:mechanism>

                <bio:mechanism name="cat" type="Channel Mechanism">
                    <bio:parameter name="gmax" value="0.2">
                        <bio:group>ModelViewParmSubset_4</bio:group>
                    </bio:parameter>
                </bio:mechanism>

                <bio:mechanism name="k2" type="Channel Mechanism">
                    <bio:parameter name="gmax" value="0.1">
                        <bio:group>ModelViewParmSubset_3</bio:group>
                    </bio:parameter>
                </bio:mechanism>

                <bio:mechanism name="k2" type="Channel Mechanism">
                    <bio:parameter name="gmax" value="0.2">
                        <bio:group>ModelViewParmSubset_4</bio:group>
                    </bio:parameter>
                </bio:mechanism>

                <bio:mechanism name="ka" type="Channel Mechanism">
                    <bio:parameter name="gmax" value="2.0">
                        <bio:group>ModelViewParmSubset_2</bio:group>
                    </bio:parameter>
                </bio:mechanism>

                <bio:mechanism name="ka" type="Channel Mechanism">
                    <bio:parameter name="gmax" value="30.0">
                        <bio:group>OneSecGrp_SectionRef_1</bio:group>
                    </bio:parameter>
                </bio:mechanism>

                <bio:mechanism name="ka" type="Channel Mechanism">
                    <bio:parameter name="gmax" value="4.0">
                        <bio:group>ModelViewParmSubset_5</bio:group>
                    </bio:parameter>
                </bio:mechanism>

                <bio:mechanism name="ka" type="Channel Mechanism">
                    <bio:parameter name="gmax" value="60.0">
                        <bio:group>OneSecGrp_SectionRef_3</bio:group>
                    </bio:parameter>
                </bio:mechanism>

                <bio:mechanism name="kahp" type="Channel Mechanism">
                    <bio:parameter name="gmax" value="0.1">
                        <bio:group>OneSecGrp_SectionRef_1</bio:group>
                    </bio:parameter>
                </bio:mechanism>

                <bio:mechanism name="kahp" type="Channel Mechanism">
                    <bio:parameter name="gmax" value="0.2">
                        <bio:group>ModelViewParmSubset_4</bio:group>
                    </bio:parameter>
                </bio:mechanism>

                <bio:mechanism name="kc" type="Channel Mechanism">
                    <bio:parameter name="gmax" value="4.5">
                        <bio:group>OneSecGrp_SectionRef_1</bio:group>
                    </bio:parameter>
                </bio:mechanism>

                <bio:mechanism name="kc" type="Channel Mechanism">
                    <bio:parameter name="gmax" value="9.0">
                        <bio:group>ModelViewParmSubset_4</bio:group>
                    </bio:parameter>
                </bio:mechanism>

                <bio:mechanism name="kdr" type="Channel Mechanism">
                    <bio:parameter name="gmax" value="125.0">
                        <bio:group>OneSecGrp_SectionRef_1</bio:group>
                    </bio:parameter>
                </bio:mechanism>

                <bio:mechanism name="kdr" type="Channel Mechanism">
                    <bio:parameter name="gmax" value="12.5">
                        <bio:group>ModelViewParmSubset_6</bio:group>
                    </bio:parameter>
                </bio:mechanism>

                <bio:mechanism name="kdr" type="Channel Mechanism">
                    <bio:parameter name="gmax" value="187.5">
                        <bio:group>ModelViewParmSubset_7</bio:group>
                    </bio:parameter>
                </bio:mechanism>

                <bio:mechanism name="kdr" type="Channel Mechanism">
                    <bio:parameter name="gmax" value="250.0">
                        <bio:group>OneSecGrp_SectionRef_3</bio:group>
                    </bio:parameter>
                </bio:mechanism>

                <bio:mechanism name="kdr" type="Channel Mechanism">
                    <bio:parameter name="gmax" value="400.0">
                        <bio:group>ModelViewParmSubset_2</bio:group>
                    </bio:parameter>
                </bio:mechanism>

                <bio:mechanism name="km" type="Channel Mechanism">
                    <bio:parameter name="gmax" value="15.0">
                        <bio:group>ModelViewParmSubset_4</bio:group>
                    </bio:parameter>
                </bio:mechanism>

                <bio:mechanism name="km" type="Channel Mechanism">
                    <bio:parameter name="gmax" value="7.5">
                        <bio:group>OneSecGrp_SectionRef_1</bio:group>
                    </bio:parameter>
                </bio:mechanism>

                <bio:mechanism name="naf" type="Channel Mechanism">
                    <bio:parameter name="gmax" value="187.5">
                        <bio:group>ModelViewParmSubset_8</bio:group>
                    </bio:parameter>
                    <bio:parameter name="a" value="0.0">    <!--Note: Units of extra parameters are not known, except if it's e!!-->

                        <bio:group>ModelViewParmSubset_8</bio:group>
                    </bio:parameter>
                    <bio:parameter name="b" value="0.0">    <!--Note: Units of extra parameters are not known, except if it's e!!-->

                        <bio:group>ModelViewParmSubset_8</bio:group>
                    </bio:parameter>
                    <bio:parameter name="c" value="0.0">    <!--Note: Units of extra parameters are not known, except if it's e!!-->

                        <bio:group>ModelViewParmSubset_8</bio:group>
                    </bio:parameter>
                    <bio:parameter name="d" value="0.0">    <!--Note: Units of extra parameters are not known, except if it's e!!-->

                        <bio:group>ModelViewParmSubset_8</bio:group>
                    </bio:parameter>
                    <bio:parameter name="fastNa_shift" value="-3.5">    <!--Note: Units of extra parameters are not known, except if it's e!!-->

                        <bio:group>ModelViewParmSubset_8</bio:group>
                    </bio:parameter>
                </bio:mechanism>

                <bio:mechanism name="naf" type="Channel Mechanism">
                    <bio:parameter name="gmax" value="250.0">
                        <bio:group>OneSecGrp_SectionRef_3</bio:group>
                    </bio:parameter>
                    <bio:parameter name="a" value="0.0">    <!--Note: Units of extra parameters are not known, except if it's e!!-->

                        <bio:group>OneSecGrp_SectionRef_3</bio:group>
                    </bio:parameter>
                    <bio:parameter name="b" value="0.0">    <!--Note: Units of extra parameters are not known, except if it's e!!-->

                        <bio:group>OneSecGrp_SectionRef_3</bio:group>
                    </bio:parameter>
                    <bio:parameter name="c" value="0.0">    <!--Note: Units of extra parameters are not known, except if it's e!!-->

                        <bio:group>OneSecGrp_SectionRef_3</bio:group>
                    </bio:parameter>
                    <bio:parameter name="d" value="0.0">    <!--Note: Units of extra parameters are not known, except if it's e!!-->

                        <bio:group>OneSecGrp_SectionRef_3</bio:group>
                    </bio:parameter>
                    <bio:parameter name="fastNa_shift" value="-3.5">    <!--Note: Units of extra parameters are not known, except if it's e!!-->

                        <bio:group>OneSecGrp_SectionRef_3</bio:group>
                    </bio:parameter>
                </bio:mechanism>

                <bio:mechanism name="naf" type="Channel Mechanism">
                    <bio:parameter name="gmax" value="25.0">
                        <bio:group>ModelViewParmSubset_6</bio:group>
                    </bio:parameter>
                    <bio:parameter name="a" value="0.0">    <!--Note: Units of extra parameters are not known, except if it's e!!-->

                        <bio:group>ModelViewParmSubset_6</bio:group>
                    </bio:parameter>
                    <bio:parameter name="b" value="0.0">    <!--Note: Units of extra parameters are not known, except if it's e!!-->

                        <bio:group>ModelViewParmSubset_6</bio:group>
                    </bio:parameter>
                    <bio:parameter name="c" value="0.0">    <!--Note: Units of extra parameters are not known, except if it's e!!-->

                        <bio:group>ModelViewParmSubset_6</bio:group>
                    </bio:parameter>
                    <bio:parameter name="d" value="0.0">    <!--Note: Units of extra parameters are not known, except if it's e!!-->

                        <bio:group>ModelViewParmSubset_6</bio:group>
                    </bio:parameter>
                    <bio:parameter name="fastNa_shift" value="-3.5">    <!--Note: Units of extra parameters are not known, except if it's e!!-->

                        <bio:group>ModelViewParmSubset_6</bio:group>
                    </bio:parameter>
                </bio:mechanism>

                <bio:mechanism name="naf" type="Channel Mechanism">
                    <bio:parameter name="gmax" value="400.0">
                        <bio:group>ModelViewParmSubset_2</bio:group>
                    </bio:parameter>
                    <bio:parameter name="a" value="0.0">    <!--Note: Units of extra parameters are not known, except if it's e!!-->

                        <bio:group>ModelViewParmSubset_2</bio:group>
                    </bio:parameter>
                    <bio:parameter name="b" value="0.0">    <!--Note: Units of extra parameters are not known, except if it's e!!-->

                        <bio:group>ModelViewParmSubset_2</bio:group>
                    </bio:parameter>
                    <bio:parameter name="c" value="0.0">    <!--Note: Units of extra parameters are not known, except if it's e!!-->

                        <bio:group>ModelViewParmSubset_2</bio:group>
                    </bio:parameter>
                    <bio:parameter name="d" value="0.0">    <!--Note: Units of extra parameters are not known, except if it's e!!-->

                        <bio:group>ModelViewParmSubset_2</bio:group>
                    </bio:parameter>
                    <bio:parameter name="fastNa_shift" value="-3.5">    <!--Note: Units of extra parameters are not known, except if it's e!!-->

                        <bio:group>ModelViewParmSubset_2</bio:group>
                    </bio:parameter>
                </bio:mechanism>

                <bio:mechanism name="nap" type="Channel Mechanism">
                    <bio:parameter name="gmax" value="0.48">
                        <bio:group>ModelViewParmSubset_8</bio:group>
                    </bio:parameter>
                </bio:mechanism>

                <bio:mechanism name="nap" type="Channel Mechanism">
                    <bio:parameter name="gmax" value="0.064">
                        <bio:group>ModelViewParmSubset_6</bio:group>
                    </bio:parameter>
                </bio:mechanism>

                <bio:mechanism name="nap" type="Channel Mechanism">
                    <bio:parameter name="gmax" value="0.64">
                        <bio:group>OneSecGrp_SectionRef_3</bio:group>
                    </bio:parameter>
                </bio:mechanism>

                <bio:mechanism name="pas" type="Channel Mechanism" passive_conductance="true">
                    <bio:parameter name="e" value="-70.0">
                        <bio:group>ModelViewParmSubset_2</bio:group>
                    </bio:parameter>
                    <bio:parameter name="gmax" value="1.0">
                        <bio:group>ModelViewParmSubset_2</bio:group>
                    </bio:parameter>
                </bio:mechanism>

                <bio:mechanism name="pas" type="Channel Mechanism" passive_conductance="true">
                    <bio:parameter name="e" value="-70.0">
                        <bio:group>OneSecGrp_SectionRef_1</bio:group>
                    </bio:parameter>
                    <bio:parameter name="gmax" value="0.02">
                        <bio:group>OneSecGrp_SectionRef_1</bio:group>
                    </bio:parameter>
                </bio:mechanism>

                <bio:mechanism name="pas" type="Channel Mechanism" passive_conductance="true">
                    <bio:parameter name="e" value="-70.0">
                        <bio:group>ModelViewParmSubset_4</bio:group>
                    </bio:parameter>
                    <bio:parameter name="gmax" value="0.04">
                        <bio:group>ModelViewParmSubset_4</bio:group>
                    </bio:parameter>
                </bio:mechanism>

                <bio:spec_capacitance>
                    <bio:parameter value="1.8">
                        <bio:group>ModelViewParmSubset_4</bio:group>
                    </bio:parameter>

                    <bio:parameter value="0.9">
                        <bio:group>ModelViewParmSubset_3</bio:group>
                    </bio:parameter>
                </bio:spec_capacitance>

                <bio:spec_axial_resistance>
                    <bio:parameter value="0.1">
                        <bio:group>ModelViewParmSubset_2</bio:group>
                    </bio:parameter>

                    <bio:parameter value="0.25">
                        <bio:group>ModelViewParmSubset_1</bio:group>
                    </bio:parameter>
                </bio:spec_axial_resistance>

                <bio:init_memb_potential>
                    <bio:parameter value="-70.0">
                        <bio:group>all</bio:group>
                    </bio:parameter>
                </bio:init_memb_potential>

                <bio:ion_props name="ca">
                    <bio:parameter name="conc_e" value="2.0E-6">
                        <bio:group>ModelViewParmSubset_4</bio:group>
                    </bio:parameter>

                    <bio:parameter name="conc_i" value="1.0E-8">
                        <bio:group>ModelViewParmSubset_4</bio:group>
                    </bio:parameter>
                </bio:ion_props>

                <bio:ion_props name="ca">
                    <bio:parameter name="conc_e" value="2.0E-6">
                        <bio:group>OneSecGrp_SectionRef_1</bio:group>
                    </bio:parameter>

                    <bio:parameter name="conc_i" value="1.0E-8">
                        <bio:group>OneSecGrp_SectionRef_1</bio:group>
                    </bio:parameter>
                </bio:ion_props>

                <bio:ion_props name="k">
                    <bio:parameter name="e" value="-95.0">
                        <bio:group>all</bio:group>
                    </bio:parameter>
                </bio:ion_props>

                <bio:ion_props name="na">
                    <bio:parameter name="e" value="50.0">
                        <bio:group>all</bio:group>
                    </bio:parameter>
                </bio:ion_props>
            </biophysics>

            <connectivity>
                <net:potential_syn_loc synapse_type="Exc_Pyr_Int">
                    <net:group>distal_axon</net:group>
                </net:potential_syn_loc>

                <net:potential_syn_loc synapse_type="Exc_Pyr_Pyr">
                    <net:group>mid_dist_bas_dend</net:group>

                    <net:group>distal_axon</net:group>
                </net:potential_syn_loc>

                <net:potential_syn_loc synapse_type="GapJunc">
                    <net:group>distal_axon</net:group>
                </net:potential_syn_loc>

                <net:potential_syn_loc synapse_type="GapJuncCML">
                    <net:group>distal_axon</net:group>
                </net:potential_syn_loc>

                <net:potential_syn_loc synapse_type="GapJuncPara">
                    <net:group>distal_axon</net:group>
                </net:potential_syn_loc>

                <net:potential_syn_loc synapse_type="Inh_Axo_Pyr">
                    <net:group>prox_axon</net:group>
                </net:potential_syn_loc>

                <net:potential_syn_loc synapse_type="Inh_Bask_Pyr">
                    <net:group>soma_group</net:group>

                    <net:group>OneSecGrp_SectionRef_3</net:group>

                    <net:group>most_prox_bas_dend</net:group>
                </net:potential_syn_loc>

                <net:potential_syn_loc synapse_type="Inh_LTS_Pyr">
                    <net:group>mid_dist_bas_dend</net:group>
                </net:potential_syn_loc>

                <net:potential_syn_loc synapse_type="Syn_AMPA_L4SS_Pyr">
                    <net:group>basal_dends</net:group>
                </net:potential_syn_loc>

                <net:potential_syn_loc synapse_type="Syn_AMPA_L5IB_SupPyr">
                    <net:group>mid_apic_dends</net:group>
                </net:potential_syn_loc>

                <net:potential_syn_loc synapse_type="Syn_AMPA_L5RS_SupPyr">
                    <net:group>mid_apic_dends</net:group>
                </net:potential_syn_loc>

                <net:potential_syn_loc synapse_type="Syn_AMPA_L6NT_SupPyr">
                    <net:group>L6Pyr_dends</net:group>
                </net:potential_syn_loc>

                <net:potential_syn_loc synapse_type="Syn_AMPA_SupPyr_DeepFS">
                    <net:group>axon_group</net:group>

                    <net:group>distal_axon</net:group>
                </net:potential_syn_loc>

                <net:potential_syn_loc synapse_type="Syn_AMPA_SupPyr_DeepLTS">
                    <net:group>axon_group</net:group>

                    <net:group>distal_axon</net:group>
                </net:potential_syn_loc>

                <net:potential_syn_loc synapse_type="Syn_AMPA_SupPyr_L4SS">
                    <net:group>axon_group</net:group>

                    <net:group>distal_axon</net:group>
                </net:potential_syn_loc>

                <net:potential_syn_loc synapse_type="Syn_AMPA_SupPyr_L5Pyr">
                    <net:group>axon_group</net:group>

                    <net:group>distal_axon</net:group>
                </net:potential_syn_loc>

                <net:potential_syn_loc synapse_type="Syn_AMPA_SupPyr_L6NT">
                    <net:group>axon_group</net:group>

                    <net:group>distal_axon</net:group>
                </net:potential_syn_loc>

                <net:potential_syn_loc synapse_type="Syn_AMPA_SupPyr_SupFS">
                    <net:group>axon_group</net:group>

                    <net:group>distal_axon</net:group>
                </net:potential_syn_loc>

                <net:potential_syn_loc synapse_type="Syn_AMPA_SupPyr_SupLTS">
                    <net:group>axon_group</net:group>

                    <net:group>distal_axon</net:group>
                </net:potential_syn_loc>

                <net:potential_syn_loc synapse_type="Syn_AMPA_SupPyr_SupPyr">
                    <net:group>axon_group</net:group>

                    <net:group>basal_obl_dends</net:group>

                    <net:group>distal_axon</net:group>
                </net:potential_syn_loc>

                <net:potential_syn_loc synapse_type="Syn_AMPA_TCR_SupPyr">
                    <net:group>TCR_dends</net:group>
                </net:potential_syn_loc>

                <net:potential_syn_loc synapse_type="Syn_Elect_SupPyr_SupPyr">
                    <net:group>axon_group</net:group>

                    <net:group>distal_axon</net:group>
                </net:potential_syn_loc>

                <net:potential_syn_loc synapse_type="Syn_GABAA_DeepAxAx_Pyr">
                    <net:group>prox_axon</net:group>
                </net:potential_syn_loc>

                <net:potential_syn_loc synapse_type="Syn_GABAA_DeepLTS_SupPyr">
                    <net:group>LTS_dends</net:group>
                </net:potential_syn_loc>

                <net:potential_syn_loc synapse_type="Syn_GABAA_SupAxAx_SupPyr">
                    <net:group>prox_axon</net:group>
                </net:potential_syn_loc>

                <net:potential_syn_loc synapse_type="Syn_GABAA_SupBask_SupPyr">
                    <net:group>prox_dends_soma</net:group>
                </net:potential_syn_loc>

                <net:potential_syn_loc synapse_type="Syn_GABAA_SupLTS_SupPyr">
                    <net:group>LTS_dends</net:group>
                </net:potential_syn_loc>

                <net:potential_syn_loc synapse_type="Syn_NMDA_FRBPyr_DeepLTS">
                    <net:group>axon_group</net:group>

                    <net:group>distal_axon</net:group>
                </net:potential_syn_loc>

                <net:potential_syn_loc synapse_type="Syn_NMDA_FRBPyr_SupFS">
                    <net:group>axon_group</net:group>

                    <net:group>distal_axon</net:group>
                </net:potential_syn_loc>

                <net:potential_syn_loc synapse_type="Syn_NMDA_FRBPyr_SupLTS">
                    <net:group>axon_group</net:group>

                    <net:group>distal_axon</net:group>
                </net:potential_syn_loc>

                <net:potential_syn_loc synapse_type="Syn_NMDA_L4SS_Pyr">
                    <net:group>basal_dends</net:group>
                </net:potential_syn_loc>

                <net:potential_syn_loc synapse_type="Syn_NMDA_L5IB_SupPyr">
                    <net:group>mid_apic_dends</net:group>
                </net:potential_syn_loc>

                <net:potential_syn_loc synapse_type="Syn_NMDA_L5RS_SupPyr">
                    <net:group>mid_apic_dends</net:group>
                </net:potential_syn_loc>

                <net:potential_syn_loc synapse_type="Syn_NMDA_L6NT_SupPyr">
                    <net:group>L6Pyr_dends</net:group>
                </net:potential_syn_loc>

                <net:potential_syn_loc synapse_type="Syn_NMDA_SupPyr_DeepFS">
                    <net:group>axon_group</net:group>

                    <net:group>distal_axon</net:group>
                </net:potential_syn_loc>

                <net:potential_syn_loc synapse_type="Syn_NMDA_SupPyr_L4SS">
                    <net:group>axon_group</net:group>

                    <net:group>distal_axon</net:group>
                </net:potential_syn_loc>

                <net:potential_syn_loc synapse_type="Syn_NMDA_SupPyr_L5Pyr">
                    <net:group>axon_group</net:group>

                    <net:group>distal_axon</net:group>
                </net:potential_syn_loc>

                <net:potential_syn_loc synapse_type="Syn_NMDA_SupPyr_L6NT">
                    <net:group>axon_group</net:group>

                    <net:group>distal_axon</net:group>
                </net:potential_syn_loc>

                <net:potential_syn_loc synapse_type="Syn_NMDA_SupPyr_SupPyr">
                    <net:group>axon_group</net:group>

                    <net:group>basal_obl_dends</net:group>

                    <net:group>distal_axon</net:group>
                </net:potential_syn_loc>

                <net:potential_syn_loc synapse_type="Syn_NMDA_TCR_SupPyr">
                    <net:group>TCR_dends</net:group>
                </net:potential_syn_loc>
            </connectivity>

        </cell>
    </cells>
</neuroml>
