<?xml version="1.0" encoding="UTF-8"?>
<neuroml xmlns="http://morphml.org/neuroml/schema" xmlns:meta="http://morphml.org/metadata/schema" xmlns:mml="http://morphml.org/morphml/schema" xmlns:bio="http://morphml.org/biophysics/schema" xmlns:cml="http://morphml.org/channelml/schema" xmlns:net="http://morphml.org/networkml/schema" xmlns:xsi="http://www.w3.org/2001/XMLSchema-instance" xsi:schemaLocation="http://morphml.org/neuroml/schema  http://www.neuroml.org/NeuroMLValidator/NeuroMLFiles/Schemata/v1.8.1/Level3/NeuroML_Level3_v1.8.1.xsd" lengthUnits="micron">

    <cells>
        <cell name="L5TuftedPyrRS">

            <meta:notes>Cell: tuftRS_0 exported from NEURON ModelView</meta:notes>

            <mml:segments>

                <mml:segment id="0" name="Seg0_comp_1" cable="0">
                    <mml:proximal x="0.0" y="0.0" z="0.0" diameter="18.0"/>
                    <mml:distal x="0.0" y="12.5" z="0.0" diameter="18.0"/>
                </mml:segment>

                <mml:segment id="1" name="Seg1_comp_1" parent="0" cable="0">
                    <mml:distal x="-0.0" y="25.0" z="0.0" diameter="18.0"/>
                </mml:segment>

                <mml:segment id="110" name="Seg0_comp_56" parent="0" cable="1">
                    <mml:proximal x="0.0" y="0.0" z="0.0" diameter="1.8"/>
                    <mml:distal x="12.5" y="0.0" z="0.0" diameter="1.8"/>
                </mml:segment>

                <mml:segment id="111" name="Seg1_comp_56" parent="110" cable="1">
                    <mml:distal x="25.0" y="0.0" z="0.0" diameter="1.8"/>
                </mml:segment>

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
            </mml:segments>

            <mml:cables>

                <mml:cable id="0" name="comp_1">
                    <meta:properties>

                    <meta:property tag="numberInternalDivisions" value="2"/>

                    </meta:properties>

                    <meta:group>all</meta:group>
                    <meta:group>ModelViewParmSubset_1</meta:group>
                    <meta:group>ModelViewParmSubset_2</meta:group>
                    <meta:group>ModelViewParmSubset_4</meta:group>
                    <meta:group>OneSecGrp_SectionRef_1</meta:group>
                    <meta:group>soma_group</meta:group>
                    <meta:group>DeepBask_dends</meta:group>
                </mml:cable>

                <mml:cable id="1" name="comp_56" fract_along_parent="0.0">
                    <meta:properties>

                    <meta:property tag="numberInternalDivisions" value="24"/>

                    </meta:properties>

                    <meta:group>all</meta:group>
                    <meta:group>ModelViewParmSubset_2</meta:group>
                    <meta:group>ModelViewParmSubset_4</meta:group>
                    <meta:group>axon_group</meta:group>
                    <meta:group>prox_axon</meta:group>
                </mml:cable>

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
            </mml:cables>

            <!--Adding the biophysical parameters-->

            <biophysics units="Physiological Units">

                <bio:mechanism name="ar" type="Channel Mechanism">
                    <bio:parameter name="gmax" value="0.1">
                        <bio:group>OneSecGrp_SectionRef_1</bio:group>
                    </bio:parameter>
                    <bio:parameter name="erev" value="-35.0">    <!--Note: Units of extra parameters are not known, except if it's e!!-->

                        <bio:group>OneSecGrp_SectionRef_1</bio:group>
                    </bio:parameter>
                    <bio:parameter name="m0" value="0.25">    <!--Note: Units of extra parameters are not known, except if it's e!!-->

                        <bio:group>OneSecGrp_SectionRef_1</bio:group>
                    </bio:parameter>
                </bio:mechanism>

                <bio:mechanism name="ar" type="Channel Mechanism">
                    <bio:parameter name="gmax" value="0.2">
                        <bio:group>dends_no_tuft</bio:group>
                    </bio:parameter>
                    <bio:parameter name="erev" value="-35.0">    <!--Note: Units of extra parameters are not known, except if it's e!!-->

                        <bio:group>dends_no_tuft</bio:group>
                    </bio:parameter>
                    <bio:parameter name="m0" value="0.25">    <!--Note: Units of extra parameters are not known, except if it's e!!-->

                        <bio:group>dends_no_tuft</bio:group>
                    </bio:parameter>
                </bio:mechanism>

                <bio:mechanism name="ar" type="Channel Mechanism">
                    <bio:parameter name="gmax" value="0.4">
                        <bio:group>ModelViewParmSubset_7</bio:group>
                    </bio:parameter>
                    <bio:parameter name="erev" value="-35.0">    <!--Note: Units of extra parameters are not known, except if it's e!!-->

                        <bio:group>ModelViewParmSubset_7</bio:group>
                    </bio:parameter>
                    <bio:parameter name="m0" value="0.25">    <!--Note: Units of extra parameters are not known, except if it's e!!-->

                        <bio:group>ModelViewParmSubset_7</bio:group>
                    </bio:parameter>
                </bio:mechanism>

                <bio:mechanism name="cad" type="Ion Concentration">
                    <bio:parameter name="gmax" value="-1.0E8">
                        <bio:group>OneSecGrp_SectionRef_1</bio:group>
                    </bio:parameter>
                    <bio:parameter name="beta" value="0.01">    <!--Note: Units of extra parameters are not known, except if it's e!!-->

                        <bio:group>OneSecGrp_SectionRef_1</bio:group>
                    </bio:parameter>
                    <bio:parameter name="phi" value="4333.33">    <!--Note: Units of extra parameters are not known, except if it's e!!-->

                        <bio:group>OneSecGrp_SectionRef_1</bio:group>
                    </bio:parameter>
                </bio:mechanism>

                <bio:mechanism name="cad" type="Ion Concentration">
                    <bio:parameter name="gmax" value="-1.0E8">
                        <bio:group>ModelViewParmSubset_8</bio:group>
                    </bio:parameter>
                    <bio:parameter name="beta" value="0.02">    <!--Note: Units of extra parameters are not known, except if it's e!!-->

                        <bio:group>ModelViewParmSubset_8</bio:group>
                    </bio:parameter>
                    <bio:parameter name="phi" value="86666.7">    <!--Note: Units of extra parameters are not known, except if it's e!!-->

                        <bio:group>ModelViewParmSubset_8</bio:group>
                    </bio:parameter>
                </bio:mechanism>

                <bio:mechanism name="cad" type="Ion Concentration">
                    <bio:parameter name="gmax" value="-1.0E8">
                        <bio:group>ModelViewParmSubset_9</bio:group>
                    </bio:parameter>
                    <bio:parameter name="beta" value="0.075">    <!--Note: Units of extra parameters are not known, except if it's e!!-->

                        <bio:group>ModelViewParmSubset_9</bio:group>
                    </bio:parameter>
                    <bio:parameter name="phi" value="86666.7">    <!--Note: Units of extra parameters are not known, except if it's e!!-->

                        <bio:group>ModelViewParmSubset_9</bio:group>
                    </bio:parameter>
                </bio:mechanism>

                <bio:mechanism name="cal" type="Channel Mechanism">
                    <bio:parameter name="gmax" value="1.6">
                        <bio:group>OneSecGrp_SectionRef_1</bio:group>
                    </bio:parameter>
                </bio:mechanism>

                <bio:mechanism name="cal" type="Channel Mechanism">
                    <bio:parameter name="gmax" value="2.16">
                        <bio:group>ModelViewParmSubset_12</bio:group>
                    </bio:parameter>
                </bio:mechanism>

                <bio:mechanism name="cal" type="Channel Mechanism">
                    <bio:parameter name="gmax" value="3.2">
                        <bio:group>ModelViewParmSubset_13</bio:group>
                    </bio:parameter>
                </bio:mechanism>

                <bio:mechanism name="cal" type="Channel Mechanism">
                    <bio:parameter name="gmax" value="0.48">
                        <bio:group>ModelViewParmSubset_10</bio:group>
                    </bio:parameter>
                </bio:mechanism>

                <bio:mechanism name="cal" type="Channel Mechanism">
                    <bio:parameter name="gmax" value="0.8">
                        <bio:group>ModelViewParmSubset_11</bio:group>
                    </bio:parameter>
                </bio:mechanism>

                <bio:mechanism name="cat" type="Channel Mechanism">
                    <bio:parameter name="gmax" value="0.1">
                        <bio:group>OneSecGrp_SectionRef_1</bio:group>
                    </bio:parameter>
                </bio:mechanism>

                <bio:mechanism name="cat" type="Channel Mechanism">
                    <bio:parameter name="gmax" value="0.2">
                        <bio:group>ModelViewParmSubset_5</bio:group>
                    </bio:parameter>
                </bio:mechanism>

                <bio:mechanism name="k2" type="Channel Mechanism">
                    <bio:parameter name="gmax" value="1.0">
                        <bio:group>ModelViewParmSubset_5</bio:group>
                    </bio:parameter>
                </bio:mechanism>

                <bio:mechanism name="k2" type="Channel Mechanism">
                    <bio:parameter name="gmax" value="0.5">
                        <bio:group>ModelViewParmSubset_4</bio:group>
                    </bio:parameter>
                </bio:mechanism>

                <bio:mechanism name="ka" type="Channel Mechanism">
                    <bio:parameter name="gmax" value="1.2">
                        <bio:group>ModelViewParmSubset_14</bio:group>
                    </bio:parameter>
                </bio:mechanism>

                <bio:mechanism name="ka" type="Channel Mechanism">
                    <bio:parameter name="gmax" value="16.0">
                        <bio:group>ModelViewParmSubset_15</bio:group>
                    </bio:parameter>
                </bio:mechanism>

                <bio:mechanism name="ka" type="Channel Mechanism">
                    <bio:parameter name="gmax" value="20.0">
                        <bio:group>OneSecGrp_SectionRef_1</bio:group>
                    </bio:parameter>
                </bio:mechanism>

                <bio:mechanism name="ka" type="Channel Mechanism">
                    <bio:parameter name="gmax" value="0.6">
                        <bio:group>axon_group</bio:group>
                    </bio:parameter>
                </bio:mechanism>

                <bio:mechanism name="kahp_deeppyr" type="Channel Mechanism">
                    <bio:parameter name="gmax" value="0.2">
                        <bio:group>OneSecGrp_SectionRef_1</bio:group>
                    </bio:parameter>
                </bio:mechanism>

                <bio:mechanism name="kahp_deeppyr" type="Channel Mechanism">
                    <bio:parameter name="gmax" value="0.4">
                        <bio:group>ModelViewParmSubset_5</bio:group>
                    </bio:parameter>
                </bio:mechanism>

                <bio:mechanism name="kc" type="Channel Mechanism">
                    <bio:parameter name="gmax" value="1.8">
                        <bio:group>ModelViewParmSubset_16</bio:group>
                    </bio:parameter>
                </bio:mechanism>

                <bio:mechanism name="kc" type="Channel Mechanism">
                    <bio:parameter name="gmax" value="28.8">
                        <bio:group>OneSecGrp_SectionRef_1</bio:group>
                    </bio:parameter>
                </bio:mechanism>

                <bio:mechanism name="kc" type="Channel Mechanism">
                    <bio:parameter name="gmax" value="4.32">
                        <bio:group>ModelViewParmSubset_17</bio:group>
                    </bio:parameter>
                </bio:mechanism>

                <bio:mechanism name="kc" type="Channel Mechanism">
                    <bio:parameter name="gmax" value="57.6">
                        <bio:group>ModelViewParmSubset_15</bio:group>
                    </bio:parameter>
                </bio:mechanism>

                <bio:mechanism name="kdr" type="Channel Mechanism">
                    <bio:parameter name="gmax" value="150.0">
                        <bio:group>ModelViewParmSubset_18</bio:group>
                    </bio:parameter>
                </bio:mechanism>

                <bio:mechanism name="kdr" type="Channel Mechanism">
                    <bio:parameter name="gmax" value="170.0">
                        <bio:group>OneSecGrp_SectionRef_1</bio:group>
                    </bio:parameter>
                </bio:mechanism>

                <bio:mechanism name="kdr" type="Channel Mechanism">
                    <bio:parameter name="gmax" value="240.0">
                        <bio:group>OneSecGrp_SectionRef_3</bio:group>
                    </bio:parameter>
                </bio:mechanism>

                <bio:mechanism name="kdr" type="Channel Mechanism">
                    <bio:parameter name="gmax" value="450.0">
                        <bio:group>axon_group</bio:group>
                    </bio:parameter>
                </bio:mechanism>

                <bio:mechanism name="km" type="Channel Mechanism">
                    <bio:parameter name="gmax" value="27.2">
                        <bio:group>ModelViewParmSubset_19</bio:group>
                    </bio:parameter>
                </bio:mechanism>

                <bio:mechanism name="km" type="Channel Mechanism">
                    <bio:parameter name="gmax" value="30.0">
                        <bio:group>axon_group</bio:group>
                    </bio:parameter>
                </bio:mechanism>

                <bio:mechanism name="km" type="Channel Mechanism">
                    <bio:parameter name="gmax" value="8.0">
                        <bio:group>ModelViewParmSubset_17</bio:group>
                    </bio:parameter>
                </bio:mechanism>

                <bio:mechanism name="km" type="Channel Mechanism">
                    <bio:parameter name="gmax" value="8.5">
                        <bio:group>OneSecGrp_SectionRef_1</bio:group>
                    </bio:parameter>
                </bio:mechanism>

                <bio:mechanism name="naf" type="Channel Mechanism">
                    <bio:parameter name="gmax" value="150.0">
                        <bio:group>ModelViewParmSubset_18</bio:group>
                    </bio:parameter>
                    <bio:parameter name="a" value="0.0">    <!--Note: Units of extra parameters are not known, except if it's e!!-->

                        <bio:group>ModelViewParmSubset_18</bio:group>
                    </bio:parameter>
                    <bio:parameter name="b" value="0.0">    <!--Note: Units of extra parameters are not known, except if it's e!!-->

                        <bio:group>ModelViewParmSubset_18</bio:group>
                    </bio:parameter>
                    <bio:parameter name="c" value="0.0">    <!--Note: Units of extra parameters are not known, except if it's e!!-->

                        <bio:group>ModelViewParmSubset_18</bio:group>
                    </bio:parameter>
                    <bio:parameter name="d" value="0.0">    <!--Note: Units of extra parameters are not known, except if it's e!!-->

                        <bio:group>ModelViewParmSubset_18</bio:group>
                    </bio:parameter>
                    <bio:parameter name="fastNa_shift" value="-3.5">    <!--Note: Units of extra parameters are not known, except if it's e!!-->

                        <bio:group>ModelViewParmSubset_18</bio:group>
                    </bio:parameter>
                </bio:mechanism>

                <bio:mechanism name="naf" type="Channel Mechanism">
                    <bio:parameter name="gmax" value="200.0">
                        <bio:group>OneSecGrp_SectionRef_1</bio:group>
                    </bio:parameter>
                    <bio:parameter name="a" value="0.0">    <!--Note: Units of extra parameters are not known, except if it's e!!-->

                        <bio:group>OneSecGrp_SectionRef_1</bio:group>
                    </bio:parameter>
                    <bio:parameter name="b" value="0.0">    <!--Note: Units of extra parameters are not known, except if it's e!!-->

                        <bio:group>OneSecGrp_SectionRef_1</bio:group>
                    </bio:parameter>
                    <bio:parameter name="c" value="0.0">    <!--Note: Units of extra parameters are not known, except if it's e!!-->

                        <bio:group>OneSecGrp_SectionRef_1</bio:group>
                    </bio:parameter>
                    <bio:parameter name="d" value="0.0">    <!--Note: Units of extra parameters are not known, except if it's e!!-->

                        <bio:group>OneSecGrp_SectionRef_1</bio:group>
                    </bio:parameter>
                    <bio:parameter name="fastNa_shift" value="-3.5">    <!--Note: Units of extra parameters are not known, except if it's e!!-->

                        <bio:group>OneSecGrp_SectionRef_1</bio:group>
                    </bio:parameter>
                </bio:mechanism>

                <bio:mechanism name="naf" type="Channel Mechanism">
                    <bio:parameter name="gmax" value="300.0">
                        <bio:group>OneSecGrp_SectionRef_3</bio:group>
                    </bio:parameter>
                    <bio:parameter name="a" value="0.0">    <!--Note: Units of extra parameters are not known, except if it's e!!-->

                        <bio:group>OneSecGrp_SectionRef_3</bio:group>
                    </bio:parameter>
                    <bio:parameter name="b" value="0.0">    <!--Note: Units of extra parameters are not known, except if it's e!!-->

                        <bio:group>OneSecGrp_SectionRef_3</bio:group>
                    </bio:parameter>
                    <bio:parameter name="c" value="0.0">    <!--Note: Units of extra parameters are not known, except if it's e!!-->

                        <bio:group>OneSecGrp_SectionRef_3</bio:group>
                    </bio:parameter>
                    <bio:parameter name="d" value="0.0">    <!--Note: Units of extra parameters are not known, except if it's e!!-->

                        <bio:group>OneSecGrp_SectionRef_3</bio:group>
                    </bio:parameter>
                    <bio:parameter name="fastNa_shift" value="-3.5">    <!--Note: Units of extra parameters are not known, except if it's e!!-->

                        <bio:group>OneSecGrp_SectionRef_3</bio:group>
                    </bio:parameter>
                </bio:mechanism>

                <bio:mechanism name="naf" type="Channel Mechanism">
                    <bio:parameter name="gmax" value="30.0">
                        <bio:group>ModelViewParmSubset_16</bio:group>
                    </bio:parameter>
                    <bio:parameter name="a" value="0.0">    <!--Note: Units of extra parameters are not known, except if it's e!!-->

                        <bio:group>ModelViewParmSubset_16</bio:group>
                    </bio:parameter>
                    <bio:parameter name="b" value="0.0">    <!--Note: Units of extra parameters are not known, except if it's e!!-->

                        <bio:group>ModelViewParmSubset_16</bio:group>
                    </bio:parameter>
                    <bio:parameter name="c" value="0.0">    <!--Note: Units of extra parameters are not known, except if it's e!!-->

                        <bio:group>ModelViewParmSubset_16</bio:group>
                    </bio:parameter>
                    <bio:parameter name="d" value="0.0">    <!--Note: Units of extra parameters are not known, except if it's e!!-->

                        <bio:group>ModelViewParmSubset_16</bio:group>
                    </bio:parameter>
                    <bio:parameter name="fastNa_shift" value="-3.5">    <!--Note: Units of extra parameters are not known, except if it's e!!-->

                        <bio:group>ModelViewParmSubset_16</bio:group>
                    </bio:parameter>
                </bio:mechanism>

                <bio:mechanism name="naf" type="Channel Mechanism">
                    <bio:parameter name="gmax" value="450.0">
                        <bio:group>axon_group</bio:group>
                    </bio:parameter>
                    <bio:parameter name="a" value="0.0">    <!--Note: Units of extra parameters are not known, except if it's e!!-->

                        <bio:group>axon_group</bio:group>
                    </bio:parameter>
                    <bio:parameter name="b" value="0.0">    <!--Note: Units of extra parameters are not known, except if it's e!!-->

                        <bio:group>axon_group</bio:group>
                    </bio:parameter>
                    <bio:parameter name="c" value="0.0">    <!--Note: Units of extra parameters are not known, except if it's e!!-->

                        <bio:group>axon_group</bio:group>
                    </bio:parameter>
                    <bio:parameter name="d" value="0.0">    <!--Note: Units of extra parameters are not known, except if it's e!!-->

                        <bio:group>axon_group</bio:group>
                    </bio:parameter>
                    <bio:parameter name="fastNa_shift" value="-3.5">    <!--Note: Units of extra parameters are not known, except if it's e!!-->

                        <bio:group>axon_group</bio:group>
                    </bio:parameter>
                </bio:mechanism>

                <bio:mechanism name="naf" type="Channel Mechanism">
                    <bio:parameter name="gmax" value="6.0">
                        <bio:group>ModelViewParmSubset_17</bio:group>
                    </bio:parameter>
                    <bio:parameter name="a" value="0.0">    <!--Note: Units of extra parameters are not known, except if it's e!!-->

                        <bio:group>ModelViewParmSubset_17</bio:group>
                    </bio:parameter>
                    <bio:parameter name="b" value="0.0">    <!--Note: Units of extra parameters are not known, except if it's e!!-->

                        <bio:group>ModelViewParmSubset_17</bio:group>
                    </bio:parameter>
                    <bio:parameter name="c" value="0.0">    <!--Note: Units of extra parameters are not known, except if it's e!!-->

                        <bio:group>ModelViewParmSubset_17</bio:group>
                    </bio:parameter>
                    <bio:parameter name="d" value="0.0">    <!--Note: Units of extra parameters are not known, except if it's e!!-->

                        <bio:group>ModelViewParmSubset_17</bio:group>
                    </bio:parameter>
                    <bio:parameter name="fastNa_shift" value="-3.5">    <!--Note: Units of extra parameters are not known, except if it's e!!-->

                        <bio:group>ModelViewParmSubset_17</bio:group>
                    </bio:parameter>
                </bio:mechanism>

                <bio:mechanism name="nap" type="Channel Mechanism">
                    <bio:parameter name="gmax" value="0.12">
                        <bio:group>ModelViewParmSubset_18</bio:group>
                    </bio:parameter>
                </bio:mechanism>

                <bio:mechanism name="nap" type="Channel Mechanism">
                    <bio:parameter name="gmax" value="0.16">
                        <bio:group>OneSecGrp_SectionRef_1</bio:group>
                    </bio:parameter>
                </bio:mechanism>

                <bio:mechanism name="nap" type="Channel Mechanism">
                    <bio:parameter name="gmax" value="0.024">
                        <bio:group>ModelViewParmSubset_16</bio:group>
                    </bio:parameter>
                </bio:mechanism>

                <bio:mechanism name="nap" type="Channel Mechanism">
                    <bio:parameter name="gmax" value="0.24">
                        <bio:group>OneSecGrp_SectionRef_3</bio:group>
                    </bio:parameter>
                </bio:mechanism>

                <bio:mechanism name="nap" type="Channel Mechanism">
                    <bio:parameter name="gmax" value="0.0048">
                        <bio:group>ModelViewParmSubset_17</bio:group>
                    </bio:parameter>
                </bio:mechanism>

                <bio:mechanism name="pas" type="Channel Mechanism" passive_conductance="true">
                    <bio:parameter name="e" value="-70.0">
                        <bio:group>axon_group</bio:group>
                    </bio:parameter>
                    <bio:parameter name="gmax" value="1.0">
                        <bio:group>axon_group</bio:group>
                    </bio:parameter>
                </bio:mechanism>

                <bio:mechanism name="pas" type="Channel Mechanism" passive_conductance="true">
                    <bio:parameter name="e" value="-70.0">
                        <bio:group>OneSecGrp_SectionRef_1</bio:group>
                    </bio:parameter>
                    <bio:parameter name="gmax" value="0.02">
                        <bio:group>OneSecGrp_SectionRef_1</bio:group>
                    </bio:parameter>
                </bio:mechanism>

                <bio:mechanism name="pas" type="Channel Mechanism" passive_conductance="true">
                    <bio:parameter name="e" value="-70.0">
                        <bio:group>ModelViewParmSubset_5</bio:group>
                    </bio:parameter>
                    <bio:parameter name="gmax" value="0.04">
                        <bio:group>ModelViewParmSubset_5</bio:group>
                    </bio:parameter>
                </bio:mechanism>

                <bio:spec_capacitance>
                    <bio:parameter value="1.8">
                        <bio:group>ModelViewParmSubset_5</bio:group>
                    </bio:parameter>

                    <bio:parameter value="0.9">
                        <bio:group>ModelViewParmSubset_4</bio:group>
                    </bio:parameter>
                </bio:spec_capacitance>

                <bio:spec_axial_resistance>
                    <bio:parameter value="0.1">
                        <bio:group>axon_group</bio:group>
                    </bio:parameter>

                    <bio:parameter value="0.25">
                        <bio:group>ModelViewParmSubset_1</bio:group>
                    </bio:parameter>
                </bio:spec_axial_resistance>

                <bio:init_memb_potential>
                    <bio:parameter value="-70.0">
                        <bio:group>all</bio:group>
                    </bio:parameter>
                </bio:init_memb_potential>

                <bio:ion_props name="ca">
                    <bio:parameter name="conc_e" value="2.0E-6">
                        <bio:group>OneSecGrp_SectionRef_1</bio:group>
                    </bio:parameter>

                    <bio:parameter name="conc_i" value="1.0E-8">
                        <bio:group>OneSecGrp_SectionRef_1</bio:group>
                    </bio:parameter>
                </bio:ion_props>

                <bio:ion_props name="ca">
                    <bio:parameter name="conc_e" value="2.0E-6">
                        <bio:group>ModelViewParmSubset_8</bio:group>
                    </bio:parameter>

                    <bio:parameter name="conc_i" value="1.0E-8">
                        <bio:group>ModelViewParmSubset_8</bio:group>
                    </bio:parameter>
                </bio:ion_props>

                <bio:ion_props name="ca">
                    <bio:parameter name="conc_e" value="2.0E-6">
                        <bio:group>ModelViewParmSubset_9</bio:group>
                    </bio:parameter>

                    <bio:parameter name="conc_i" value="1.0E-8">
                        <bio:group>ModelViewParmSubset_9</bio:group>
                    </bio:parameter>
                </bio:ion_props>

                <bio:ion_props name="k">
                    <bio:parameter name="e" value="-95.0">
                        <bio:group>all</bio:group>
                    </bio:parameter>
                </bio:ion_props>

                <bio:ion_props name="na">
                    <bio:parameter name="e" value="50.0">
                        <bio:group>all</bio:group>
                    </bio:parameter>
                </bio:ion_props>
            </biophysics>

            <connectivity>
                <net:potential_syn_loc synapse_type="Syn_AMPA_L4SS_Pyr">
                    <net:group>L4SS_dends</net:group>
                </net:potential_syn_loc>

                <net:potential_syn_loc synapse_type="Syn_AMPA_L5IB_L5Pyr">
                    <net:group>dends_no_tuft</net:group>
                </net:potential_syn_loc>

                <net:potential_syn_loc synapse_type="Syn_AMPA_L5RS_DeepFS">
                    <net:group>distal_axon</net:group>
                </net:potential_syn_loc>

                <net:potential_syn_loc synapse_type="Syn_AMPA_L5RS_DeepLTS">
                    <net:group>distal_axon</net:group>
                </net:potential_syn_loc>

                <net:potential_syn_loc synapse_type="Syn_AMPA_L5RS_L4SS">
                    <net:group>distal_axon</net:group>
                </net:potential_syn_loc>

                <net:potential_syn_loc synapse_type="Syn_AMPA_L5RS_L5Pyr">
                    <net:group>dends_no_tuft</net:group>

                    <net:group>distal_axon</net:group>
                </net:potential_syn_loc>

                <net:potential_syn_loc synapse_type="Syn_AMPA_L5RS_L6NT">
                    <net:group>distal_axon</net:group>
                </net:potential_syn_loc>

                <net:potential_syn_loc synapse_type="Syn_AMPA_L5RS_SupFS">
                    <net:group>distal_axon</net:group>
                </net:potential_syn_loc>

                <net:potential_syn_loc synapse_type="Syn_AMPA_L5RS_SupLTS">
                    <net:group>distal_axon</net:group>
                </net:potential_syn_loc>

                <net:potential_syn_loc synapse_type="Syn_AMPA_L5RS_SupPyr">
                    <net:group>distal_axon</net:group>
                </net:potential_syn_loc>

                <net:potential_syn_loc synapse_type="Syn_AMPA_L6NT_DeepFS">
                    <net:group>distal_axon</net:group>
                </net:potential_syn_loc>

                <net:potential_syn_loc synapse_type="Syn_AMPA_L6NT_DeepLTS">
                    <net:group>distal_axon</net:group>
                </net:potential_syn_loc>

                <net:potential_syn_loc synapse_type="Syn_AMPA_L6NT_L5Pyr">
                    <net:group>dends_no_tuft</net:group>
                </net:potential_syn_loc>

                <net:potential_syn_loc synapse_type="Syn_AMPA_L6NT_SupFS">
                    <net:group>distal_axon</net:group>
                </net:potential_syn_loc>

                <net:potential_syn_loc synapse_type="Syn_AMPA_L6NT_SupLTS">
                    <net:group>distal_axon</net:group>
                </net:potential_syn_loc>

                <net:potential_syn_loc synapse_type="Syn_AMPA_SupPyr_L5Pyr">
                    <net:group>apic_shaft</net:group>
                </net:potential_syn_loc>

                <net:potential_syn_loc synapse_type="Syn_AMPA_TCR_L5Pyr">
                    <net:group>tuft_plus</net:group>
                </net:potential_syn_loc>

                <net:potential_syn_loc synapse_type="Syn_Elect_DeepPyr_DeepPyr" synapse_direction="pre">
                    <net:group>axon_group</net:group>
                </net:potential_syn_loc>

                <net:potential_syn_loc synapse_type="Syn_GABAA_DeepAxAx_Pyr">
                    <net:group>prox_axon</net:group>
                </net:potential_syn_loc>

                <net:potential_syn_loc synapse_type="Syn_GABAA_DeepBask_L5Pyr">
                    <net:group>DeepBask_dends</net:group>
                </net:potential_syn_loc>

                <net:potential_syn_loc synapse_type="Syn_GABAA_DeepLTS_L5RS">
                    <net:group>dend_tips_shaft</net:group>
                </net:potential_syn_loc>

                <net:potential_syn_loc synapse_type="Syn_GABAA_SupAxAx_DeepPyr">
                    <net:group>prox_axon</net:group>
                </net:potential_syn_loc>

                <net:potential_syn_loc synapse_type="Syn_GABAA_SupLTS_L5Pyr">
                    <net:group>dend_tips_shaft</net:group>
                </net:potential_syn_loc>

                <net:potential_syn_loc synapse_type="Syn_NMDA_L4SS_Pyr">
                    <net:group>L4SS_dends</net:group>
                </net:potential_syn_loc>

                <net:potential_syn_loc synapse_type="Syn_NMDA_L5IB_DeepPyr">
                    <net:group>dends_no_tuft</net:group>
                </net:potential_syn_loc>

                <net:potential_syn_loc synapse_type="Syn_NMDA_L5RS_DeepIN">
                    <net:group>distal_axon</net:group>
                </net:potential_syn_loc>

                <net:potential_syn_loc synapse_type="Syn_NMDA_L5RS_DeepPyr">
                    <net:group>dends_no_tuft</net:group>

                    <net:group>distal_axon</net:group>
                </net:potential_syn_loc>

                <net:potential_syn_loc synapse_type="Syn_NMDA_L5RS_L4SS">
                    <net:group>distal_axon</net:group>
                </net:potential_syn_loc>

                <net:potential_syn_loc synapse_type="Syn_NMDA_L5RS_SupIN">
                    <net:group>distal_axon</net:group>
                </net:potential_syn_loc>

                <net:potential_syn_loc synapse_type="Syn_NMDA_L5RS_SupPyr">
                    <net:group>distal_axon</net:group>
                </net:potential_syn_loc>

                <net:potential_syn_loc synapse_type="Syn_NMDA_L6NT_DeepFS">
                    <net:group>distal_axon</net:group>
                </net:potential_syn_loc>

                <net:potential_syn_loc synapse_type="Syn_NMDA_L6NT_DeepLTS">
                    <net:group>distal_axon</net:group>
                </net:potential_syn_loc>

                <net:potential_syn_loc synapse_type="Syn_NMDA_L6NT_DeepPyr">
                    <net:group>dends_no_tuft</net:group>
                </net:potential_syn_loc>

                <net:potential_syn_loc synapse_type="Syn_NMDA_L6NT_SupFS">
                    <net:group>distal_axon</net:group>
                </net:potential_syn_loc>

                <net:potential_syn_loc synapse_type="Syn_NMDA_L6NT_SupLTS">
                    <net:group>distal_axon</net:group>
                </net:potential_syn_loc>

                <net:potential_syn_loc synapse_type="Syn_NMDA_SupPyr_L5Pyr">
                    <net:group>apic_shaft</net:group>
                </net:potential_syn_loc>

                <net:potential_syn_loc synapse_type="Syn_NMDA_TCR_L5Pyr">
                    <net:group>tuft_plus</net:group>
                </net:potential_syn_loc>
            </connectivity>

        </cell>
    </cells>
</neuroml>
