<?xml version="1.0" encoding="UTF-8"?>
<neuroml xmlns="http://morphml.org/neuroml/schema" xmlns:meta="http://morphml.org/metadata/schema" xmlns:mml="http://morphml.org/morphml/schema" xmlns:bio="http://morphml.org/biophysics/schema" xmlns:cml="http://morphml.org/channelml/schema" xmlns:net="http://morphml.org/networkml/schema" xmlns:xsi="http://www.w3.org/2001/XMLSchema-instance" xsi:schemaLocation="http://morphml.org/neuroml/schema  http://www.neuroml.org/NeuroMLValidator/NeuroMLFiles/Schemata/v1.8.1/Level3/NeuroML_Level3_v1.8.1.xsd" lengthUnits="micron">

    <cells>
        <cell name="SupLTSInter">

            <meta:notes>Cell: supLTS_0 exported from NEURON ModelView</meta:notes>

            <mml:segments>

                <mml:segment id="0" name="Seg0_comp_1" cable="0">
                    <mml:proximal x="0.0" y="0.0" z="0.0" diameter="15.0"/>
                    <mml:distal x="0.0" y="10.0" z="0.0" diameter="15.0"/>
                </mml:segment>

                <mml:segment id="1" name="Seg1_comp_1" parent="0" cable="0">
                    <mml:distal x="-4.371139E-7" y="20.0" z="0.0" diameter="15.0"/>
                </mml:segment>

                <mml:segment id="106" name="Seg0_comp_54" parent="0" cable="1">
                    <mml:proximal x="4.371139E-7" y="0.0" z="0.0" diameter="1.4"/>
                    <mml:distal x="-3.7745E-7" y="-25.0" z="0.0" diameter="1.4"/>
                </mml:segment>

                <mml:segment id="107" name="Seg1_comp_54" parent="106" cable="1">
                    <mml:distal x="-1.1920139E-6" y="-50.0" z="0.0" diameter="1.4"/>
                </mml:segment>

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
            </mml:segments>

            <mml:cables>

                <mml:cable id="0" name="comp_1">
                    <meta:properties>

                    <meta:property tag="numberInternalDivisions" value="2"/>

                    </meta:properties>

                    <meta:group>all</meta:group>
                    <meta:group>ModelViewParmSubset_1</meta:group>
                    <meta:group>ModelViewParmSubset_4</meta:group>
                    <meta:group>OneSecGrp_SectionRef_1</meta:group>
                    <meta:group>soma_group</meta:group>
                    <meta:group>prox_dend_soma</meta:group>
                    <meta:group>prox_mid_dends</meta:group>
                </mml:cable>

                <mml:cable id="1" name="comp_54" fract_along_parent="0.0">
                    <meta:properties>

                    <meta:property tag="numberInternalDivisions" value="54"/>

                    </meta:properties>

                    <meta:group>all</meta:group>
                    <meta:group>ModelViewParmSubset_2</meta:group>
                    <meta:group>axon_group</meta:group>
                    <meta:group>prox_axon</meta:group>
                </mml:cable>

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
            </mml:cables>

            <!--Adding the biophysical parameters-->

            <biophysics units="Physiological Units">

                <bio:mechanism name="ar" type="Channel Mechanism">
                    <bio:parameter name="gmax" value="0.0">
                        <bio:group>ModelViewParmSubset_1</bio:group>
                    </bio:parameter>
                    <bio:parameter name="erev" value="-40.0">    <!--Note: Units of extra parameters are not known, except if it's e!!-->

                        <bio:group>ModelViewParmSubset_1</bio:group>
                    </bio:parameter>
                    <bio:parameter name="m0" value="0.25">    <!--Note: Units of extra parameters are not known, except if it's e!!-->

                        <bio:group>ModelViewParmSubset_1</bio:group>
                    </bio:parameter>
                </bio:mechanism>

                <bio:mechanism name="cad" type="Ion Concentration">
                    <bio:parameter name="gmax" value="-1.0E8">
                        <bio:group>OneSecGrp_SectionRef_1</bio:group>
                    </bio:parameter>
                    <bio:parameter name="beta" value="0.02">    <!--Note: Units of extra parameters are not known, except if it's e!!-->

                        <bio:group>OneSecGrp_SectionRef_1</bio:group>
                    </bio:parameter>
                    <bio:parameter name="phi" value="260000.0">    <!--Note: Units of extra parameters are not known, except if it's e!!-->

                        <bio:group>OneSecGrp_SectionRef_1</bio:group>
                    </bio:parameter>
                </bio:mechanism>

                <bio:mechanism name="cad" type="Ion Concentration">
                    <bio:parameter name="gmax" value="-1.0E8">
                        <bio:group>ModelViewParmSubset_3</bio:group>
                    </bio:parameter>
                    <bio:parameter name="beta" value="0.05">    <!--Note: Units of extra parameters are not known, except if it's e!!-->

                        <bio:group>ModelViewParmSubset_3</bio:group>
                    </bio:parameter>
                    <bio:parameter name="phi" value="520000.0">    <!--Note: Units of extra parameters are not known, except if it's e!!-->

                        <bio:group>ModelViewParmSubset_3</bio:group>
                    </bio:parameter>
                </bio:mechanism>

                <bio:mechanism name="cal" type="Channel Mechanism">
                    <bio:parameter name="gmax" value="0.1">
                        <bio:group>ModelViewParmSubset_4</bio:group>
                    </bio:parameter>
                </bio:mechanism>

                <bio:mechanism name="cal" type="Channel Mechanism">
                    <bio:parameter name="gmax" value="0.2">
                        <bio:group>ModelViewParmSubset_5</bio:group>
                    </bio:parameter>
                </bio:mechanism>

                <bio:mechanism name="cat_a" type="Channel Mechanism">
                    <bio:parameter name="gmax" value="2.0">
                        <bio:group>ModelViewParmSubset_5</bio:group>
                    </bio:parameter>
                </bio:mechanism>

                <bio:mechanism name="cat_a" type="Channel Mechanism">
                    <bio:parameter name="gmax" value="0.05">
                        <bio:group>ModelViewParmSubset_4</bio:group>
                    </bio:parameter>
                </bio:mechanism>

                <bio:mechanism name="k2" type="Channel Mechanism">
                    <bio:parameter name="gmax" value="0.5">
                        <bio:group>all</bio:group>
                    </bio:parameter>
                </bio:mechanism>

                <bio:mechanism name="ka" type="Channel Mechanism">
                    <bio:parameter name="gmax" value="1.0">
                        <bio:group>all</bio:group>
                    </bio:parameter>
                </bio:mechanism>

                <bio:mechanism name="kahp_slower" type="Channel Mechanism">
                    <bio:parameter name="gmax" value="0.1">
                        <bio:group>ModelViewParmSubset_1</bio:group>
                    </bio:parameter>
                </bio:mechanism>

                <bio:mechanism name="kc_fast" type="Channel Mechanism">
                    <bio:parameter name="gmax" value="25.0">
                        <bio:group>ModelViewParmSubset_1</bio:group>
                    </bio:parameter>
                </bio:mechanism>

                <bio:mechanism name="kdr_fs" type="Channel Mechanism">
                    <bio:parameter name="gmax" value="100.0">
                        <bio:group>ModelViewParmSubset_4</bio:group>
                    </bio:parameter>
                </bio:mechanism>

                <bio:mechanism name="kdr_fs" type="Channel Mechanism">
                    <bio:parameter name="gmax" value="10.0">
                        <bio:group>ModelViewParmSubset_5</bio:group>
                    </bio:parameter>
                </bio:mechanism>

                <bio:mechanism name="kdr_fs" type="Channel Mechanism">
                    <bio:parameter name="gmax" value="400.0">
                        <bio:group>ModelViewParmSubset_2</bio:group>
                    </bio:parameter>
                </bio:mechanism>

                <bio:mechanism name="km" type="Channel Mechanism">
                    <bio:parameter name="gmax" value="0.5">
                        <bio:group>ModelViewParmSubset_1</bio:group>
                    </bio:parameter>
                </bio:mechanism>

                <bio:mechanism name="naf2" type="Channel Mechanism">
                    <bio:parameter name="gmax" value="10.0">
                        <bio:group>ModelViewParmSubset_5</bio:group>
                    </bio:parameter>
                    <bio:parameter name="a" value="0.0">    <!--Note: Units of extra parameters are not known, except if it's e!!-->

                        <bio:group>ModelViewParmSubset_5</bio:group>
                    </bio:parameter>
                    <bio:parameter name="b" value="0.0">    <!--Note: Units of extra parameters are not known, except if it's e!!-->

                        <bio:group>ModelViewParmSubset_5</bio:group>
                    </bio:parameter>
                    <bio:parameter name="c" value="0.0">    <!--Note: Units of extra parameters are not known, except if it's e!!-->

                        <bio:group>ModelViewParmSubset_5</bio:group>
                    </bio:parameter>
                    <bio:parameter name="d" value="0.0">    <!--Note: Units of extra parameters are not known, except if it's e!!-->

                        <bio:group>ModelViewParmSubset_5</bio:group>
                    </bio:parameter>
                    <bio:parameter name="fastNa_shift" value="-2.5">    <!--Note: Units of extra parameters are not known, except if it's e!!-->

                        <bio:group>ModelViewParmSubset_5</bio:group>
                    </bio:parameter>
                </bio:mechanism>

                <bio:mechanism name="naf2" type="Channel Mechanism">
                    <bio:parameter name="gmax" value="400.0">
                        <bio:group>ModelViewParmSubset_2</bio:group>
                    </bio:parameter>
                    <bio:parameter name="a" value="0.0">    <!--Note: Units of extra parameters are not known, except if it's e!!-->

                        <bio:group>ModelViewParmSubset_2</bio:group>
                    </bio:parameter>
                    <bio:parameter name="b" value="0.0">    <!--Note: Units of extra parameters are not known, except if it's e!!-->

                        <bio:group>ModelViewParmSubset_2</bio:group>
                    </bio:parameter>
                    <bio:parameter name="c" value="0.0">    <!--Note: Units of extra parameters are not known, except if it's e!!-->

                        <bio:group>ModelViewParmSubset_2</bio:group>
                    </bio:parameter>
                    <bio:parameter name="d" value="0.0">    <!--Note: Units of extra parameters are not known, except if it's e!!-->

                        <bio:group>ModelViewParmSubset_2</bio:group>
                    </bio:parameter>
                    <bio:parameter name="fastNa_shift" value="-2.5">    <!--Note: Units of extra parameters are not known, except if it's e!!-->

                        <bio:group>ModelViewParmSubset_2</bio:group>
                    </bio:parameter>
                </bio:mechanism>

                <bio:mechanism name="naf2" type="Channel Mechanism">
                    <bio:parameter name="gmax" value="60.0">
                        <bio:group>ModelViewParmSubset_4</bio:group>
                    </bio:parameter>
                    <bio:parameter name="a" value="0.0">    <!--Note: Units of extra parameters are not known, except if it's e!!-->

                        <bio:group>ModelViewParmSubset_4</bio:group>
                    </bio:parameter>
                    <bio:parameter name="b" value="0.0">    <!--Note: Units of extra parameters are not known, except if it's e!!-->

                        <bio:group>ModelViewParmSubset_4</bio:group>
                    </bio:parameter>
                    <bio:parameter name="c" value="0.0">    <!--Note: Units of extra parameters are not known, except if it's e!!-->

                        <bio:group>ModelViewParmSubset_4</bio:group>
                    </bio:parameter>
                    <bio:parameter name="d" value="0.0">    <!--Note: Units of extra parameters are not known, except if it's e!!-->

                        <bio:group>ModelViewParmSubset_4</bio:group>
                    </bio:parameter>
                    <bio:parameter name="fastNa_shift" value="-2.5">    <!--Note: Units of extra parameters are not known, except if it's e!!-->

                        <bio:group>ModelViewParmSubset_4</bio:group>
                    </bio:parameter>
                </bio:mechanism>

                <bio:mechanism name="nap" type="Channel Mechanism">
                    <bio:parameter name="gmax" value="0.0">
                        <bio:group>ModelViewParmSubset_1</bio:group>
                    </bio:parameter>
                </bio:mechanism>

                <bio:mechanism name="pas" type="Channel Mechanism" passive_conductance="true">
                    <bio:parameter name="e" value="-65.0">
                        <bio:group>ModelViewParmSubset_2</bio:group>
                    </bio:parameter>
                    <bio:parameter name="gmax" value="1.0">
                        <bio:group>ModelViewParmSubset_2</bio:group>
                    </bio:parameter>
                </bio:mechanism>

                <bio:mechanism name="pas" type="Channel Mechanism" passive_conductance="true">
                    <bio:parameter name="e" value="-65.0">
                        <bio:group>ModelViewParmSubset_1</bio:group>
                    </bio:parameter>
                    <bio:parameter name="gmax" value="0.04">
                        <bio:group>ModelViewParmSubset_1</bio:group>
                    </bio:parameter>
                </bio:mechanism>

                <bio:spec_capacitance>
                    <bio:parameter value="1.0">
                        <bio:group>all</bio:group>
                    </bio:parameter>
                </bio:spec_capacitance>

                <bio:spec_axial_resistance>
                    <bio:parameter value="0.1">
                        <bio:group>ModelViewParmSubset_2</bio:group>
                    </bio:parameter>

                    <bio:parameter value="0.2">
                        <bio:group>ModelViewParmSubset_1</bio:group>
                    </bio:parameter>
                </bio:spec_axial_resistance>

                <bio:init_memb_potential>
                    <bio:parameter value="-65.0">
                        <bio:group>all</bio:group>
                    </bio:parameter>
                </bio:init_memb_potential>

                <bio:ion_props name="ca">
                    <bio:parameter name="conc_e" value="2.0E-6">
                        <bio:group>ModelViewParmSubset_3</bio:group>
                    </bio:parameter>

                    <bio:parameter name="conc_i" value="1.0E-8">
                        <bio:group>ModelViewParmSubset_3</bio:group>
                    </bio:parameter>
                </bio:ion_props>

                <bio:ion_props name="ca">
                    <bio:parameter name="conc_e" value="2.0E-6">
                        <bio:group>OneSecGrp_SectionRef_1</bio:group>
                    </bio:parameter>

                    <bio:parameter name="conc_i" value="1.0E-8">
                        <bio:group>OneSecGrp_SectionRef_1</bio:group>
                    </bio:parameter>
                </bio:ion_props>

                <bio:ion_props name="k">
                    <bio:parameter name="e" value="-100.0">
                        <bio:group>all</bio:group>
                    </bio:parameter>
                </bio:ion_props>

                <bio:ion_props name="na">
                    <bio:parameter name="e" value="50.0">
                        <bio:group>all</bio:group>
                    </bio:parameter>
                </bio:ion_props>
            </biophysics>

            <connectivity>
                <net:potential_syn_loc synapse_type="Exc_Pyr_Int">
                    <net:group>soma_group</net:group>

                    <net:group>ModelViewParmSubset_3</net:group>
                </net:potential_syn_loc>

                <net:potential_syn_loc synapse_type="GapJunc">
                    <net:group>gap_dend</net:group>
                </net:potential_syn_loc>

                <net:potential_syn_loc synapse_type="GapJuncLTS">
                    <net:group>gap_dend</net:group>
                </net:potential_syn_loc>

                <net:potential_syn_loc synapse_type="GapJuncPara">
                    <net:group>gap_dend</net:group>
                </net:potential_syn_loc>

                <net:potential_syn_loc synapse_type="Inh_Bask_LTS">
                    <net:group>mid_dend</net:group>
                </net:potential_syn_loc>

                <net:potential_syn_loc synapse_type="Inh_LTS_FS">
                    <net:group>distal_axon</net:group>
                </net:potential_syn_loc>

                <net:potential_syn_loc synapse_type="Inh_LTS_LTS">
                    <net:group>mid_dend</net:group>

                    <net:group>distal_axon</net:group>
                </net:potential_syn_loc>

                <net:potential_syn_loc synapse_type="Inh_LTS_Pyr">
                    <net:group>distal_axon</net:group>
                </net:potential_syn_loc>

                <net:potential_syn_loc synapse_type="Syn_AMPA_L4SS_IN">
                    <net:group>mid_tip_dends</net:group>
                </net:potential_syn_loc>

                <net:potential_syn_loc synapse_type="Syn_AMPA_L5IB_SupLTS">
                    <net:group>mid_tip_dends</net:group>
                </net:potential_syn_loc>

                <net:potential_syn_loc synapse_type="Syn_AMPA_L5RS_SupLTS">
                    <net:group>mid_tip_dends</net:group>
                </net:potential_syn_loc>

                <net:potential_syn_loc synapse_type="Syn_AMPA_L6NT_SupLTS">
                    <net:group>mid_tip_dends</net:group>
                </net:potential_syn_loc>

                <net:potential_syn_loc synapse_type="Syn_AMPA_SupPyr_SupLTS">
                    <net:group>mid_tip_dends</net:group>
                </net:potential_syn_loc>

                <net:potential_syn_loc synapse_type="Syn_Elect_CortIN_CortIN">
                    <net:group>mid_tip_dends</net:group>
                </net:potential_syn_loc>

                <net:potential_syn_loc synapse_type="Syn_GABAA_DeepLTS_SupLTS">
                    <net:group>mid_dist_dends</net:group>
                </net:potential_syn_loc>

                <net:potential_syn_loc synapse_type="Syn_GABAA_SupBask_SupLTS">
                    <net:group>mid_tip_dends</net:group>
                </net:potential_syn_loc>

                <net:potential_syn_loc synapse_type="Syn_GABAA_SupLTS_FS">
                    <net:group>mid_tip_dends</net:group>

                    <net:group>distal_axon</net:group>
                </net:potential_syn_loc>

                <net:potential_syn_loc synapse_type="Syn_GABAA_SupLTS_L4SS">
                    <net:group>mid_tip_dends</net:group>

                    <net:group>distal_axon</net:group>
                </net:potential_syn_loc>

                <net:potential_syn_loc synapse_type="Syn_GABAA_SupLTS_L5Pyr">
                    <net:group>mid_tip_dends</net:group>

                    <net:group>distal_axon</net:group>
                </net:potential_syn_loc>

                <net:potential_syn_loc synapse_type="Syn_GABAA_SupLTS_L6NT">
                    <net:group>mid_tip_dends</net:group>

                    <net:group>distal_axon</net:group>
                </net:potential_syn_loc>

                <net:potential_syn_loc synapse_type="Syn_GABAA_SupLTS_LTS">
                    <net:group>mid_tip_dends</net:group>

                    <net:group>mid_dist_dends</net:group>

                    <net:group>distal_axon</net:group>
                </net:potential_syn_loc>

                <net:potential_syn_loc synapse_type="Syn_GABAA_SupLTS_SupPyr">
                    <net:group>mid_tip_dends</net:group>

                    <net:group>distal_axon</net:group>
                </net:potential_syn_loc>

                <net:potential_syn_loc synapse_type="Syn_NMDA_FRBPyr_SupLTS">
                    <net:group>mid_tip_dends</net:group>
                </net:potential_syn_loc>

                <net:potential_syn_loc synapse_type="Syn_NMDA_L4SS_IN">
                    <net:group>mid_tip_dends</net:group>
                </net:potential_syn_loc>

                <net:potential_syn_loc synapse_type="Syn_NMDA_L5IB_IN">
                    <net:group>mid_tip_dends</net:group>
                </net:potential_syn_loc>

                <net:potential_syn_loc synapse_type="Syn_NMDA_L5RS_SupIN">
                    <net:group>mid_tip_dends</net:group>
                </net:potential_syn_loc>

                <net:potential_syn_loc synapse_type="Syn_NMDA_L6NT_SupLTS">
                    <net:group>mid_tip_dends</net:group>
                </net:potential_syn_loc>

                <net:potential_syn_loc synapse_type="Syn_NMDA_RSPyr_SupLTS">
                    <net:group>mid_tip_dends</net:group>
                </net:potential_syn_loc>
            </connectivity>

        </cell>
    </cells>
</neuroml>
