<?xml version="1.0" encoding="UTF-8"?>
<channelml xmlns="http://morphml.org/channelml/schema" xmlns:xsi="http://www.w3.org/2001/XMLSchema-instance" xmlns:meta="http://morphml.org/metadata/schema" xsi:schemaLocation="http://morphml.org/channelml/schema  http://www.neuroml.org/NeuroMLValidator/NeuroMLFiles/Schemata/v1.8.1/Level2/ChannelML_v1.8.1.xsd" units="Physiological Units">

    <meta:notes>ChannelML file describing a single synaptic mechanism</meta:notes>

    <synapse_type name="Syn_Elect_DeepPyr_DeepPyr">

        <status value="stable"><meta:contributor><meta:name>Padraig Gleeson</meta:name></meta:contributor></status>

        <meta:notes>Electrical synapse with scaling constant c = 4 nS (translating to conductance of 4e-06 mS).
        Automatically generated by command:  genSyn.py Syn_Elect_DeepPyr_DeepPyr -1 4 -1 </meta:notes>

        <electrical_syn conductance="4e-06">

        </electrical_syn>

    </synapse_type>

</channelml>
