<?xml version="1.0" encoding="UTF-8"?>
<channelml xmlns="http://morphml.org/channelml/schema" xmlns:xsi="http://www.w3.org/2001/XMLSchema-instance" xmlns:meta="http://morphml.org/metadata/schema" xsi:schemaLocation="http://morphml.org/channelml/schema  http://www.neuroml.org/NeuroMLValidator/NeuroMLFiles/Schemata/v1.8.1/Level2/ChannelML_v1.8.1.xsd" units="Physiological Units">

    <meta:notes>ChannelML file describing a single synaptic mechanism</meta:notes>

    <synapse_type name="Syn_NMDA_SupPyr_SupPyr">

        <status value="stable"><meta:contributor><meta:name>Padraig Gleeson</meta:name></meta:contributor></status>

        <meta:notes>Synapse with syn scaling constant c = 0.025 nS (translating to max cond of 2.5e-08 mS), time course: 130 ms and reversal potential: 0 mV.
        Automatically generated by command:  genSyn.py Syn_NMDA_SupPyr_SupPyr 130 0.025 0 </meta:notes>

        <blocking_syn max_conductance="2.5e-08" rise_time="1" decay_time="130.0" reversal_potential="0.0">

            <block species="mg" conc="1.5e-6" eta="0.280112e6" gamma="0.062"/>  <!-- Taken from eqn (5) Jahr & Stevens 1990 -->

        </blocking_syn>

    </synapse_type>

</channelml>
