<?xml version="1.0" encoding="UTF-8"?>
<neuroml xmlns="http://morphml.org/neuroml/schema" xmlns:meta="http://morphml.org/metadata/schema" xmlns:mml="http://morphml.org/morphml/schema" xmlns:bio="http://morphml.org/biophysics/schema" xmlns:cml="http://morphml.org/channelml/schema" xmlns:net="http://morphml.org/networkml/schema" xmlns:xsi="http://www.w3.org/2001/XMLSchema-instance" xsi:schemaLocation="http://morphml.org/neuroml/schema  http://www.neuroml.org/NeuroMLValidator/NeuroMLFiles/Schemata/v1.8.1/Level3/NeuroML_Level3_v1.8.1.xsd" lengthUnits="micron">

    <cells>
        <cell name="TCR">

            <meta:notes>Cell: TCR_0 exported from NEURON ModelView</meta:notes>

            <mml:segments>

                <mml:segment id="0" name="Seg0_comp_1" cable="0">
                    <mml:proximal x="0.0" y="0.0" z="0.0" diameter="20.0"/>
                    <mml:distal x="0.0" y="21.0" z="0.0" diameter="20.0"/>
                </mml:segment>

                <mml:segment id="1" name="Seg1_comp_1" parent="0" cable="0">
                    <mml:distal x="-9.179392E-7" y="42.0" z="0.0" diameter="20.0"/>
                </mml:segment>

                <mml:segment id="262" name="Seg0_comp_132" parent="0" cable="1">
                    <mml:proximal x="9.179392E-7" y="0.0" z="0.0" diameter="1.6"/>
                    <mml:distal x="-1.7484616E-7" y="-25.0" z="0.0" diameter="1.6"/>
                </mml:segment>

                <mml:segment id="263" name="Seg1_comp_132" parent="262" cable="1">
                    <mml:distal x="-1.2676315E-6" y="-50.0" z="0.0" diameter="1.6"/>
                </mml:segment>

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
            </mml:segments>

            <mml:cables>

                <mml:cable id="0" name="comp_1">
                    <meta:properties>

                    <meta:property tag="numberInternalDivisions" value="2"/>

                    </meta:properties>

                    <meta:group>all</meta:group>
                    <meta:group>ModelViewParmSubset_1</meta:group>
                    <meta:group>ModelViewParmSubset_2</meta:group>
                    <meta:group>OneSecGrp_SectionRef_1</meta:group>
                    <meta:group>soma_group</meta:group>
                    <meta:group>ModelViewParmSubset_8</meta:group>
                    <meta:group>soma_prox_dends</meta:group>
                </mml:cable>

                <mml:cable id="1" name="comp_132" fract_along_parent="0.0">
                    <meta:properties>

                    <meta:property tag="numberInternalDivisions" value="25"/>

                    </meta:properties>

                    <meta:group>all</meta:group>
                    <meta:group>ModelViewParmSubset_2</meta:group>
                    <meta:group>ModelViewParmSubset_3</meta:group>
                    <meta:group>ModelViewParmSubset_10</meta:group>
                    <meta:group>axon_group</meta:group>
                </mml:cable>

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
            </mml:cables>

            <!--Adding the biophysical parameters-->

            <biophysics units="Physiological Units">

                <bio:mechanism name="ar" type="Channel Mechanism">
                    <bio:parameter name="gmax" value="0.25">
                        <bio:group>OneSecGrp_SectionRef_1</bio:group>
                    </bio:parameter>
                    <bio:parameter name="erev" value="-35.0">    <!--Note: Units of extra parameters are not known, except if it's e!!-->

                        <bio:group>OneSecGrp_SectionRef_1</bio:group>
                    </bio:parameter>
                    <bio:parameter name="m0" value="0.25">    <!--Note: Units of extra parameters are not known, except if it's e!!-->

                        <bio:group>OneSecGrp_SectionRef_1</bio:group>
                    </bio:parameter>
                </bio:mechanism>

                <bio:mechanism name="ar" type="Channel Mechanism">
                    <bio:parameter name="gmax" value="0.3">
                        <bio:group>ModelViewParmSubset_4</bio:group>
                    </bio:parameter>
                    <bio:parameter name="erev" value="-35.0">    <!--Note: Units of extra parameters are not known, except if it's e!!-->

                        <bio:group>ModelViewParmSubset_4</bio:group>
                    </bio:parameter>
                    <bio:parameter name="m0" value="0.25">    <!--Note: Units of extra parameters are not known, except if it's e!!-->

                        <bio:group>ModelViewParmSubset_4</bio:group>
                    </bio:parameter>
                </bio:mechanism>

                <bio:mechanism name="ar" type="Channel Mechanism">
                    <bio:parameter name="gmax" value="0.5">
                        <bio:group>prox_dends</bio:group>
                    </bio:parameter>
                    <bio:parameter name="erev" value="-35.0">    <!--Note: Units of extra parameters are not known, except if it's e!!-->

                        <bio:group>prox_dends</bio:group>
                    </bio:parameter>
                    <bio:parameter name="m0" value="0.25">    <!--Note: Units of extra parameters are not known, except if it's e!!-->

                        <bio:group>prox_dends</bio:group>
                    </bio:parameter>
                </bio:mechanism>

                <bio:mechanism name="cad" type="Ion Concentration">
                    <bio:parameter name="gmax" value="-1.0E8">
                        <bio:group>OneSecGrp_SectionRef_1</bio:group>
                    </bio:parameter>
                    <bio:parameter name="beta" value="0.02">    <!--Note: Units of extra parameters are not known, except if it's e!!-->

                        <bio:group>OneSecGrp_SectionRef_1</bio:group>
                    </bio:parameter>
                    <bio:parameter name="phi" value="52000.0">    <!--Note: Units of extra parameters are not known, except if it's e!!-->

                        <bio:group>OneSecGrp_SectionRef_1</bio:group>
                    </bio:parameter>
                </bio:mechanism>

                <bio:mechanism name="cad" type="Ion Concentration">
                    <bio:parameter name="gmax" value="-1.0E8">
                        <bio:group>ModelViewParmSubset_6</bio:group>
                    </bio:parameter>
                    <bio:parameter name="beta" value="0.05">    <!--Note: Units of extra parameters are not known, except if it's e!!-->

                        <bio:group>ModelViewParmSubset_6</bio:group>
                    </bio:parameter>
                    <bio:parameter name="phi" value="104000.0">    <!--Note: Units of extra parameters are not known, except if it's e!!-->

                        <bio:group>ModelViewParmSubset_6</bio:group>
                    </bio:parameter>
                </bio:mechanism>

                <bio:mechanism name="cal" type="Channel Mechanism">
                    <bio:parameter name="gmax" value="0.25">
                        <bio:group>ModelViewParmSubset_4</bio:group>
                    </bio:parameter>
                </bio:mechanism>

                <bio:mechanism name="cal" type="Channel Mechanism">
                    <bio:parameter name="gmax" value="0.5">
                        <bio:group>soma_prox_dends</bio:group>
                    </bio:parameter>
                </bio:mechanism>

                <bio:mechanism name="cat" type="Channel Mechanism">
                    <bio:parameter name="gmax" value="3.0">
                        <bio:group>ModelViewParmSubset_9</bio:group>
                    </bio:parameter>
                </bio:mechanism>

                <bio:mechanism name="cat" type="Channel Mechanism">
                    <bio:parameter name="gmax" value="0.5">
                        <bio:group>ModelViewParmSubset_8</bio:group>
                    </bio:parameter>
                </bio:mechanism>

                <bio:mechanism name="k2" type="Channel Mechanism">
                    <bio:parameter name="gmax" value="2.0">
                        <bio:group>ModelViewParmSubset_1</bio:group>
                    </bio:parameter>
                </bio:mechanism>

                <bio:mechanism name="k2" type="Channel Mechanism">
                    <bio:parameter name="gmax" value="0.5">
                        <bio:group>ModelViewParmSubset_3</bio:group>
                    </bio:parameter>
                </bio:mechanism>

                <bio:mechanism name="ka" type="Channel Mechanism">
                    <bio:parameter name="gmax" value="0.2">
                        <bio:group>ModelViewParmSubset_10</bio:group>
                    </bio:parameter>
                </bio:mechanism>

                <bio:mechanism name="ka" type="Channel Mechanism">
                    <bio:parameter name="gmax" value="6.0">
                        <bio:group>soma_prox_dends</bio:group>
                    </bio:parameter>
                </bio:mechanism>

                <bio:mechanism name="kahp_slower" type="Channel Mechanism">
                    <bio:parameter name="gmax" value="0.05">
                        <bio:group>ModelViewParmSubset_1</bio:group>
                    </bio:parameter>
                </bio:mechanism>

                <bio:mechanism name="kc" type="Channel Mechanism">
                    <bio:parameter name="gmax" value="12.0">
                        <bio:group>soma_prox_dends</bio:group>
                    </bio:parameter>
                </bio:mechanism>

                <bio:mechanism name="kc" type="Channel Mechanism">
                    <bio:parameter name="gmax" value="20.0">
                        <bio:group>ModelViewParmSubset_4</bio:group>
                    </bio:parameter>
                </bio:mechanism>

                <bio:mechanism name="kdr" type="Channel Mechanism">
                    <bio:parameter name="gmax" value="180.0">
                        <bio:group>ModelViewParmSubset_3</bio:group>
                    </bio:parameter>
                </bio:mechanism>

                <bio:mechanism name="kdr" type="Channel Mechanism">
                    <bio:parameter name="gmax" value="22.5">
                        <bio:group>prox_dends</bio:group>
                    </bio:parameter>
                </bio:mechanism>

                <bio:mechanism name="kdr" type="Channel Mechanism">
                    <bio:parameter name="gmax" value="33.75">
                        <bio:group>OneSecGrp_SectionRef_1</bio:group>
                    </bio:parameter>
                </bio:mechanism>

                <bio:mechanism name="km" type="Channel Mechanism">
                    <bio:parameter name="gmax" value="0.5">
                        <bio:group>ModelViewParmSubset_1</bio:group>
                    </bio:parameter>
                </bio:mechanism>

                <bio:mechanism name="naf_tcr" type="Channel Mechanism">
                    <bio:parameter name="gmax" value="100.0">
                        <bio:group>soma_prox_dends</bio:group>
                    </bio:parameter>
                    <bio:parameter name="shift_hnaf" value="-7.0">    <!--Note: Units of extra parameters are not known, except if it's e!!-->

                        <bio:group>soma_prox_dends</bio:group>
                    </bio:parameter>
                    <bio:parameter name="shift_mnaf_init" value="-3.0">    <!--Note: Units of extra parameters are not known, except if it's e!!-->

                        <bio:group>soma_prox_dends</bio:group>
                    </bio:parameter>
                    <bio:parameter name="shift_mnaf_run" value="-2.5">    <!--Note: Units of extra parameters are not known, except if it's e!!-->

                        <bio:group>soma_prox_dends</bio:group>
                    </bio:parameter>
                </bio:mechanism>

                <bio:mechanism name="naf_tcr" type="Channel Mechanism">
                    <bio:parameter name="gmax" value="400.0">
                        <bio:group>ModelViewParmSubset_3</bio:group>
                    </bio:parameter>
                    <bio:parameter name="shift_hnaf" value="-7.0">    <!--Note: Units of extra parameters are not known, except if it's e!!-->

                        <bio:group>ModelViewParmSubset_3</bio:group>
                    </bio:parameter>
                    <bio:parameter name="shift_mnaf_init" value="-3.0">    <!--Note: Units of extra parameters are not known, except if it's e!!-->

                        <bio:group>ModelViewParmSubset_3</bio:group>
                    </bio:parameter>
                    <bio:parameter name="shift_mnaf_run" value="-2.5">    <!--Note: Units of extra parameters are not known, except if it's e!!-->

                        <bio:group>ModelViewParmSubset_3</bio:group>
                    </bio:parameter>
                </bio:mechanism>

                <bio:mechanism name="naf_tcr" type="Channel Mechanism">
                    <bio:parameter name="gmax" value="5.0">
                        <bio:group>ModelViewParmSubset_4</bio:group>
                    </bio:parameter>
                    <bio:parameter name="shift_hnaf" value="-7.0">    <!--Note: Units of extra parameters are not known, except if it's e!!-->

                        <bio:group>ModelViewParmSubset_4</bio:group>
                    </bio:parameter>
                    <bio:parameter name="shift_mnaf_init" value="-3.0">    <!--Note: Units of extra parameters are not known, except if it's e!!-->

                        <bio:group>ModelViewParmSubset_4</bio:group>
                    </bio:parameter>
                    <bio:parameter name="shift_mnaf_run" value="-2.5">    <!--Note: Units of extra parameters are not known, except if it's e!!-->

                        <bio:group>ModelViewParmSubset_4</bio:group>
                    </bio:parameter>
                </bio:mechanism>

                <bio:mechanism name="napf_tcr" type="Channel Mechanism">
                    <bio:parameter name="gmax" value="0.01">
                        <bio:group>ModelViewParmSubset_4</bio:group>
                    </bio:parameter>
                    <bio:parameter name="a" value="0.0">    <!--Note: Units of extra parameters are not known, except if it's e!!-->

                        <bio:group>ModelViewParmSubset_4</bio:group>
                    </bio:parameter>
                    <bio:parameter name="b" value="0.0">    <!--Note: Units of extra parameters are not known, except if it's e!!-->

                        <bio:group>ModelViewParmSubset_4</bio:group>
                    </bio:parameter>
                    <bio:parameter name="c" value="0.0">    <!--Note: Units of extra parameters are not known, except if it's e!!-->

                        <bio:group>ModelViewParmSubset_4</bio:group>
                    </bio:parameter>
                    <bio:parameter name="d" value="0.0">    <!--Note: Units of extra parameters are not known, except if it's e!!-->

                        <bio:group>ModelViewParmSubset_4</bio:group>
                    </bio:parameter>
                    <bio:parameter name="fastNa_shift" value="7.0">    <!--Note: Units of extra parameters are not known, except if it's e!!-->

                        <bio:group>ModelViewParmSubset_4</bio:group>
                    </bio:parameter>
                </bio:mechanism>

                <bio:mechanism name="napf_tcr" type="Channel Mechanism">
                    <bio:parameter name="gmax" value="0.2">
                        <bio:group>soma_prox_dends</bio:group>
                    </bio:parameter>
                    <bio:parameter name="a" value="0.0">    <!--Note: Units of extra parameters are not known, except if it's e!!-->

                        <bio:group>soma_prox_dends</bio:group>
                    </bio:parameter>
                    <bio:parameter name="b" value="0.0">    <!--Note: Units of extra parameters are not known, except if it's e!!-->

                        <bio:group>soma_prox_dends</bio:group>
                    </bio:parameter>
                    <bio:parameter name="c" value="0.0">    <!--Note: Units of extra parameters are not known, except if it's e!!-->

                        <bio:group>soma_prox_dends</bio:group>
                    </bio:parameter>
                    <bio:parameter name="d" value="0.0">    <!--Note: Units of extra parameters are not known, except if it's e!!-->

                        <bio:group>soma_prox_dends</bio:group>
                    </bio:parameter>
                    <bio:parameter name="fastNa_shift" value="7.0">    <!--Note: Units of extra parameters are not known, except if it's e!!-->

                        <bio:group>soma_prox_dends</bio:group>
                    </bio:parameter>
                </bio:mechanism>

                <bio:mechanism name="pas" type="Channel Mechanism" passive_conductance="true">
                    <bio:parameter name="e" value="-70.0">
                        <bio:group>ModelViewParmSubset_3</bio:group>
                    </bio:parameter>
                    <bio:parameter name="gmax" value="1.0">
                        <bio:group>ModelViewParmSubset_3</bio:group>
                    </bio:parameter>
                </bio:mechanism>

                <bio:mechanism name="pas" type="Channel Mechanism" passive_conductance="true">
                    <bio:parameter name="e" value="-70.0">
                        <bio:group>ModelViewParmSubset_1</bio:group>
                    </bio:parameter>
                    <bio:parameter name="gmax" value="0.0378788">
                        <bio:group>ModelViewParmSubset_1</bio:group>
                    </bio:parameter>
                </bio:mechanism>

                <bio:spec_capacitance>
                    <bio:parameter value="0.9">
                        <bio:group>all</bio:group>
                    </bio:parameter>
                </bio:spec_capacitance>

                <bio:spec_axial_resistance>
                    <bio:parameter value="0.1">
                        <bio:group>ModelViewParmSubset_3</bio:group>
                    </bio:parameter>

                    <bio:parameter value="0.175">
                        <bio:group>ModelViewParmSubset_1</bio:group>
                    </bio:parameter>
                </bio:spec_axial_resistance>

                <bio:init_memb_potential>
                    <bio:parameter value="-70.0">
                        <bio:group>all</bio:group>
                    </bio:parameter>
                </bio:init_memb_potential>

                <bio:ion_props name="ca">
                    <bio:parameter name="conc_e" value="2.0E-6">
                        <bio:group>ModelViewParmSubset_6</bio:group>
                    </bio:parameter>

                    <bio:parameter name="conc_i" value="1.0E-8">
                        <bio:group>ModelViewParmSubset_6</bio:group>
                    </bio:parameter>
                </bio:ion_props>

                <bio:ion_props name="ca">
                    <bio:parameter name="conc_e" value="2.0E-6">
                        <bio:group>OneSecGrp_SectionRef_1</bio:group>
                    </bio:parameter>

                    <bio:parameter name="conc_i" value="1.0E-8">
                        <bio:group>OneSecGrp_SectionRef_1</bio:group>
                    </bio:parameter>
                </bio:ion_props>

                <bio:ion_props name="k">
                    <bio:parameter name="e" value="-95.0">
                        <bio:group>all</bio:group>
                    </bio:parameter>
                </bio:ion_props>

                <bio:ion_props name="na">
                    <bio:parameter name="e" value="50.0">
                        <bio:group>all</bio:group>
                    </bio:parameter>
                </bio:ion_props>
            </biophysics>

            <connectivity>
                <net:potential_syn_loc synapse_type="Syn_AMPA_L6NT_TCR">
                    <net:group>distal_dends</net:group>
                </net:potential_syn_loc>

                <net:potential_syn_loc synapse_type="Syn_AMPA_TCR_DeepAxAx">
                    <net:group>distal_axon</net:group>
                </net:potential_syn_loc>

                <net:potential_syn_loc synapse_type="Syn_AMPA_TCR_DeepBask">
                    <net:group>distal_axon</net:group>
                </net:potential_syn_loc>

                <net:potential_syn_loc synapse_type="Syn_AMPA_TCR_L4SS">
                    <net:group>distal_axon</net:group>
                </net:potential_syn_loc>

                <net:potential_syn_loc synapse_type="Syn_AMPA_TCR_L5Pyr">
                    <net:group>distal_axon</net:group>
                </net:potential_syn_loc>

                <net:potential_syn_loc synapse_type="Syn_AMPA_TCR_L6NT">
                    <net:group>distal_axon</net:group>
                </net:potential_syn_loc>

                <net:potential_syn_loc synapse_type="Syn_AMPA_TCR_SupFS">
                    <net:group>distal_axon</net:group>
                </net:potential_syn_loc>

                <net:potential_syn_loc synapse_type="Syn_AMPA_TCR_SupPyr">
                    <net:group>distal_axon</net:group>
                </net:potential_syn_loc>

                <net:potential_syn_loc synapse_type="Syn_AMPA_TCR_nRT">
                    <net:group>distal_axon</net:group>
                </net:potential_syn_loc>

                <net:potential_syn_loc synapse_type="Syn_GABAA_nRT_TCR_s">
                    <net:group>soma_prox_dends</net:group>
                </net:potential_syn_loc>

                <net:potential_syn_loc synapse_type="Syn_NMDA_L6NT_TCR">
                    <net:group>distal_dends</net:group>
                </net:potential_syn_loc>

                <net:potential_syn_loc synapse_type="Syn_NMDA_TCR_DeepAxAx">
                    <net:group>distal_axon</net:group>
                </net:potential_syn_loc>

                <net:potential_syn_loc synapse_type="Syn_NMDA_TCR_DeepBask">
                    <net:group>distal_axon</net:group>
                </net:potential_syn_loc>

                <net:potential_syn_loc synapse_type="Syn_NMDA_TCR_L4SS">
                    <net:group>distal_axon</net:group>
                </net:potential_syn_loc>

                <net:potential_syn_loc synapse_type="Syn_NMDA_TCR_L5Pyr">
                    <net:group>distal_axon</net:group>
                </net:potential_syn_loc>

                <net:potential_syn_loc synapse_type="Syn_NMDA_TCR_L6NT">
                    <net:group>distal_axon</net:group>
                </net:potential_syn_loc>

                <net:potential_syn_loc synapse_type="Syn_NMDA_TCR_SupFS">
                    <net:group>distal_axon</net:group>
                </net:potential_syn_loc>

                <net:potential_syn_loc synapse_type="Syn_NMDA_TCR_SupPyr">
                    <net:group>distal_axon</net:group>
                </net:potential_syn_loc>

                <net:potential_syn_loc synapse_type="Syn_NMDA_TCR_nRT">
                    <net:group>distal_axon</net:group>
                </net:potential_syn_loc>
            </connectivity>

        </cell>
    </cells>
</neuroml>
