<?xml version="1.0" encoding="UTF-8"?>
<channelml xmlns="http://morphml.org/channelml/schema"
           xmlns:xsi="http://www.w3.org/2001/XMLSchema-instance"
           xmlns:meta="http://morphml.org/metadata/schema"
           xsi:schemaLocation="http://morphml.org/channelml/schema  ../../../../NeuroMLValidator/web/NeuroMLFiles/Schemata/v1.8.0/Level2/ChannelML_v1.8.0.xsd"
           units="Physiological Units">

    <meta:notes>ChannelML file based on Traub et al. 2003</meta:notes>

    <channel_type name="ar">

        <status value="stable">
            <meta:comment>Verified equivalence of NEURON and GENESIS mapping to orig NEURON mod impl at 0.02ms dt with current pulse</meta:comment>
            <meta:issue>In original mod, m is initialised to 0, as opposed to minf at t=0. ChannelML impl corrects this</meta:issue>
            <meta:issue>Parameter m0 should be used for the initialisation</meta:issue>
            <meta:contributor>
                <meta:name>Padraig Gleeson</meta:name>
            </meta:contributor>
            <meta:contributor>
                <meta:name>Yoana Dimitrova</meta:name>
            </meta:contributor>
        </status>

        <meta:notes>Anomalous Rectifier conductance, also known as h-conductance (hyperpolarizing). Based on NEURON port of FRB L2/3 model from Traub et al 2003. Same channel used in Traub et al 2005</meta:notes>

        <meta:authorList>
            <meta:modelAuthor>
                <meta:name>Maciej Lazarewicz</meta:name>
                <meta:comment>Conversion of FORTRAN model to NEURON. See Traub et al 2003 for detailed origin of channels</meta:comment>
            </meta:modelAuthor>
            <meta:modelAuthor>
                <meta:name>Roger D Traub</meta:name>
            </meta:modelAuthor>
            <meta:modelTranslator>
                <meta:name>Padraig Gleeson</meta:name>
                <meta:institution>UCL</meta:institution>
                <meta:email>p.gleeson - at - ucl.ac.uk</meta:email>
            </meta:modelTranslator>
            <meta:modelTranslator>
                <meta:name>Yoana Dimitrova</meta:name>
                <meta:institution>UCL</meta:institution>
            </meta:modelTranslator>
        </meta:authorList>

        <meta:publication>
            <meta:fullTitle>Roger D. Traub, Eberhard H. Buhl, Tengis Gloveli, and Miles A. Whittington
Fast Rhythmic Bursting Can Be Induced in Layer 2/3 Cortical Neurons by Enhancing Persistent Na+ Conductance or by Blocking BK Channels
J Neurophysiol 89: 909-921, 2003</meta:fullTitle>
            <meta:pubmedRef>http://www.ncbi.nlm.nih.gov/entrez/query.fcgi?cmd=Retrieve&amp;db=pubmed&amp;dopt=Abstract&amp;list_uids=12574468</meta:pubmedRef>
        </meta:publication>

        <meta:publication>
            <meta:fullTitle>Roger D. Traub, Diego Contreras, Mark O. Cunningham, Hilary Murray, Fiona E. N. LeBeau, Anita Roopun, Andrea Bibbig, W. Bryan Wilent, Michael J. Higley, and Miles A. Whittington
Single-column thalamocortical network model exhibiting gamma oscillations, sleep spindles, and epileptogenic bursts.
J. Neurophysiol. 93, 2194-2232, 2005</meta:fullTitle>
            <meta:pubmedRef>http://www.ncbi.nlm.nih.gov/pubmed/15525801?dopt=Abstract</meta:pubmedRef>
        </meta:publication>

        <meta:modelDBref>
            <meta:modelName>Mechanisms of fast rhythmic bursting in a layer 2/3 cortical neuron (Traub et al 2003)</meta:modelName>
            <meta:uri>http://senselab.med.yale.edu/ModelDB/ShowModel.asp?model=20756</meta:uri>
        </meta:modelDBref>

        <meta:modelDBref>
            <meta:modelName>A single column thalamocortical network model (Traub et al 2005)</meta:modelName>
            <meta:uri>http://senselab.med.yale.edu/ModelDb/ShowModel.asp?model=45539</meta:uri>
        </meta:modelDBref>

        <parameters>
            <parameter name="m0" value ="0"/>
        </parameters>

        <current_voltage_relation cond_law="ohmic" ion="ar" default_gmax="0.25" default_erev="-35">

            <gate name="m" instances="1">
                <closed_state id="mc"/>
                <open_state id="m"/>

                     <!-- An *incorrect* initialisation value for this, in order to compare to original mod file. Normally ignored-->
                <initialisation value="m0"/>

                     <!-- Note, extra brackets required to allow use of equation on GENESIS...-->
                <time_course name="tau" from="mc" to="m" expr_form="generic" expr="1 /((exp (-14.6 - (0.086 * v) )) + (exp (-1.87 + (0.07 * v))))" />

                <steady_state name="inf" from="mc" to="m" expr_form="sigmoid" rate="1" scale="5.5" midpoint="-75" />

            </gate>

        </current_voltage_relation>

        <impl_prefs>
            <comment>Using broad range of voltages for sufficient coverage</comment>
            <table_settings max_v="60" min_v="-120" table_divisions="741"/>
        </impl_prefs>

    </channel_type>
</channelml>
