<?xml version="1.0" encoding="UTF-8"?>
<neuroml xmlns="http://www.neuroml.org/schema/neuroml2" xmlns:xsi="http://www.w3.org/2001/XMLSchema-instance" xsi:schemaLocation="http://www.neuroml.org/schema/neuroml2  https://raw.github.com/NeuroML/NeuroML2/development/Schemas/NeuroML2/NeuroML_v2beta1.xsd" id="L5TuftedPyrIB">

    <include href="ar.nml"/>

    <include href="cad.nml"/>

    <include href="cal.nml"/>

    <include href="cat.nml"/>

    <include href="k2.nml"/>

    <include href="ka_ib.nml"/>

    <include href="kahp_deeppyr.nml"/>

    <include href="kc.nml"/>

    <include href="kdr.nml"/>

    <include href="km.nml"/>

    <include href="naf.nml"/>

    <include href="nap.nml"/>

    <include href="pas.nml"/>

    <cell id="L5TuftedPyrIB">

        <notes>Cell: tuftIB_0 exported from NEURON ModelView</notes>

        <morphology id="morphology_L5TuftedPyrIB">

            <segment id="0" name="Seg0_comp_1">
                <proximal x="0.0" y="0.0" z="0.0" diameter="18.0"/>
                <distal x="0.0" y="12.5" z="0.0" diameter="18.0"/>
            </segment>

            <segment id="1" name="Seg1_comp_1">
                <parent segment="0"/>
                <distal x="-0.0" y="25.0" z="0.0" diameter="18.0"/>
            </segment>

            <segment id="110" name="Seg0_comp_56">
                <parent segment="0" fractionAlong="0.0"/>
                <proximal x="0.0" y="0.0" z="0.0" diameter="1.8"/>
                <distal x="12.5" y="0.0" z="0.0" diameter="1.8"/>
            </segment>

            <segment id="111" name="Seg1_comp_56">
                <parent segment="110"/>
                <distal x="25.0" y="0.0" z="0.0" diameter="1.8"/>
            </segment>

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
            <segmentGroup id="comp_1">
                <member segment="0"/>

                <member segment="1"/>
            </segmentGroup>

            <segmentGroup id="comp_56">
                <member segment="110"/>

                <member segment="111"/>
            </segmentGroup>

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
            <segmentGroup id="ModelViewParmSubset_1">
                <include segmentGroup="comp_1"/>
                <include segmentGroup="comp_35"/>
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            </segmentGroup>

            <segmentGroup id="ModelViewParmSubset_2">
                <include segmentGroup="comp_1"/>
                <include segmentGroup="comp_56"/>
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            </segmentGroup>

            <segmentGroup id="ModelViewParmSubset_4">
                <include segmentGroup="comp_1"/>
                <include segmentGroup="comp_56"/>
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            </segmentGroup>

            <segmentGroup id="ModelViewParmSubset_12">
                <include segmentGroup="comp_1"/>
                <include segmentGroup="comp_38"/>
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            </segmentGroup>

            <segmentGroup id="OneSecGrp_SectionRef_1">
                <include segmentGroup="comp_1"/>
            </segmentGroup>

            <segmentGroup id="soma_group">
                <include segmentGroup="comp_1"/>
            </segmentGroup>

            <segmentGroup id="DeepBask_dends">
                <include segmentGroup="comp_1"/>
                <include segmentGroup="comp_35"/>
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            </segmentGroup>

            <segmentGroup id="axon_group">
                <include segmentGroup="comp_56"/>
                <include segmentGroup="comp_57"/>
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            </segmentGroup>

            <segmentGroup id="prox_axon">
                <include segmentGroup="comp_56"/>
            </segmentGroup>

            <segmentGroup id="dendrite_group">
                <include segmentGroup="comp_35"/>
                <include segmentGroup="comp_6"/>
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            </segmentGroup>

            <segmentGroup id="ModelViewParmSubset_5">
                <include segmentGroup="comp_35"/>
                <include segmentGroup="comp_6"/>
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            </segmentGroup>

            <segmentGroup id="ModelViewParmSubset_9">
                <include segmentGroup="comp_35"/>
                <include segmentGroup="comp_4"/>
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            </segmentGroup>

            <segmentGroup id="ModelViewParmSubset_14">
                <include segmentGroup="comp_35"/>
                <include segmentGroup="comp_6"/>
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            </segmentGroup>

            <segmentGroup id="ModelViewParmSubset_16">
                <include segmentGroup="comp_35"/>
                <include segmentGroup="comp_6"/>
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            </segmentGroup>

            <segmentGroup id="ModelViewParmSubset_20">
                <include segmentGroup="comp_35"/>
                <include segmentGroup="comp_6"/>
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            </segmentGroup>

            <segmentGroup id="OneSecGrp_SectionRef_3">
                <include segmentGroup="comp_35"/>
            </segmentGroup>

            <segmentGroup id="dends_no_tuft">
                <include segmentGroup="comp_35"/>
                <include segmentGroup="comp_6"/>
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            </segmentGroup>

            <segmentGroup id="ModelViewParmSubset_8">
                <include segmentGroup="comp_6"/>
                <include segmentGroup="comp_5"/>
                <include segmentGroup="comp_2"/>
            </segmentGroup>

            <segmentGroup id="ModelViewParmSubset_19">
                <include segmentGroup="comp_6"/>
                <include segmentGroup="comp_5"/>
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            </segmentGroup>

            <segmentGroup id="L4SS_dends">
                <include segmentGroup="comp_36"/>
                <include segmentGroup="comp_12"/>
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            </segmentGroup>

            <segmentGroup id="ModelViewParmSubset_17">
                <include segmentGroup="comp_17"/>
                <include segmentGroup="comp_16"/>
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            </segmentGroup>

            <segmentGroup id="dend_tips_shaft">
                <include segmentGroup="comp_17"/>
                <include segmentGroup="comp_16"/>
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            </segmentGroup>

            <segmentGroup id="distal_axon">
                <include segmentGroup="comp_61"/>
                <include segmentGroup="comp_60"/>
            </segmentGroup>

            <segmentGroup id="apic_shaft">
                <include segmentGroup="comp_39"/>
                <include segmentGroup="comp_40"/>
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            </segmentGroup>

            <segmentGroup id="ModelViewParmSubset_11">
                <include segmentGroup="comp_45"/>
                <include segmentGroup="comp_46"/>
                <include segmentGroup="comp_47"/>
            </segmentGroup>

            <segmentGroup id="ModelViewParmSubset_18">
                <include segmentGroup="comp_45"/>
                <include segmentGroup="comp_46"/>
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            </segmentGroup>

            <segmentGroup id="tuft_plus">
                <include segmentGroup="comp_47"/>
                <include segmentGroup="comp_49"/>
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            </segmentGroup>

            <segmentGroup id="ModelViewParmSubset_7">
                <include segmentGroup="comp_49"/>
                <include segmentGroup="comp_48"/>
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            </segmentGroup>

            <segmentGroup id="ModelViewParmSubset_13">
                <include segmentGroup="comp_49"/>
                <include segmentGroup="comp_48"/>
            </segmentGroup>

            <segmentGroup id="ModelViewParmSubset_10">
                <include segmentGroup="comp_51"/>
                <include segmentGroup="comp_50"/>
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            </segmentGroup>

        </morphology>

            <!--Adding the biophysical parameters-->

        <biophysicalProperties id="biophys">

            <membraneProperties>

                <channelDensity condDensity="-1.0E8 mS_per_cm2" id="ar_ModelViewParmSubset_1" ionChannel="ar" segmentGroup="ModelViewParmSubset_1" erev="-35.0 mV" m0="0.25" ion="ar">    <!--Note: Units of extra parameters are not known, except if it's e or erev!!-->
    <!--Note: Units of extra parameters are not known, except if it's e or erev!!-->
</channelDensity>

                <channelDensity condDensity="0.1 mS_per_cm2" id="ar_OneSecGrp_SectionRef_1" ionChannel="ar" segmentGroup="OneSecGrp_SectionRef_1" ion="ar" erev="-35.0 mV"/>

                <channelDensity condDensity="0.4 mS_per_cm2" id="ar_ModelViewParmSubset_7" ionChannel="ar" segmentGroup="ModelViewParmSubset_7" ion="ar" erev="-35.0 mV"/>

                <channelDensity condDensity="0.2 mS_per_cm2" id="ar_dends_no_tuft" ionChannel="ar" segmentGroup="dends_no_tuft" ion="ar" erev="-35.0 mV"/>

                <channelDensity condDensity="4.0 mS_per_cm2" id="cal_ModelViewParmSubset_12" ionChannel="cal" segmentGroup="ModelViewParmSubset_12" ion="ca" erev="125.0 mV"/>

                <channelDensity condDensity="5.4 mS_per_cm2" id="cal_ModelViewParmSubset_13" ionChannel="cal" segmentGroup="ModelViewParmSubset_13" ion="ca" erev="125.0 mV"/>

                <channelDensity condDensity="8.0 mS_per_cm2" id="cal_ModelViewParmSubset_14" ionChannel="cal" segmentGroup="ModelViewParmSubset_14" ion="ca" erev="125.0 mV"/>

                <channelDensity condDensity="1.2 mS_per_cm2" id="cal_ModelViewParmSubset_10" ionChannel="cal" segmentGroup="ModelViewParmSubset_10" ion="ca" erev="125.0 mV"/>

                <channelDensity condDensity="2.0 mS_per_cm2" id="cal_ModelViewParmSubset_11" ionChannel="cal" segmentGroup="ModelViewParmSubset_11" ion="ca" erev="125.0 mV"/>

                <channelDensity condDensity="0.1 mS_per_cm2" id="cat_OneSecGrp_SectionRef_1" ionChannel="cat" segmentGroup="OneSecGrp_SectionRef_1" ion="cat" erev="125.0 mV"/>

                <channelDensity condDensity="0.2 mS_per_cm2" id="cat_ModelViewParmSubset_5" ionChannel="cat" segmentGroup="ModelViewParmSubset_5" ion="cat" erev="125.0 mV"/>

                <channelDensity condDensity="1.0 mS_per_cm2" id="k2_ModelViewParmSubset_5" ionChannel="k2" segmentGroup="ModelViewParmSubset_5" ion="k" erev="-95.0 mV"/>

                <channelDensity condDensity="0.5 mS_per_cm2" id="k2_ModelViewParmSubset_4" ionChannel="k2" segmentGroup="ModelViewParmSubset_4" ion="k" erev="-95.0 mV"/>

                <channelDensity condDensity="1.2 mS_per_cm2" id="ka_ib_dend_tips_shaft" ionChannel="ka_ib" segmentGroup="dend_tips_shaft" ion="k" erev="-95.0 mV"/>

                <channelDensity condDensity="16.0 mS_per_cm2" id="ka_ib_ModelViewParmSubset_16" ionChannel="ka_ib" segmentGroup="ModelViewParmSubset_16" ion="k" erev="-95.0 mV"/>

                <channelDensity condDensity="0.6 mS_per_cm2" id="ka_ib_axon_group" ionChannel="ka_ib" segmentGroup="axon_group" ion="k" erev="-95.0 mV"/>

                <channelDensity condDensity="20.0 mS_per_cm2" id="ka_ib_OneSecGrp_SectionRef_1" ionChannel="ka_ib" segmentGroup="OneSecGrp_SectionRef_1" ion="k" erev="-95.0 mV"/>

                <channelDensity condDensity="0.4 mS_per_cm2" id="kahp_deeppyr_ModelViewParmSubset_5" ionChannel="kahp_deeppyr" segmentGroup="ModelViewParmSubset_5" ion="k" erev="-95.0 mV"/>

                <channelDensity condDensity="0.2 mS_per_cm2" id="kahp_deeppyr_OneSecGrp_SectionRef_1" ionChannel="kahp_deeppyr" segmentGroup="OneSecGrp_SectionRef_1" ion="k" erev="-95.0 mV"/>

                <channelDensity condDensity="2.4 mS_per_cm2" id="kc_ModelViewParmSubset_18" ionChannel="kc" segmentGroup="ModelViewParmSubset_18" ion="k" erev="-95.0 mV"/>

                <channelDensity condDensity="1.0 mS_per_cm2" id="kc_ModelViewParmSubset_17" ionChannel="kc" segmentGroup="ModelViewParmSubset_17" ion="k" erev="-95.0 mV"/>

                <channelDensity condDensity="32.0 mS_per_cm2" id="kc_ModelViewParmSubset_16" ionChannel="kc" segmentGroup="ModelViewParmSubset_16" ion="k" erev="-95.0 mV"/>

                <channelDensity condDensity="16.0 mS_per_cm2" id="kc_OneSecGrp_SectionRef_1" ionChannel="kc" segmentGroup="OneSecGrp_SectionRef_1" ion="k" erev="-95.0 mV"/>

                <channelDensity condDensity="170.0 mS_per_cm2" id="kdr_OneSecGrp_SectionRef_1" ionChannel="kdr" segmentGroup="OneSecGrp_SectionRef_1" ion="k" erev="-95.0 mV"/>

                <channelDensity condDensity="450.0 mS_per_cm2" id="kdr_axon_group" ionChannel="kdr" segmentGroup="axon_group" ion="k" erev="-95.0 mV"/>

                <channelDensity condDensity="150.0 mS_per_cm2" id="kdr_ModelViewParmSubset_19" ionChannel="kdr" segmentGroup="ModelViewParmSubset_19" ion="k" erev="-95.0 mV"/>

                <channelDensity condDensity="240.0 mS_per_cm2" id="kdr_OneSecGrp_SectionRef_3" ionChannel="kdr" segmentGroup="OneSecGrp_SectionRef_3" ion="k" erev="-95.0 mV"/>

                <channelDensity condDensity="11.9 mS_per_cm2" id="km_OneSecGrp_SectionRef_1" ionChannel="km" segmentGroup="OneSecGrp_SectionRef_1" ion="k" erev="-95.0 mV"/>

                <channelDensity condDensity="11.2 mS_per_cm2" id="km_ModelViewParmSubset_18" ionChannel="km" segmentGroup="ModelViewParmSubset_18" ion="k" erev="-95.0 mV"/>

                <channelDensity condDensity="38.08 mS_per_cm2" id="km_ModelViewParmSubset_20" ionChannel="km" segmentGroup="ModelViewParmSubset_20" ion="k" erev="-95.0 mV"/>

                <channelDensity condDensity="30.0 mS_per_cm2" id="km_axon_group" ionChannel="km" segmentGroup="axon_group" ion="k" erev="-95.0 mV"/>

                <channelDensity condDensity="-1.0E8 mS_per_cm2" id="naf_all" ionChannel="naf" a="0.0" b="0.0" c="0.0" d="0.0" fastNa_shift="-3.5" ion="na" erev="50.0 mV">    <!--Note: Units of extra parameters are not known, except if it's e or erev!!-->
    <!--Note: Units of extra parameters are not known, except if it's e or erev!!-->
    <!--Note: Units of extra parameters are not known, except if it's e or erev!!-->
    <!--Note: Units of extra parameters are not known, except if it's e or erev!!-->
    <!--Note: Units of extra parameters are not known, except if it's e or erev!!-->
</channelDensity>

                <channelDensity condDensity="30.0 mS_per_cm2" id="naf_ModelViewParmSubset_17" ionChannel="naf" segmentGroup="ModelViewParmSubset_17" ion="na" erev="50.0 mV"/>

                <channelDensity condDensity="150.0 mS_per_cm2" id="naf_ModelViewParmSubset_19" ionChannel="naf" segmentGroup="ModelViewParmSubset_19" ion="na" erev="50.0 mV"/>

                <channelDensity condDensity="200.0 mS_per_cm2" id="naf_OneSecGrp_SectionRef_1" ionChannel="naf" segmentGroup="OneSecGrp_SectionRef_1" ion="na" erev="50.0 mV"/>

                <channelDensity condDensity="300.0 mS_per_cm2" id="naf_OneSecGrp_SectionRef_3" ionChannel="naf" segmentGroup="OneSecGrp_SectionRef_3" ion="na" erev="50.0 mV"/>

                <channelDensity condDensity="450.0 mS_per_cm2" id="naf_axon_group" ionChannel="naf" segmentGroup="axon_group" ion="na" erev="50.0 mV"/>

                <channelDensity condDensity="6.0 mS_per_cm2" id="naf_ModelViewParmSubset_18" ionChannel="naf" segmentGroup="ModelViewParmSubset_18" ion="na" erev="50.0 mV"/>

                <channelDensity condDensity="0.0048 mS_per_cm2" id="nap_ModelViewParmSubset_18" ionChannel="nap" segmentGroup="ModelViewParmSubset_18" ion="na" erev="50.0 mV"/>

                <channelDensity condDensity="0.12 mS_per_cm2" id="nap_ModelViewParmSubset_19" ionChannel="nap" segmentGroup="ModelViewParmSubset_19" ion="na" erev="50.0 mV"/>

                <channelDensity condDensity="0.16 mS_per_cm2" id="nap_OneSecGrp_SectionRef_1" ionChannel="nap" segmentGroup="OneSecGrp_SectionRef_1" ion="na" erev="50.0 mV"/>

                <channelDensity condDensity="0.024 mS_per_cm2" id="nap_ModelViewParmSubset_17" ionChannel="nap" segmentGroup="ModelViewParmSubset_17" ion="na" erev="50.0 mV"/>

                <channelDensity condDensity="0.24 mS_per_cm2" id="nap_OneSecGrp_SectionRef_3" ionChannel="nap" segmentGroup="OneSecGrp_SectionRef_3" ion="na" erev="50.0 mV"/>

                <channelDensity condDensity="0.04 mS_per_cm2" id="pas_ModelViewParmSubset_5" ionChannel="pas" segmentGroup="ModelViewParmSubset_5" ion="non_specific" erev="-66.6 mV"/>

                <channelDensity condDensity="0.02 mS_per_cm2" id="pas_OneSecGrp_SectionRef_1" ionChannel="pas" segmentGroup="OneSecGrp_SectionRef_1" ion="non_specific" erev="-66.6 mV"/>

                <channelDensity condDensity="1.0 mS_per_cm2" id="pas_axon_group" ionChannel="pas" segmentGroup="axon_group" ion="non_specific" erev="-66.6 mV"/>

                <channelDensity condDensity="-1.0E8 mS_per_cm2" id="pas_all" ionChannel="pas" erev="-70.0 mV" ion="non_specific">    <!--Note: Units of extra parameters are not known, except if it's e or erev!!-->
</channelDensity>

                <spikeThresh value="0 mV"/>

                <specificCapacitance segmentGroup="ModelViewParmSubset_4" value="0.9 uF_per_cm2"/>

                <specificCapacitance segmentGroup="ModelViewParmSubset_5" value="1.8 uF_per_cm2"/>

                <initMembPotential value="-70.0 mV"/>

            </membraneProperties>

            <intracellularProperties>

                <species segmentGroup="ModelViewParmSubset_8" beta="0.02" phi="86666.7" id="ca" ion="ca" concentrationModel="cad">    <!--Note: Units of extra parameters are not known, except if it's e or erev!!-->
    <!--Note: Units of extra parameters are not known, except if it's e or erev!!-->
</species>

                <species segmentGroup="OneSecGrp_SectionRef_1" beta="0.01" phi="4333.33" id="ca" ion="ca" concentrationModel="cad">    <!--Note: Units of extra parameters are not known, except if it's e or erev!!-->
    <!--Note: Units of extra parameters are not known, except if it's e or erev!!-->
</species>

                <species segmentGroup="ModelViewParmSubset_9" beta="0.075" phi="86666.7" id="ca" ion="ca" concentrationModel="cad">    <!--Note: Units of extra parameters are not known, except if it's e or erev!!-->
    <!--Note: Units of extra parameters are not known, except if it's e or erev!!-->
</species>

                <resistivity segmentGroup="axon_group" value="0.1 kohm_cm"/>

                <resistivity segmentGroup="ModelViewParmSubset_1" value="0.25 kohm_cm"/>

            </intracellularProperties>

        </biophysicalProperties>

    </cell>

</neuroml>
