<?xml version="1.0" encoding="UTF-8"?>
<neuroml xmlns="http://www.neuroml.org/schema/neuroml2" xmlns:xsi="http://www.w3.org/2001/XMLSchema-instance" xsi:schemaLocation="http://www.neuroml.org/schema/neuroml2  https://raw.githubusercontent.com/NeuroML/NeuroML2/development/Schemas/NeuroML2/NeuroML_v2beta4.xsd" id="network_Thalamocortical6">

    <notes>

Network structure (NeuroML 2beta4) for project: Thalamocortical6 saved with neuroConstruct v1.7.1 on: 17:27:28, 01-May-15

Cell Group: CG_C04_FRB_sm contains 6 cells
Cell Group: CG_C04_LTS_sm contains 10 cells
Cell Group: CG_C04_AxAx_sm contains 10 cells
Cell Group: CG_C04_RS_sm contains 20 cells
Cell Group: CG_C04_Bask_sm contains 10 cells

Network connection: RS_RS_gap_sm contains 31 individual synaptic connections
Network connection: AxAx_AxAx_gap_sm contains 20 individual synaptic connections
Network connection: LTS_AxAx_sm contains 200 individual synaptic connections
Network connection: Bask_FRB_sm contains 120 individual synaptic connections
Network connection: Bask_Bask_gap_sm contains 20 individual synaptic connections
Network connection: Bask_Bask_sm contains 200 individual synaptic connections
Network connection: Bask_RS_sm contains 400 individual synaptic connections
Network connection: LTS_RS_sm contains 1200 individual synaptic connections
Network connection: LTS_LTS_gap_sm contains 20 individual synaptic connections
Network connection: Bask_AxAx_sm contains 200 individual synaptic connections
Network connection: FRB_LTS_sm contains 100 individual synaptic connections
Network connection: AxAx_FRB_sm contains 120 individual synaptic connections
Network connection: RS_Bask_sm contains 900 individual synaptic connections
Network connection: FRB_RS_gap_sm contains 10 individual synaptic connections
Network connection: RS_AxAx_sm contains 900 individual synaptic connections
Network connection: FRB_Bask_sm contains 100 individual synaptic connections
Network connection: LTS_Pyr_sm contains 360 individual synaptic connections
Network connection: RS_LTS_sm contains 900 individual synaptic connections
Network connection: LTS_LTS_sm contains 200 individual synaptic connections
Network connection: Bask_LTS_sm contains 200 individual synaptic connections
Network connection: FRB_FRB_sm contains 30 individual synaptic connections
Network connection: FRB_RS_sm contains 100 individual synaptic connections
Network connection: AxAx_RS_sm contains 400 individual synaptic connections
Network connection: LTS_Bask_sm contains 200 individual synaptic connections
Network connection: FRB_AxAx_sm contains 100 individual synaptic connections
Network connection: RS_FRB_sm contains 270 individual synaptic connections
Network connection: RS_RS_sm contains 900 individual synaptic connections

    </notes>

    <include href="ar.channel.nml"/>
    <include href="cal.channel.nml"/>
    <include href="cat.channel.nml"/>
    <include href="cat_a.channel.nml"/>
    <include href="Exc_Pyr_Int.synapse.nml"/>
    <include href="Exc_Pyr_Pyr.synapse.nml"/>
    <include href="GapJuncCML.nml"/>
    <include href="GapJuncFS.nml"/>
    <include href="GapJuncLTS.nml"/>
    <include href="Inh_Axo_Pyr.synapse.nml"/>
    <include href="Inh_Bask_FS.synapse.nml"/>
    <include href="Inh_Bask_LTS.synapse.nml"/>
    <include href="Inh_Bask_Pyr.synapse.nml"/>
    <include href="Inh_LTS_FS.synapse.nml"/>
    <include href="Inh_LTS_LTS.synapse.nml"/>
    <include href="Inh_LTS_Pyr.synapse.nml"/>
    <include href="k2.channel.nml"/>
    <include href="ka.channel.nml"/>
    <include href="kahp.channel.nml"/>
    <include href="kahp_slower.channel.nml"/>
    <include href="kc.channel.nml"/>
    <include href="kc_fast.channel.nml"/>
    <include href="kdr.channel.nml"/>
    <include href="kdr_fs.channel.nml"/>
    <include href="km.channel.nml"/>
    <include href="L23PyrFRB_varInit.cell.nml"/>
    <include href="L23PyrRS.cell.nml"/>
    <include href="naf.channel.nml"/>
    <include href="naf2.channel.nml"/>
    <include href="nap.channel.nml"/>
    <include href="pas.channel.nml"/>
    <include href="SupAxAx.cell.nml"/>
    <include href="SupBasket.cell.nml"/>
    <include href="SupLTSInter.cell.nml"/>
    <pulseGenerator id="Input_3" delay="0.0s" duration="100.0s" amplitude="1.0E-11A"/>

    <pulseGenerator id="Input_3__0" delay="0.0s" duration="100.0s" amplitude="1.807902E-11A"/>

    <pulseGenerator id="Input_3__1" delay="0.0s" duration="100.0s" amplitude="6.777595E-12A"/>

    <pulseGenerator id="Input_3__2" delay="0.0s" duration="100.0s" amplitude="1.596647E-11A"/>

    <pulseGenerator id="Input_3__3" delay="0.0s" duration="100.0s" amplitude="1.072825E-11A"/>

    <pulseGenerator id="Input_3__4" delay="0.0s" duration="100.0s" amplitude="1.859481E-11A"/>

    <pulseGenerator id="Input_3__5" delay="0.0s" duration="100.0s" amplitude="6.708954E-12A"/>

    <pulseGenerator id="Input_3__6" delay="0.0s" duration="100.0s" amplitude="2.579451E-12A"/>

    <pulseGenerator id="Input_3__7" delay="0.0s" duration="100.0s" amplitude="1.563921E-12A"/>

    <pulseGenerator id="Input_3__8" delay="0.0s" duration="100.0s" amplitude="2.583101E-12A"/>

    <pulseGenerator id="Input_3__9" delay="0.0s" duration="100.0s" amplitude="2.316496E-12A"/>

    <pulseGenerator id="Input_13" delay="0.0s" duration="100.0s" amplitude="1.0E-11A"/>

    <pulseGenerator id="Input_13__0" delay="0.0s" duration="100.0s" amplitude="1.431022E-11A"/>

    <pulseGenerator id="Input_13__1" delay="0.0s" duration="100.0s" amplitude="5.929671E-12A"/>

    <pulseGenerator id="Input_13__2" delay="0.0s" duration="100.0s" amplitude="1.684463E-11A"/>

    <pulseGenerator id="Input_13__3" delay="0.0s" duration="100.0s" amplitude="1.690292E-13A"/>

    <pulseGenerator id="Input_13__4" delay="0.0s" duration="100.0s" amplitude="1.510958E-11A"/>

    <pulseGenerator id="Input_13__5" delay="0.0s" duration="100.0s" amplitude="1.512753E-11A"/>

    <pulseGenerator id="Input_13__6" delay="0.0s" duration="100.0s" amplitude="1.278261E-11A"/>

    <pulseGenerator id="Input_13__7" delay="0.0s" duration="100.0s" amplitude="6.057175E-12A"/>

    <pulseGenerator id="Input_13__8" delay="0.0s" duration="100.0s" amplitude="8.867553E-12A"/>

    <pulseGenerator id="Input_13__9" delay="0.0s" duration="100.0s" amplitude="1.27381E-11A"/>

    <pulseGenerator id="Input_1" delay="1.0s" duration="4.0E-4s" amplitude="4.0E-10A"/>

    <pulseGenerator id="Input_1__0" delay="1.606892s" duration="4.0E-4s" amplitude="4.0E-10A"/>

    <pulseGenerator id="Input_1__1" delay="0.8459037s" duration="4.0E-4s" amplitude="4.0E-10A"/>

    <pulseGenerator id="Input_1__2" delay="0.6412971s" duration="4.0E-4s" amplitude="4.0E-10A"/>

    <pulseGenerator id="Input_1__3" delay="0.187414s" duration="4.0E-4s" amplitude="4.0E-10A"/>

    <pulseGenerator id="Input_1__4" delay="0.5756328s" duration="4.0E-4s" amplitude="4.0E-10A"/>

    <pulseGenerator id="Input_1__5" delay="0.9168199s" duration="4.0E-4s" amplitude="4.0E-10A"/>

    <pulseGenerator id="Input_1__6" delay="1.530961s" duration="4.0E-4s" amplitude="4.0E-10A"/>

    <pulseGenerator id="Input_1__7" delay="1.442159s" duration="4.0E-4s" amplitude="4.0E-10A"/>

    <pulseGenerator id="Input_1__8" delay="0.4592228s" duration="4.0E-4s" amplitude="4.0E-10A"/>

    <pulseGenerator id="Input_1__9" delay="0.5967045s" duration="4.0E-4s" amplitude="4.0E-10A"/>

    <pulseGenerator id="Input_1__10" delay="1.757667s" duration="4.0E-4s" amplitude="4.0E-10A"/>

    <pulseGenerator id="Input_1__11" delay="0.5082071s" duration="4.0E-4s" amplitude="4.0E-10A"/>

    <pulseGenerator id="Input_1__12" delay="1.47953s" duration="4.0E-4s" amplitude="4.0E-10A"/>

    <pulseGenerator id="Input_1__13" delay="0.3119103s" duration="4.0E-4s" amplitude="4.0E-10A"/>

    <pulseGenerator id="Input_1__14" delay="0.8399847s" duration="4.0E-4s" amplitude="4.0E-10A"/>

    <pulseGenerator id="Input_1__15" delay="0.9923993s" duration="4.0E-4s" amplitude="4.0E-10A"/>

    <pulseGenerator id="Input_1__16" delay="0.4185043s" duration="4.0E-4s" amplitude="4.0E-10A"/>

    <pulseGenerator id="Input_1__17" delay="0.1680988s" duration="4.0E-4s" amplitude="4.0E-10A"/>

    <pulseGenerator id="Input_1__18" delay="1.638672s" duration="4.0E-4s" amplitude="4.0E-10A"/>

    <pulseGenerator id="Input_1__19" delay="1.070296s" duration="4.0E-4s" amplitude="4.0E-10A"/>

    <pulseGenerator id="C04_FRB_RandPulses" delay="0.0s" duration="1000.0s" amplitude="2.0E-10A"/>

    <pulseGenerator id="C04_FRB_RandPulses__0" delay="0.0s" duration="1000.0s" amplitude="2.086665E-10A"/>

    <pulseGenerator id="C04_FRB_RandPulses__1" delay="0.0s" duration="1000.0s" amplitude="1.554136E-10A"/>

    <pulseGenerator id="C04_FRB_RandPulses__2" delay="0.0s" duration="1000.0s" amplitude="2.136497E-10A"/>

    <pulseGenerator id="C04_FRB_RandPulses__3" delay="0.0s" duration="1000.0s" amplitude="2.202018E-10A"/>

    <pulseGenerator id="C04_FRB_RandPulses__4" delay="0.0s" duration="1000.0s" amplitude="1.531531E-10A"/>

    <pulseGenerator id="C04_FRB_RandPulses__5" delay="0.0s" duration="1000.0s" amplitude="1.919121E-10A"/>

    <pulseGenerator id="Input_0" delay="0.0s" duration="100.0s" amplitude="1.0E-10A"/>

    <pulseGenerator id="Input_0__0" delay="0.0s" duration="100.0s" amplitude="4.816389E-11A"/>

    <pulseGenerator id="Input_0__1" delay="0.0s" duration="100.0s" amplitude="1.617086E-10A"/>

    <pulseGenerator id="Input_0__2" delay="0.0s" duration="100.0s" amplitude="1.295419E-10A"/>

    <pulseGenerator id="Input_0__3" delay="0.0s" duration="100.0s" amplitude="6.940039E-11A"/>

    <pulseGenerator id="Input_0__4" delay="0.0s" duration="100.0s" amplitude="1.871929E-10A"/>

    <pulseGenerator id="Input_0__5" delay="0.0s" duration="100.0s" amplitude="3.477416E-11A"/>

    <pulseGenerator id="Input_0__6" delay="0.0s" duration="100.0s" amplitude="4.431589E-11A"/>

    <pulseGenerator id="Input_0__7" delay="0.0s" duration="100.0s" amplitude="7.040834E-11A"/>

    <pulseGenerator id="Input_0__8" delay="0.0s" duration="100.0s" amplitude="6.814148E-11A"/>

    <pulseGenerator id="Input_0__9" delay="0.0s" duration="100.0s" amplitude="6.530388E-11A"/>

    <network id="network_Thalamocortical6" type="networkWithTemperature" temperature="6.3 degC">

        <population id="CG_C04_FRB_sm" component="L23PyrFRB_varInit" type="populationList" size="6">
            <instance id="0">
                <location x="7.7558594" y="-817.10846" z="-243.32056"/>
            </instance>
            <instance id="1">
                <location x="-161.86707" y="-704.16754" z="-239.35767"/>
            </instance>
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        </population>

        <population id="CG_C04_LTS_sm" component="SupLTSInter" type="populationList" size="10">
            <instance id="0">
                <location x="1237.2773" y="-715.6221" z="319.58032"/>
            </instance>
            <instance id="1">
                <location x="1182.2478" y="-780.2685" z="350.1372"/>
            </instance>
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        </population>

        <population id="CG_C04_AxAx_sm" component="SupAxAx" type="populationList" size="10">
            <instance id="0">
                <location x="899.3928" y="-670.7247" z="949.5244"/>
            </instance>
            <instance id="1">
                <location x="405.78064" y="-690.85706" z="1351.7029"/>
            </instance>
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        </population>

        <population id="CG_C04_RS_sm" component="L23PyrRS" type="populationList" size="20">
            <instance id="0">
                <location x="-818.1918" y="-830.4027" z="-715.3004"/>
            </instance>
            <instance id="1">
                <location x="-454.14722" y="-783.69275" z="886.1692"/>
            </instance>
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        </population>

        <population id="CG_C04_Bask_sm" component="SupBasket" type="populationList" size="10">
            <instance id="0">
                <location x="-507.80762" y="-691.1363" z="434.56165"/>
            </instance>
            <instance id="1">
                <location x="824.9719" y="-694.5928" z="-767.5629"/>
            </instance>
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        </population>

        <projection id="LTS_AxAx_sm" presynapticPopulation="CG_C04_LTS_sm" postsynapticPopulation="CG_C04_AxAx_sm" synapse="Inh_LTS_FS">
            <connection id="0" preCellId="../CG_C04_LTS_sm/4/SupLTSInter" postCellId="../CG_C04_AxAx_sm/0/SupAxAx" preSegmentId="113" preFractionAlong="0.25441432" postSegmentId="36" postFractionAlong="0.4642822"/>
            <connection id="1" preCellId="../CG_C04_LTS_sm/2/SupLTSInter" postCellId="../CG_C04_AxAx_sm/0/SupAxAx" preSegmentId="113" preFractionAlong="0.81449" postSegmentId="12" postFractionAlong="0.34382695"/>
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        </projection>

        <projection id="Bask_FRB_sm" presynapticPopulation="CG_C04_Bask_sm" postsynapticPopulation="CG_C04_FRB_sm" synapse="Inh_Bask_Pyr">
            <connection id="0" preCellId="../CG_C04_Bask_sm/0/SupBasket" postCellId="../CG_C04_FRB_sm/0/L23PyrFRB_varInit" preSegmentId="112" preFractionAlong="0.21447513" postSegmentId="11" postFractionAlong="0.091411136"/>
            <connection id="1" preCellId="../CG_C04_Bask_sm/3/SupBasket" postCellId="../CG_C04_FRB_sm/0/L23PyrFRB_varInit" preSegmentId="113" preFractionAlong="0.5966753" postSegmentId="6" postFractionAlong="0.8018957"/>
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        </projection>

        <projection id="Bask_Bask_sm" presynapticPopulation="CG_C04_Bask_sm" postsynapticPopulation="CG_C04_Bask_sm" synapse="Inh_Bask_FS">
            <connection id="0" preCellId="../CG_C04_Bask_sm/5/SupBasket" postCellId="../CG_C04_Bask_sm/0/SupBasket" preSegmentId="1" preFractionAlong="0.70866853" postSegmentId="28" postFractionAlong="0.15511246"/>
            <connection id="1" preCellId="../CG_C04_Bask_sm/8/SupBasket" postCellId="../CG_C04_Bask_sm/0/SupBasket" preSegmentId="1" preFractionAlong="0.67787" postSegmentId="81" postFractionAlong="0.8107277"/>
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        </projection>

        <projection id="Bask_RS_sm" presynapticPopulation="CG_C04_Bask_sm" postsynapticPopulation="CG_C04_RS_sm" synapse="Inh_Bask_Pyr">
            <connection id="0" preCellId="../CG_C04_Bask_sm/1/SupBasket" postCellId="../CG_C04_RS_sm/0/L23PyrRS" preSegmentId="113" preFractionAlong="0.78672034" postSegmentId="12" postFractionAlong="0.20576172"/>
            <connection id="1" preCellId="../CG_C04_Bask_sm/4/SupBasket" postCellId="../CG_C04_RS_sm/0/L23PyrRS" preSegmentId="112" preFractionAlong="0.029128645" postSegmentId="17" postFractionAlong="0.38703492"/>
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        </projection>

        <projection id="LTS_RS_sm" presynapticPopulation="CG_C04_LTS_sm" postsynapticPopulation="CG_C04_RS_sm" synapse="Inh_LTS_Pyr">
            <connection id="0" preCellId="../CG_C04_LTS_sm/1/SupLTSInter" postCellId="../CG_C04_RS_sm/0/L23PyrRS" preSegmentId="113" preFractionAlong="0.6008889" postSegmentId="52" postFractionAlong="0.08651494"/>
            <connection id="1" preCellId="../CG_C04_LTS_sm/9/SupLTSInter" postCellId="../CG_C04_RS_sm/0/L23PyrRS" preSegmentId="113" preFractionAlong="0.8115939" postSegmentId="64" postFractionAlong="0.022622071"/>
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        </projection>

        <projection id="Bask_AxAx_sm" presynapticPopulation="CG_C04_Bask_sm" postsynapticPopulation="CG_C04_AxAx_sm" synapse="Inh_Bask_FS">
            <connection id="0" preCellId="../CG_C04_Bask_sm/8/SupBasket" postCellId="../CG_C04_AxAx_sm/0/SupAxAx" preSegmentId="1" preFractionAlong="0.4032131" postSegmentId="3" postFractionAlong="0.12104569"/>
            <connection id="1" preCellId="../CG_C04_Bask_sm/7/SupBasket" postCellId="../CG_C04_AxAx_sm/0/SupAxAx" preSegmentId="0" preFractionAlong="0.41181144" postSegmentId="3" postFractionAlong="0.6989662"/>
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        </projection>

        <projection id="FRB_LTS_sm" presynapticPopulation="CG_C04_FRB_sm" postsynapticPopulation="CG_C04_LTS_sm" synapse="Exc_Pyr_Int">
            <connection id="0" preCellId="../CG_C04_FRB_sm/0/L23PyrFRB_varInit" postCellId="../CG_C04_LTS_sm/0/SupLTSInter" preSegmentId="143" preFractionAlong="0.658955" postSegmentId="46" postFractionAlong="0.26294926"/>
            <connection id="1" preCellId="../CG_C04_FRB_sm/1/L23PyrFRB_varInit" postCellId="../CG_C04_LTS_sm/0/SupLTSInter" preSegmentId="142" preFractionAlong="0.04402189" postSegmentId="43" postFractionAlong="0.8704854"/>
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        </projection>

        <projection id="AxAx_FRB_sm" presynapticPopulation="CG_C04_AxAx_sm" postsynapticPopulation="CG_C04_FRB_sm" synapse="Inh_Axo_Pyr">
            <connection id="0" preCellId="../CG_C04_AxAx_sm/9/SupAxAx" postCellId="../CG_C04_FRB_sm/0/L23PyrFRB_varInit" preSegmentId="113" preFractionAlong="0.61561304" postSegmentId="137" postFractionAlong="0.68536407"/>
            <connection id="1" preCellId="../CG_C04_AxAx_sm/2/SupAxAx" postCellId="../CG_C04_FRB_sm/0/L23PyrFRB_varInit" preSegmentId="117" preFractionAlong="0.5501833" postSegmentId="137" postFractionAlong="0.48698273"/>
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        </projection>

        <projection id="RS_Bask_sm" presynapticPopulation="CG_C04_RS_sm" postsynapticPopulation="CG_C04_Bask_sm" synapse="Exc_Pyr_Int">
            <connection id="0" preCellId="../CG_C04_RS_sm/5/L23PyrRS" postCellId="../CG_C04_Bask_sm/0/SupBasket" preSegmentId="147" preFractionAlong="0.15574586" postSegmentId="61" postFractionAlong="0.24986005"/>
            <connection id="1" preCellId="../CG_C04_RS_sm/4/L23PyrRS" postCellId="../CG_C04_Bask_sm/0/SupBasket" preSegmentId="143" preFractionAlong="0.5330183" postSegmentId="78" postFractionAlong="0.47591364"/>
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        </projection>

        <projection id="RS_AxAx_sm" presynapticPopulation="CG_C04_RS_sm" postsynapticPopulation="CG_C04_AxAx_sm" synapse="Exc_Pyr_Int">
            <connection id="0" preCellId="../CG_C04_RS_sm/16/L23PyrRS" postCellId="../CG_C04_AxAx_sm/0/SupAxAx" preSegmentId="143" preFractionAlong="0.26449478" postSegmentId="41" postFractionAlong="0.82991064"/>
            <connection id="1" preCellId="../CG_C04_RS_sm/2/L23PyrRS" postCellId="../CG_C04_AxAx_sm/0/SupAxAx" preSegmentId="143" preFractionAlong="0.8097301" postSegmentId="53" postFractionAlong="0.124281146"/>
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        </projection>

        <projection id="FRB_Bask_sm" presynapticPopulation="CG_C04_FRB_sm" postsynapticPopulation="CG_C04_Bask_sm" synapse="Exc_Pyr_Int">
            <connection id="0" preCellId="../CG_C04_FRB_sm/0/L23PyrFRB_varInit" postCellId="../CG_C04_Bask_sm/0/SupBasket" preSegmentId="146" preFractionAlong="0.04058405" postSegmentId="16" postFractionAlong="0.2704555"/>
            <connection id="1" preCellId="../CG_C04_FRB_sm/0/L23PyrFRB_varInit" postCellId="../CG_C04_Bask_sm/0/SupBasket" preSegmentId="146" preFractionAlong="0.51039034" postSegmentId="38" postFractionAlong="0.3860496"/>
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        </projection>

        <projection id="LTS_Pyr_sm" presynapticPopulation="CG_C04_LTS_sm" postsynapticPopulation="CG_C04_FRB_sm" synapse="Inh_LTS_Pyr">
            <connection id="0" preCellId="../CG_C04_LTS_sm/4/SupLTSInter" postCellId="../CG_C04_FRB_sm/0/L23PyrFRB_varInit" preSegmentId="113" preFractionAlong="0.8682649" postSegmentId="30" postFractionAlong="0.29040554"/>
            <connection id="1" preCellId="../CG_C04_LTS_sm/2/SupLTSInter" postCellId="../CG_C04_FRB_sm/0/L23PyrFRB_varInit" preSegmentId="113" preFractionAlong="0.6519498" postSegmentId="61" postFractionAlong="0.28080568"/>
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        </projection>

        <projection id="RS_LTS_sm" presynapticPopulation="CG_C04_RS_sm" postsynapticPopulation="CG_C04_LTS_sm" synapse="Exc_Pyr_Int">
            <connection id="0" preCellId="../CG_C04_RS_sm/19/L23PyrRS" postCellId="../CG_C04_LTS_sm/0/SupLTSInter" preSegmentId="146" preFractionAlong="0.6579761" postSegmentId="98" postFractionAlong="0.75410336"/>
            <connection id="1" preCellId="../CG_C04_RS_sm/17/L23PyrRS" postCellId="../CG_C04_LTS_sm/0/SupLTSInter" preSegmentId="143" preFractionAlong="0.4452342" postSegmentId="91" postFractionAlong="0.07852467"/>
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        </projection>

        <projection id="LTS_LTS_sm" presynapticPopulation="CG_C04_LTS_sm" postsynapticPopulation="CG_C04_LTS_sm" synapse="Inh_LTS_LTS">
            <connection id="0" preCellId="../CG_C04_LTS_sm/1/SupLTSInter" postCellId="../CG_C04_LTS_sm/0/SupLTSInter" preSegmentId="116" preFractionAlong="0.8691025" postSegmentId="56" postFractionAlong="0.59924775"/>
            <connection id="1" preCellId="../CG_C04_LTS_sm/2/SupLTSInter" postCellId="../CG_C04_LTS_sm/0/SupLTSInter" preSegmentId="116" preFractionAlong="0.2044217" postSegmentId="5" postFractionAlong="0.98651886"/>
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        </projection>

        <projection id="Bask_LTS_sm" presynapticPopulation="CG_C04_Bask_sm" postsynapticPopulation="CG_C04_LTS_sm" synapse="Inh_Bask_LTS">
            <connection id="0" preCellId="../CG_C04_Bask_sm/0/SupBasket" postCellId="../CG_C04_LTS_sm/0/SupLTSInter" preSegmentId="113" preFractionAlong="0.55273944" postSegmentId="12" postFractionAlong="0.19628987"/>
            <connection id="1" preCellId="../CG_C04_Bask_sm/1/SupBasket" postCellId="../CG_C04_LTS_sm/0/SupLTSInter" preSegmentId="116" preFractionAlong="0.9852038" postSegmentId="65" postFractionAlong="0.8290327"/>
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        </projection>

        <projection id="FRB_FRB_sm" presynapticPopulation="CG_C04_FRB_sm" postsynapticPopulation="CG_C04_FRB_sm" synapse="Exc_Pyr_Pyr">
            <connection id="0" preCellId="../CG_C04_FRB_sm/1/L23PyrFRB_varInit" postCellId="../CG_C04_FRB_sm/0/L23PyrFRB_varInit" preSegmentId="142" preFractionAlong="0.8633806" postSegmentId="64" postFractionAlong="0.2618994"/>
            <connection id="1" preCellId="../CG_C04_FRB_sm/1/L23PyrFRB_varInit" postCellId="../CG_C04_FRB_sm/0/L23PyrFRB_varInit" preSegmentId="143" preFractionAlong="0.84335566" postSegmentId="63" postFractionAlong="0.20074219"/>
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        </projection>

        <projection id="FRB_RS_sm" presynapticPopulation="CG_C04_FRB_sm" postsynapticPopulation="CG_C04_RS_sm" synapse="Exc_Pyr_Pyr">
            <connection id="0" preCellId="../CG_C04_FRB_sm/3/L23PyrFRB_varInit" postCellId="../CG_C04_RS_sm/0/L23PyrRS" preSegmentId="143" preFractionAlong="0.5173835" postSegmentId="54" postFractionAlong="0.28755346"/>
            <connection id="1" preCellId="../CG_C04_FRB_sm/4/L23PyrFRB_varInit" postCellId="../CG_C04_RS_sm/0/L23PyrRS" preSegmentId="142" preFractionAlong="0.252136" postSegmentId="34" postFractionAlong="0.46877563"/>
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        </projection>

        <projection id="AxAx_RS_sm" presynapticPopulation="CG_C04_AxAx_sm" postsynapticPopulation="CG_C04_RS_sm" synapse="Inh_Axo_Pyr">
            <connection id="0" preCellId="../CG_C04_AxAx_sm/4/SupAxAx" postCellId="../CG_C04_RS_sm/0/L23PyrRS" preSegmentId="113" preFractionAlong="0.7393387" postSegmentId="136" postFractionAlong="0.42925894"/>
            <connection id="1" preCellId="../CG_C04_AxAx_sm/2/SupAxAx" postCellId="../CG_C04_RS_sm/0/L23PyrRS" preSegmentId="112" preFractionAlong="0.27884954" postSegmentId="136" postFractionAlong="0.07588625"/>
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        </projection>

        <projection id="LTS_Bask_sm" presynapticPopulation="CG_C04_LTS_sm" postsynapticPopulation="CG_C04_Bask_sm" synapse="Inh_LTS_FS">
            <connection id="0" preCellId="../CG_C04_LTS_sm/1/SupLTSInter" postCellId="../CG_C04_Bask_sm/0/SupBasket" preSegmentId="113" preFractionAlong="0.8810322" postSegmentId="59" postFractionAlong="0.56558716"/>
            <connection id="1" preCellId="../CG_C04_LTS_sm/6/SupLTSInter" postCellId="../CG_C04_Bask_sm/0/SupBasket" preSegmentId="116" preFractionAlong="0.052854963" postSegmentId="90" postFractionAlong="0.5825861"/>
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        </projection>

        <projection id="FRB_AxAx_sm" presynapticPopulation="CG_C04_FRB_sm" postsynapticPopulation="CG_C04_AxAx_sm" synapse="Exc_Pyr_Int">
            <connection id="0" preCellId="../CG_C04_FRB_sm/2/L23PyrFRB_varInit" postCellId="../CG_C04_AxAx_sm/0/SupAxAx" preSegmentId="143" preFractionAlong="0.09394569" postSegmentId="15" postFractionAlong="0.85628676"/>
            <connection id="1" preCellId="../CG_C04_FRB_sm/2/L23PyrFRB_varInit" postCellId="../CG_C04_AxAx_sm/0/SupAxAx" preSegmentId="147" preFractionAlong="0.8898671" postSegmentId="81" postFractionAlong="0.021646881"/>
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        </projection>

        <projection id="RS_FRB_sm" presynapticPopulation="CG_C04_RS_sm" postsynapticPopulation="CG_C04_FRB_sm" synapse="Exc_Pyr_Pyr">
            <connection id="0" preCellId="../CG_C04_RS_sm/17/L23PyrRS" postCellId="../CG_C04_FRB_sm/0/L23PyrFRB_varInit" preSegmentId="145" preFractionAlong="0.630032" postSegmentId="38" postFractionAlong="0.19313401"/>
            <connection id="1" preCellId="../CG_C04_RS_sm/14/L23PyrRS" postCellId="../CG_C04_FRB_sm/0/L23PyrFRB_varInit" preSegmentId="137" preFractionAlong="0.15991417" postSegmentId="31" postFractionAlong="0.4649344"/>
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        </projection>

        <projection id="RS_RS_sm" presynapticPopulation="CG_C04_RS_sm" postsynapticPopulation="CG_C04_RS_sm" synapse="Exc_Pyr_Pyr">
            <connection id="0" preCellId="../CG_C04_RS_sm/8/L23PyrRS" postCellId="../CG_C04_RS_sm/0/L23PyrRS" preSegmentId="147" preFractionAlong="0.18173863" postSegmentId="31" postFractionAlong="0.93535334"/>
            <connection id="1" preCellId="../CG_C04_RS_sm/1/L23PyrRS" postCellId="../CG_C04_RS_sm/0/L23PyrRS" preSegmentId="140" preFractionAlong="0.8682493" postSegmentId="64" postFractionAlong="0.59177"/>
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        </projection>

        <electricalProjection id="RS_RS_gap_sm" presynapticPopulation="CG_C04_RS_sm" postsynapticPopulation="CG_C04_RS_sm">
            <electricalConnection id="0" preCell="0" postCell="6" preSegment="147" preFractionAlong="0.43204176" postSegment="142" postFractionAlong="0.99813676" synapse="GapJuncCML"/>
            <electricalConnection id="1" preCell="1" postCell="9" preSegment="143" preFractionAlong="0.42791575" postSegment="143" postFractionAlong="0.2893848" synapse="GapJuncCML"/>
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        </electricalProjection>

        <electricalProjection id="AxAx_AxAx_gap_sm" presynapticPopulation="CG_C04_AxAx_sm" postsynapticPopulation="CG_C04_AxAx_sm">
            <electricalConnection id="0" preCell="0" postCell="7" preSegment="88" preFractionAlong="0.8164972" postSegment="36" postFractionAlong="0.7583038" synapse="GapJuncFS"/>
            <electricalConnection id="1" preCell="0" postCell="9" preSegment="63" preFractionAlong="0.7732662" postSegment="89" postFractionAlong="0.3216409" synapse="GapJuncFS"/>
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        </electricalProjection>

        <electricalProjection id="Bask_Bask_gap_sm" presynapticPopulation="CG_C04_Bask_sm" postsynapticPopulation="CG_C04_Bask_sm">
            <electricalConnection id="0" preCell="0" postCell="6" preSegment="10" preFractionAlong="0.48479158" postSegment="61" postFractionAlong="0.74482864" synapse="GapJuncFS"/>
            <electricalConnection id="1" preCell="0" postCell="7" preSegment="10" preFractionAlong="0.0725647" postSegment="89" postFractionAlong="0.5348733" synapse="GapJuncFS"/>
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        </electricalProjection>

        <electricalProjection id="LTS_LTS_gap_sm" presynapticPopulation="CG_C04_LTS_sm" postsynapticPopulation="CG_C04_LTS_sm">
            <electricalConnection id="0" preCell="0" postCell="6" preSegment="37" preFractionAlong="0.9532851" postSegment="65" postFractionAlong="0.5789998" synapse="GapJuncLTS"/>
            <electricalConnection id="1" preCell="0" postCell="9" preSegment="62" preFractionAlong="0.5229904" postSegment="89" postFractionAlong="0.0047518276" synapse="GapJuncLTS"/>
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        </electricalProjection>

        <electricalProjection id="FRB_RS_gap_sm" presynapticPopulation="CG_C04_FRB_sm" postsynapticPopulation="CG_C04_RS_sm">
            <electricalConnection id="0" preCell="0" postCell="15" preSegment="143" preFractionAlong="0.83149326" postSegment="142" postFractionAlong="0.8882071" synapse="GapJuncCML"/>
            <electricalConnection id="1" preCell="1" postCell="15" preSegment="146" preFractionAlong="0.645292" postSegment="142" postFractionAlong="0.6109037" synapse="GapJuncCML"/>
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        </electricalProjection>

        <inputList id="Input_3" component="Input_3" population="CG_C04_Bask_sm">

        </inputList>

        <inputList id="Input_3__0" component="Input_3__0" population="CG_C04_Bask_sm">
    <input id="0" target="../CG_C04_Bask_sm/0/SupBasket" destination="synapses"/>
        </inputList>

        <inputList id="Input_3__1" component="Input_3__1" population="CG_C04_Bask_sm">
    <input id="1" target="../CG_C04_Bask_sm/1/SupBasket" destination="synapses"/>
        </inputList>

        <inputList id="Input_3__2" component="Input_3__2" population="CG_C04_Bask_sm">
    <input id="2" target="../CG_C04_Bask_sm/2/SupBasket" destination="synapses"/>
        </inputList>

        <inputList id="Input_3__3" component="Input_3__3" population="CG_C04_Bask_sm">
    <input id="3" target="../CG_C04_Bask_sm/3/SupBasket" destination="synapses"/>
        </inputList>

        <inputList id="Input_3__4" component="Input_3__4" population="CG_C04_Bask_sm">
    <input id="4" target="../CG_C04_Bask_sm/4/SupBasket" destination="synapses"/>
        </inputList>

        <inputList id="Input_3__5" component="Input_3__5" population="CG_C04_Bask_sm">
    <input id="5" target="../CG_C04_Bask_sm/5/SupBasket" destination="synapses"/>
        </inputList>

        <inputList id="Input_3__6" component="Input_3__6" population="CG_C04_Bask_sm">
    <input id="6" target="../CG_C04_Bask_sm/6/SupBasket" destination="synapses"/>
        </inputList>

        <inputList id="Input_3__7" component="Input_3__7" population="CG_C04_Bask_sm">
    <input id="7" target="../CG_C04_Bask_sm/7/SupBasket" destination="synapses"/>
        </inputList>

        <inputList id="Input_3__8" component="Input_3__8" population="CG_C04_Bask_sm">
    <input id="8" target="../CG_C04_Bask_sm/8/SupBasket" destination="synapses"/>
        </inputList>

        <inputList id="Input_3__9" component="Input_3__9" population="CG_C04_Bask_sm">
    <input id="9" target="../CG_C04_Bask_sm/9/SupBasket" destination="synapses"/>
        </inputList>

        <inputList id="Input_13" component="Input_13" population="CG_C04_AxAx_sm">

        </inputList>

        <inputList id="Input_13__0" component="Input_13__0" population="CG_C04_AxAx_sm">
    <input id="0" target="../CG_C04_AxAx_sm/0/SupAxAx" destination="synapses"/>
        </inputList>

        <inputList id="Input_13__1" component="Input_13__1" population="CG_C04_AxAx_sm">
    <input id="1" target="../CG_C04_AxAx_sm/1/SupAxAx" destination="synapses"/>
        </inputList>

        <inputList id="Input_13__2" component="Input_13__2" population="CG_C04_AxAx_sm">
    <input id="2" target="../CG_C04_AxAx_sm/2/SupAxAx" destination="synapses"/>
        </inputList>

        <inputList id="Input_13__3" component="Input_13__3" population="CG_C04_AxAx_sm">
    <input id="3" target="../CG_C04_AxAx_sm/3/SupAxAx" destination="synapses"/>
        </inputList>

        <inputList id="Input_13__4" component="Input_13__4" population="CG_C04_AxAx_sm">
    <input id="4" target="../CG_C04_AxAx_sm/4/SupAxAx" destination="synapses"/>
        </inputList>

        <inputList id="Input_13__5" component="Input_13__5" population="CG_C04_AxAx_sm">
    <input id="5" target="../CG_C04_AxAx_sm/5/SupAxAx" destination="synapses"/>
        </inputList>

        <inputList id="Input_13__6" component="Input_13__6" population="CG_C04_AxAx_sm">
    <input id="6" target="../CG_C04_AxAx_sm/6/SupAxAx" destination="synapses"/>
        </inputList>

        <inputList id="Input_13__7" component="Input_13__7" population="CG_C04_AxAx_sm">
    <input id="7" target="../CG_C04_AxAx_sm/7/SupAxAx" destination="synapses"/>
        </inputList>

        <inputList id="Input_13__8" component="Input_13__8" population="CG_C04_AxAx_sm">
    <input id="8" target="../CG_C04_AxAx_sm/8/SupAxAx" destination="synapses"/>
        </inputList>

        <inputList id="Input_13__9" component="Input_13__9" population="CG_C04_AxAx_sm">
    <input id="9" target="../CG_C04_AxAx_sm/9/SupAxAx" destination="synapses"/>
        </inputList>

        <inputList id="Input_1" component="Input_1" population="CG_C04_RS_sm">

        </inputList>

        <inputList id="Input_1__0" component="Input_1__0" population="CG_C04_RS_sm">
    <input id="0" target="../CG_C04_RS_sm/0/L23PyrRS" destination="synapses" segmentId="147"/>
        </inputList>

        <inputList id="Input_1__1" component="Input_1__1" population="CG_C04_RS_sm">
    <input id="1" target="../CG_C04_RS_sm/1/L23PyrRS" destination="synapses" segmentId="147"/>
        </inputList>

        <inputList id="Input_1__2" component="Input_1__2" population="CG_C04_RS_sm">
    <input id="2" target="../CG_C04_RS_sm/2/L23PyrRS" destination="synapses" segmentId="147"/>
        </inputList>

        <inputList id="Input_1__3" component="Input_1__3" population="CG_C04_RS_sm">
    <input id="3" target="../CG_C04_RS_sm/3/L23PyrRS" destination="synapses" segmentId="147"/>
        </inputList>

        <inputList id="Input_1__4" component="Input_1__4" population="CG_C04_RS_sm">
    <input id="4" target="../CG_C04_RS_sm/4/L23PyrRS" destination="synapses" segmentId="147"/>
        </inputList>

        <inputList id="Input_1__5" component="Input_1__5" population="CG_C04_RS_sm">
    <input id="5" target="../CG_C04_RS_sm/5/L23PyrRS" destination="synapses" segmentId="147"/>
        </inputList>

        <inputList id="Input_1__6" component="Input_1__6" population="CG_C04_RS_sm">
    <input id="6" target="../CG_C04_RS_sm/6/L23PyrRS" destination="synapses" segmentId="147"/>
        </inputList>

        <inputList id="Input_1__7" component="Input_1__7" population="CG_C04_RS_sm">
    <input id="7" target="../CG_C04_RS_sm/7/L23PyrRS" destination="synapses" segmentId="147"/>
        </inputList>

        <inputList id="Input_1__8" component="Input_1__8" population="CG_C04_RS_sm">
    <input id="8" target="../CG_C04_RS_sm/8/L23PyrRS" destination="synapses" segmentId="147"/>
        </inputList>

        <inputList id="Input_1__9" component="Input_1__9" population="CG_C04_RS_sm">
    <input id="9" target="../CG_C04_RS_sm/9/L23PyrRS" destination="synapses" segmentId="147"/>
        </inputList>

        <inputList id="Input_1__10" component="Input_1__10" population="CG_C04_RS_sm">
    <input id="10" target="../CG_C04_RS_sm/10/L23PyrRS" destination="synapses" segmentId="147"/>
        </inputList>

        <inputList id="Input_1__11" component="Input_1__11" population="CG_C04_RS_sm">
    <input id="11" target="../CG_C04_RS_sm/11/L23PyrRS" destination="synapses" segmentId="147"/>
        </inputList>

        <inputList id="Input_1__12" component="Input_1__12" population="CG_C04_RS_sm">
    <input id="12" target="../CG_C04_RS_sm/12/L23PyrRS" destination="synapses" segmentId="147"/>
        </inputList>

        <inputList id="Input_1__13" component="Input_1__13" population="CG_C04_RS_sm">
    <input id="13" target="../CG_C04_RS_sm/13/L23PyrRS" destination="synapses" segmentId="147"/>
        </inputList>

        <inputList id="Input_1__14" component="Input_1__14" population="CG_C04_RS_sm">
    <input id="14" target="../CG_C04_RS_sm/14/L23PyrRS" destination="synapses" segmentId="147"/>
        </inputList>

        <inputList id="Input_1__15" component="Input_1__15" population="CG_C04_RS_sm">
    <input id="15" target="../CG_C04_RS_sm/15/L23PyrRS" destination="synapses" segmentId="147"/>
        </inputList>

        <inputList id="Input_1__16" component="Input_1__16" population="CG_C04_RS_sm">
    <input id="16" target="../CG_C04_RS_sm/16/L23PyrRS" destination="synapses" segmentId="147"/>
        </inputList>

        <inputList id="Input_1__17" component="Input_1__17" population="CG_C04_RS_sm">
    <input id="17" target="../CG_C04_RS_sm/17/L23PyrRS" destination="synapses" segmentId="147"/>
        </inputList>

        <inputList id="Input_1__18" component="Input_1__18" population="CG_C04_RS_sm">
    <input id="18" target="../CG_C04_RS_sm/18/L23PyrRS" destination="synapses" segmentId="147"/>
        </inputList>

        <inputList id="Input_1__19" component="Input_1__19" population="CG_C04_RS_sm">
    <input id="19" target="../CG_C04_RS_sm/19/L23PyrRS" destination="synapses" segmentId="147"/>
        </inputList>

        <inputList id="C04_FRB_RandPulses" component="C04_FRB_RandPulses" population="CG_C04_FRB_sm">

        </inputList>

        <inputList id="C04_FRB_RandPulses__0" component="C04_FRB_RandPulses__0" population="CG_C04_FRB_sm">
    <input id="0" target="../CG_C04_FRB_sm/0/L23PyrFRB_varInit" destination="synapses"/>
        </inputList>

        <inputList id="C04_FRB_RandPulses__1" component="C04_FRB_RandPulses__1" population="CG_C04_FRB_sm">
    <input id="1" target="../CG_C04_FRB_sm/1/L23PyrFRB_varInit" destination="synapses"/>
        </inputList>

        <inputList id="C04_FRB_RandPulses__2" component="C04_FRB_RandPulses__2" population="CG_C04_FRB_sm">
    <input id="2" target="../CG_C04_FRB_sm/2/L23PyrFRB_varInit" destination="synapses"/>
        </inputList>

        <inputList id="C04_FRB_RandPulses__3" component="C04_FRB_RandPulses__3" population="CG_C04_FRB_sm">
    <input id="3" target="../CG_C04_FRB_sm/3/L23PyrFRB_varInit" destination="synapses"/>
        </inputList>

        <inputList id="C04_FRB_RandPulses__4" component="C04_FRB_RandPulses__4" population="CG_C04_FRB_sm">
    <input id="4" target="../CG_C04_FRB_sm/4/L23PyrFRB_varInit" destination="synapses"/>
        </inputList>

        <inputList id="C04_FRB_RandPulses__5" component="C04_FRB_RandPulses__5" population="CG_C04_FRB_sm">
    <input id="5" target="../CG_C04_FRB_sm/5/L23PyrFRB_varInit" destination="synapses"/>
        </inputList>

        <inputList id="Input_0" component="Input_0" population="CG_C04_LTS_sm">

        </inputList>

        <inputList id="Input_0__0" component="Input_0__0" population="CG_C04_LTS_sm">
    <input id="0" target="../CG_C04_LTS_sm/0/SupLTSInter" destination="synapses"/>
        </inputList>

        <inputList id="Input_0__1" component="Input_0__1" population="CG_C04_LTS_sm">
    <input id="1" target="../CG_C04_LTS_sm/1/SupLTSInter" destination="synapses"/>
        </inputList>

        <inputList id="Input_0__2" component="Input_0__2" population="CG_C04_LTS_sm">
    <input id="2" target="../CG_C04_LTS_sm/2/SupLTSInter" destination="synapses"/>
        </inputList>

        <inputList id="Input_0__3" component="Input_0__3" population="CG_C04_LTS_sm">
    <input id="3" target="../CG_C04_LTS_sm/3/SupLTSInter" destination="synapses"/>
        </inputList>

        <inputList id="Input_0__4" component="Input_0__4" population="CG_C04_LTS_sm">
    <input id="4" target="../CG_C04_LTS_sm/4/SupLTSInter" destination="synapses"/>
        </inputList>

        <inputList id="Input_0__5" component="Input_0__5" population="CG_C04_LTS_sm">
    <input id="5" target="../CG_C04_LTS_sm/5/SupLTSInter" destination="synapses"/>
        </inputList>

        <inputList id="Input_0__6" component="Input_0__6" population="CG_C04_LTS_sm">
    <input id="6" target="../CG_C04_LTS_sm/6/SupLTSInter" destination="synapses"/>
        </inputList>

        <inputList id="Input_0__7" component="Input_0__7" population="CG_C04_LTS_sm">
    <input id="7" target="../CG_C04_LTS_sm/7/SupLTSInter" destination="synapses"/>
        </inputList>

        <inputList id="Input_0__8" component="Input_0__8" population="CG_C04_LTS_sm">
    <input id="8" target="../CG_C04_LTS_sm/8/SupLTSInter" destination="synapses"/>
        </inputList>

        <inputList id="Input_0__9" component="Input_0__9" population="CG_C04_LTS_sm">
    <input id="9" target="../CG_C04_LTS_sm/9/SupLTSInter" destination="synapses"/>
        </inputList>

    </network>

</neuroml>
