<?xml version="1.0" encoding="UTF-8"?>
<neuroml xmlns="http://www.neuroml.org/schema/neuroml2" xmlns:xsi="http://www.w3.org/2001/XMLSchema-instance" xsi:schemaLocation="http://www.neuroml.org/schema/neuroml2  https://raw.githubusercontent.com/NeuroML/NeuroML2/development/Schemas/NeuroML2/NeuroML_v2beta4.xsd" id="SupLTSInter">

    <include href="ar__m00_25.channel.nml"/>

    <include href="cad__beta0_02__phi260000.nml"/>

    <include href="cad__beta0_05__phi520000.nml"/>

    <include href="cal.channel.nml"/>

    <include href="cat_a.channel.nml"/>

    <include href="k2.channel.nml"/>

    <include href="ka.channel.nml"/>

    <include href="kahp_slower.channel.nml"/>

    <include href="kc_fast.channel.nml"/>

    <include href="kdr_fs.channel.nml"/>

    <include href="km.channel.nml"/>

    <include href="naf2.channel.nml"/>

    <include href="naf2__a0__b0__c0__d0__fastNa_shiftmin2_5.channel.nml"/>

    <include href="nap.channel.nml"/>

    <include href="pas.channel.nml"/>

    <cell id="SupLTSInter">

        <notes>Cell: supLTS_0 exported from NEURON ModelView</notes>

        <morphology id="morphology_SupLTSInter">

            <segment id="0" name="Seg0_comp_1">
                <proximal x="0.0" y="0.0" z="0.0" diameter="15.0"/>
                <distal x="0.0" y="10.0" z="0.0" diameter="15.0"/>
            </segment>

            <segment id="1" name="Seg1_comp_1">
                <parent segment="0"/>
                <distal x="-4.371139E-7" y="20.0" z="0.0" diameter="15.0"/>
            </segment>

            <segment id="106" name="Seg0_comp_54">
                <parent segment="0" fractionAlong="0.0"/>
                <proximal x="4.371139E-7" y="0.0" z="0.0" diameter="1.4"/>
                <distal x="-3.7745E-7" y="-25.0" z="0.0" diameter="1.4"/>
            </segment>

            <segment id="107" name="Seg1_comp_54">
                <parent segment="106"/>
                <distal x="-1.1920139E-6" y="-50.0" z="0.0" diameter="1.4"/>
            </segment>

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
            <segmentGroup id="comp_1" neuroLexId="sao864921383">    <!--
                This group contains an unbranched set of segments, and all of the segmentGroups marked with
                neuroLexId = sao864921383 form a non-overlapping set of all of the segments.
                These segmentGroups correspond to the 'cables' of NeuroML v1.8.1. -->

                <!--This 'Section' has number of internal divisions (nseg) = 2-->

                <annotation>
                    <property tag="numberInternalDivisions" value="2"/>
                </annotation>

                <member segment="0"/>

                <member segment="1"/>
            </segmentGroup>

            <segmentGroup id="comp_54" neuroLexId="sao864921383">    <!--
                This group contains an unbranched set of segments, and all of the segmentGroups marked with
                neuroLexId = sao864921383 form a non-overlapping set of all of the segments.
                These segmentGroups correspond to the 'cables' of NeuroML v1.8.1. -->

                <!--This 'Section' has number of internal divisions (nseg) = 54-->

                <annotation>
                    <property tag="numberInternalDivisions" value="54"/>
                </annotation>

                <member segment="106"/>

                <member segment="107"/>
            </segmentGroup>

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
            <segmentGroup id="ModelViewParmSubset_1">
                <include segmentGroup="comp_1"/>
                <include segmentGroup="comp_41"/>
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            </segmentGroup>

            <segmentGroup id="ModelViewParmSubset_4">
                <include segmentGroup="comp_1"/>
                <include segmentGroup="comp_41"/>
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            </segmentGroup>

            <segmentGroup id="OneSecGrp_SectionRef_1">
                <include segmentGroup="comp_1"/>
            </segmentGroup>

            <segmentGroup id="soma_group" neuroLexId="GO:0043025">    <!--Soma group-->

                <include segmentGroup="comp_1"/>
            </segmentGroup>

            <segmentGroup id="prox_dend_soma">
                <include segmentGroup="comp_1"/>
                <include segmentGroup="comp_41"/>
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            </segmentGroup>

            <segmentGroup id="prox_mid_dends">
                <include segmentGroup="comp_1"/>
                <include segmentGroup="comp_41"/>
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            </segmentGroup>

            <segmentGroup id="ModelViewParmSubset_2">
                <include segmentGroup="comp_54"/>
                <include segmentGroup="comp_55"/>
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            </segmentGroup>

            <segmentGroup id="axon_group" neuroLexId="GO:0030424">    <!--Axon group-->

                <include segmentGroup="comp_54"/>
                <include segmentGroup="comp_55"/>
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            </segmentGroup>

            <segmentGroup id="prox_axon">
                <include segmentGroup="comp_54"/>
            </segmentGroup>

            <segmentGroup id="dendrite_group" neuroLexId="GO:0030425">    <!--Dendrite group-->

                <include segmentGroup="comp_41"/>
                <include segmentGroup="comp_28"/>
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            </segmentGroup>

            <segmentGroup id="ModelViewParmSubset_3">
                <include segmentGroup="comp_41"/>
                <include segmentGroup="comp_28"/>
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            </segmentGroup>

            <segmentGroup id="prox_dend">
                <include segmentGroup="comp_41"/>
                <include segmentGroup="comp_28"/>
                <include segmentGroup="comp_15"/>
                <include segmentGroup="comp_2"/>
            </segmentGroup>

            <segmentGroup id="mid_dend">
                <include segmentGroup="comp_43"/>
                <include segmentGroup="comp_42"/>
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            </segmentGroup>

            <segmentGroup id="ModelViewParmSubset_5">
                <include segmentGroup="comp_46"/>
                <include segmentGroup="comp_45"/>
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            </segmentGroup>

            <segmentGroup id="gap_dend">
                <include segmentGroup="comp_46"/>
                <include segmentGroup="comp_45"/>
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            </segmentGroup>

            <segmentGroup id="mid_tip_dends">
                <include segmentGroup="comp_46"/>
                <include segmentGroup="comp_45"/>
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            </segmentGroup>

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
        </morphology>

            <!--Adding the biophysical parameters-->

        <biophysicalProperties id="biophys">

            <membraneProperties>

                <channelDensity condDensity="0.0 mS_per_cm2" id="ar_ModelViewParmSubset_1" ionChannel="ar__m00_25" segmentGroup="ModelViewParmSubset_1" erev="-40.0 mV" ion="ar"/>

                <channelDensity condDensity="0.1 mS_per_cm2" id="cal_ModelViewParmSubset_4" ionChannel="cal" segmentGroup="ModelViewParmSubset_4" ion="ca" erev="125.0 mV"/>

                <channelDensity condDensity="0.2 mS_per_cm2" id="cal_ModelViewParmSubset_5" ionChannel="cal" segmentGroup="ModelViewParmSubset_5" ion="ca" erev="125.0 mV"/>

                <channelDensity condDensity="2.0 mS_per_cm2" id="cat_a_ModelViewParmSubset_5" ionChannel="cat_a" segmentGroup="ModelViewParmSubset_5" ion="cat_a" erev="125.0 mV"/>

                <channelDensity condDensity="0.05 mS_per_cm2" id="cat_a_ModelViewParmSubset_4" ionChannel="cat_a" segmentGroup="ModelViewParmSubset_4" ion="cat_a" erev="125.0 mV"/>

                <channelDensity condDensity="0.5 mS_per_cm2" id="k2_all" ionChannel="k2" ion="k" erev="-100.0 mV"/>

                <channelDensity condDensity="1.0 mS_per_cm2" id="ka_all" ionChannel="ka" ion="k" erev="-100.0 mV"/>

                <channelDensity condDensity="0.1 mS_per_cm2" id="kahp_slower_ModelViewParmSubset_1" ionChannel="kahp_slower" segmentGroup="ModelViewParmSubset_1" ion="k" erev="-100.0 mV"/>

                <channelDensity condDensity="25.0 mS_per_cm2" id="kc_fast_ModelViewParmSubset_1" ionChannel="kc_fast" segmentGroup="ModelViewParmSubset_1" ion="k" erev="-100.0 mV"/>

                <channelDensity condDensity="100.0 mS_per_cm2" id="kdr_fs_ModelViewParmSubset_4" ionChannel="kdr_fs" segmentGroup="ModelViewParmSubset_4" ion="k" erev="-100.0 mV"/>

                <channelDensity condDensity="10.0 mS_per_cm2" id="kdr_fs_ModelViewParmSubset_5" ionChannel="kdr_fs" segmentGroup="ModelViewParmSubset_5" ion="k" erev="-100.0 mV"/>

                <channelDensity condDensity="400.0 mS_per_cm2" id="kdr_fs_ModelViewParmSubset_2" ionChannel="kdr_fs" segmentGroup="ModelViewParmSubset_2" ion="k" erev="-100.0 mV"/>

                <channelDensity condDensity="0.5 mS_per_cm2" id="km_ModelViewParmSubset_1" ionChannel="km" segmentGroup="ModelViewParmSubset_1" ion="k" erev="-100.0 mV"/>

                <channelDensity condDensity="-1.0E8 mS_per_cm2" id="naf2_all" ionChannel="naf2__a0__b0__c0__d0__fastNa_shiftmin2_5" ion="na" erev="50.0 mV"/>

                <channelDensity condDensity="10.0 mS_per_cm2" id="naf2_ModelViewParmSubset_5" ionChannel="naf2" segmentGroup="ModelViewParmSubset_5" ion="na" erev="50.0 mV"/>

                <channelDensity condDensity="400.0 mS_per_cm2" id="naf2_ModelViewParmSubset_2" ionChannel="naf2" segmentGroup="ModelViewParmSubset_2" ion="na" erev="50.0 mV"/>

                <channelDensity condDensity="60.0 mS_per_cm2" id="naf2_ModelViewParmSubset_4" ionChannel="naf2" segmentGroup="ModelViewParmSubset_4" ion="na" erev="50.0 mV"/>

                <channelDensity condDensity="0.0 mS_per_cm2" id="nap_ModelViewParmSubset_1" ionChannel="nap" segmentGroup="ModelViewParmSubset_1" ion="na" erev="50.0 mV"/>

                <channelDensity condDensity="-1.0E8 mS_per_cm2" id="pas_all" ionChannel="pas" erev="-65.0 mV" ion="non_specific"/>

                <channelDensity condDensity="1.0 mS_per_cm2" id="pas_ModelViewParmSubset_2" ionChannel="pas" segmentGroup="ModelViewParmSubset_2" ion="non_specific" erev="-66.6 mV"/>

                <channelDensity condDensity="0.04 mS_per_cm2" id="pas_ModelViewParmSubset_1" ionChannel="pas" segmentGroup="ModelViewParmSubset_1" ion="non_specific" erev="-66.6 mV"/>

                <spikeThresh value="0 mV"/>

                <specificCapacitance value="1.0 uF_per_cm2"/>

                <initMembPotential value="-65.0 mV"/>

            </membraneProperties>

            <intracellularProperties>

                <species segmentGroup="ModelViewParmSubset_3" id="ca" ion="ca" concentrationModel="cad__beta0_05__phi520000"/>

                <species segmentGroup="OneSecGrp_SectionRef_1" id="ca" ion="ca" concentrationModel="cad__beta0_02__phi260000"/>

                <resistivity segmentGroup="ModelViewParmSubset_2" value="0.1 kohm_cm"/>

                <resistivity segmentGroup="ModelViewParmSubset_1" value="0.2 kohm_cm"/>

            </intracellularProperties>

        </biophysicalProperties>

    </cell>

</neuroml>
