<?xml version="1.0" encoding="ISO-8859-1"?>
<neuroml xmlns="http://www.neuroml.org/schema/neuroml2" xmlns:xsi="http://www.w3.org/2001/XMLSchema-instance" xsi:schemaLocation="http://www.neuroml.org/schema/neuroml2 https://raw.github.com/NeuroML/NeuroML2/development/Schemas/NeuroML2/NeuroML_v2beta4.xsd" id="Syn_AMPA_SupPyr_SupFS">

    <notes>ChannelML file describing a single synaptic mechanism</notes>

    <expTwoSynapse id="Syn_AMPA_SupPyr_SupFS" tauRise="0.8ms" tauDecay="0.8ms" gbase="8.82910658811e-07mS" erev="0.0mV">

        <notes>Synapse with syn scaling constant c = 3 nS (translating to max cond of 8.82911e-07 mS), time course: 0.8 ms and reversal potential: 0 mV.
        Automatically generated by command:  genSyn.py Syn_AMPA_SupPyr_SupFS 0.8 3 0 </notes>
</expTwoSynapse>

</neuroml>
