<?xml version="1.0" encoding="ISO-8859-1"?>
<neuroml xmlns="http://www.neuroml.org/schema/neuroml2" xmlns:xsi="http://www.w3.org/2001/XMLSchema-instance" xsi:schemaLocation="http://www.neuroml.org/schema/neuroml2 https://raw.github.com/NeuroML/NeuroML2/development/Schemas/NeuroML2/NeuroML_v2beta4.xsd" id="Syn_AMPA_SupPyr_SupPyr">

    <notes>ChannelML file describing a single synaptic mechanism</notes>

    <expTwoSynapse id="Syn_AMPA_SupPyr_SupPyr" tauRise="2.0ms" tauDecay="2.0ms" gbase="1.83939720586e-07mS" erev="0.0mV">

        <notes>Synapse with syn scaling constant c = 0.25 nS (translating to max cond of 1.8394e-07 mS), time course: 2 ms and reversal potential: 0 mV.
        Automatically generated by command:  genSyn.py Syn_AMPA_SupPyr_SupPyr 2 0.25 0 </notes>
</expTwoSynapse>

</neuroml>
