<?xml version="1.0" encoding="UTF-8"?>
<neuroml xmlns="http://www.neuroml.org/schema/neuroml2" xmlns:xsi="http://www.w3.org/2001/XMLSchema-instance" xsi:schemaLocation="http://www.neuroml.org/schema/neuroml2  https://raw.github.com/NeuroML/NeuroML2/development/Schemas/NeuroML2/NeuroML_v2beta1.xsd" id="TCR">

    <include href="ar.nml"/>

    <include href="cad.nml"/>

    <include href="cal.nml"/>

    <include href="cat.nml"/>

    <include href="k2.nml"/>

    <include href="ka.nml"/>

    <include href="kahp_slower.nml"/>

    <include href="kc.nml"/>

    <include href="kdr.nml"/>

    <include href="km.nml"/>

    <include href="naf_tcr.nml"/>

    <include href="napf_tcr.nml"/>

    <include href="pas.nml"/>

    <cell id="TCR">

        <notes>Cell: TCR_0 exported from NEURON ModelView</notes>

        <morphology id="morphology_TCR">

            <segment id="0" name="Seg0_comp_1">
                <proximal x="0.0" y="0.0" z="0.0" diameter="20.0"/>
                <distal x="0.0" y="21.0" z="0.0" diameter="20.0"/>
            </segment>

            <segment id="1" name="Seg1_comp_1">
                <parent segment="0"/>
                <distal x="-9.179392E-7" y="42.0" z="0.0" diameter="20.0"/>
            </segment>

            <segment id="262" name="Seg0_comp_132">
                <parent segment="0" fractionAlong="0.0"/>
                <proximal x="9.179392E-7" y="0.0" z="0.0" diameter="1.6"/>
                <distal x="-1.7484616E-7" y="-25.0" z="0.0" diameter="1.6"/>
            </segment>

            <segment id="263" name="Seg1_comp_132">
                <parent segment="262"/>
                <distal x="-1.2676315E-6" y="-50.0" z="0.0" diameter="1.6"/>
            </segment>

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
            <segmentGroup id="comp_1">
                <member segment="0"/>

                <member segment="1"/>
            </segmentGroup>

            <segmentGroup id="comp_132">
                <member segment="262"/>

                <member segment="263"/>
            </segmentGroup>

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
            <segmentGroup id="ModelViewParmSubset_1">
                <include segmentGroup="comp_1"/>
                <include segmentGroup="comp_119"/>
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            </segmentGroup>

            <segmentGroup id="ModelViewParmSubset_2">
                <include segmentGroup="comp_1"/>
                <include segmentGroup="comp_132"/>
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            </segmentGroup>

            <segmentGroup id="OneSecGrp_SectionRef_1">
                <include segmentGroup="comp_1"/>
            </segmentGroup>

            <segmentGroup id="soma_group">
                <include segmentGroup="comp_1"/>
            </segmentGroup>

            <segmentGroup id="ModelViewParmSubset_8">
                <include segmentGroup="comp_1"/>
                <include segmentGroup="comp_131"/>
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            </segmentGroup>

            <segmentGroup id="soma_prox_dends">
                <include segmentGroup="comp_1"/>
                <include segmentGroup="comp_119"/>
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            </segmentGroup>

            <segmentGroup id="ModelViewParmSubset_3">
                <include segmentGroup="comp_132"/>
                <include segmentGroup="comp_133"/>
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            </segmentGroup>

            <segmentGroup id="ModelViewParmSubset_10">
                <include segmentGroup="comp_132"/>
                <include segmentGroup="comp_133"/>
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            </segmentGroup>

            <segmentGroup id="axon_group">
                <include segmentGroup="comp_132"/>
                <include segmentGroup="comp_133"/>
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            </segmentGroup>

            <segmentGroup id="dendrite_group">
                <include segmentGroup="comp_119"/>
                <include segmentGroup="comp_106"/>
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            </segmentGroup>

            <segmentGroup id="ModelViewParmSubset_6">
                <include segmentGroup="comp_119"/>
                <include segmentGroup="comp_106"/>
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            </segmentGroup>

            <segmentGroup id="prox_dends">
                <include segmentGroup="comp_119"/>
                <include segmentGroup="comp_106"/>
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            </segmentGroup>

            <segmentGroup id="ModelViewParmSubset_4">
                <include segmentGroup="comp_122"/>
                <include segmentGroup="comp_121"/>
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            </segmentGroup>

            <segmentGroup id="ModelViewParmSubset_9">
                <include segmentGroup="comp_122"/>
                <include segmentGroup="comp_121"/>
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            </segmentGroup>

            <segmentGroup id="distal_dends">
                <include segmentGroup="comp_131"/>
                <include segmentGroup="comp_130"/>
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            </segmentGroup>

            <segmentGroup id="distal_axon">
                <include segmentGroup="comp_137"/>
                <include segmentGroup="comp_135"/>
            </segmentGroup>

        </morphology>

            <!--Adding the biophysical parameters-->

        <biophysicalProperties id="biophys">

            <membraneProperties>

                <channelDensity condDensity="-1.0E8 mS_per_cm2" id="ar_ModelViewParmSubset_1" ionChannel="ar" segmentGroup="ModelViewParmSubset_1" erev="-35.0 mV" m0="0.25" ion="ar">    <!--Note: Units of extra parameters are not known, except if it's e or erev!!-->
    <!--Note: Units of extra parameters are not known, except if it's e or erev!!-->
</channelDensity>

                <channelDensity condDensity="0.5 mS_per_cm2" id="ar_prox_dends" ionChannel="ar" segmentGroup="prox_dends" ion="ar" erev="-35.0 mV"/>

                <channelDensity condDensity="0.25 mS_per_cm2" id="ar_OneSecGrp_SectionRef_1" ionChannel="ar" segmentGroup="OneSecGrp_SectionRef_1" ion="ar" erev="-35.0 mV"/>

                <channelDensity condDensity="0.3 mS_per_cm2" id="ar_ModelViewParmSubset_4" ionChannel="ar" segmentGroup="ModelViewParmSubset_4" ion="ar" erev="-35.0 mV"/>

                <channelDensity condDensity="0.25 mS_per_cm2" id="cal_ModelViewParmSubset_4" ionChannel="cal" segmentGroup="ModelViewParmSubset_4" ion="ca" erev="125.0 mV"/>

                <channelDensity condDensity="0.5 mS_per_cm2" id="cal_soma_prox_dends" ionChannel="cal" segmentGroup="soma_prox_dends" ion="ca" erev="125.0 mV"/>

                <channelDensity condDensity="0.5 mS_per_cm2" id="cat_ModelViewParmSubset_8" ionChannel="cat" segmentGroup="ModelViewParmSubset_8" ion="cat" erev="125.0 mV"/>

                <channelDensity condDensity="3.0 mS_per_cm2" id="cat_ModelViewParmSubset_9" ionChannel="cat" segmentGroup="ModelViewParmSubset_9" ion="cat" erev="125.0 mV"/>

                <channelDensity condDensity="0.5 mS_per_cm2" id="k2_ModelViewParmSubset_3" ionChannel="k2" segmentGroup="ModelViewParmSubset_3" ion="k" erev="-95.0 mV"/>

                <channelDensity condDensity="2.0 mS_per_cm2" id="k2_ModelViewParmSubset_1" ionChannel="k2" segmentGroup="ModelViewParmSubset_1" ion="k" erev="-95.0 mV"/>

                <channelDensity condDensity="0.2 mS_per_cm2" id="ka_ModelViewParmSubset_10" ionChannel="ka" segmentGroup="ModelViewParmSubset_10" ion="k" erev="-95.0 mV"/>

                <channelDensity condDensity="6.0 mS_per_cm2" id="ka_soma_prox_dends" ionChannel="ka" segmentGroup="soma_prox_dends" ion="k" erev="-95.0 mV"/>

                <channelDensity condDensity="0.05 mS_per_cm2" id="kahp_slower_ModelViewParmSubset_1" ionChannel="kahp_slower" segmentGroup="ModelViewParmSubset_1" ion="k" erev="-95.0 mV"/>

                <channelDensity condDensity="12.0 mS_per_cm2" id="kc_soma_prox_dends" ionChannel="kc" segmentGroup="soma_prox_dends" ion="k" erev="-95.0 mV"/>

                <channelDensity condDensity="20.0 mS_per_cm2" id="kc_ModelViewParmSubset_4" ionChannel="kc" segmentGroup="ModelViewParmSubset_4" ion="k" erev="-95.0 mV"/>

                <channelDensity condDensity="33.75 mS_per_cm2" id="kdr_OneSecGrp_SectionRef_1" ionChannel="kdr" segmentGroup="OneSecGrp_SectionRef_1" ion="k" erev="-95.0 mV"/>

                <channelDensity condDensity="22.5 mS_per_cm2" id="kdr_prox_dends" ionChannel="kdr" segmentGroup="prox_dends" ion="k" erev="-95.0 mV"/>

                <channelDensity condDensity="180.0 mS_per_cm2" id="kdr_ModelViewParmSubset_3" ionChannel="kdr" segmentGroup="ModelViewParmSubset_3" ion="k" erev="-95.0 mV"/>

                <channelDensity condDensity="0.5 mS_per_cm2" id="km_ModelViewParmSubset_1" ionChannel="km" segmentGroup="ModelViewParmSubset_1" ion="k" erev="-95.0 mV"/>

                <channelDensity condDensity="400.0 mS_per_cm2" id="naf_tcr_ModelViewParmSubset_3" ionChannel="naf_tcr" segmentGroup="ModelViewParmSubset_3" ion="na" erev="50.0 mV"/>

                <channelDensity condDensity="-1.0E8 mS_per_cm2" id="naf_tcr_all" ionChannel="naf_tcr" shift_hnaf="-7.0" shift_mnaf_init="-3.0" shift_mnaf_run="-2.5" ion="na" erev="50.0 mV">    <!--Note: Units of extra parameters are not known, except if it's e or erev!!-->
    <!--Note: Units of extra parameters are not known, except if it's e or erev!!-->
    <!--Note: Units of extra parameters are not known, except if it's e or erev!!-->
</channelDensity>

                <channelDensity condDensity="5.0 mS_per_cm2" id="naf_tcr_ModelViewParmSubset_4" ionChannel="naf_tcr" segmentGroup="ModelViewParmSubset_4" ion="na" erev="50.0 mV"/>

                <channelDensity condDensity="100.0 mS_per_cm2" id="naf_tcr_soma_prox_dends" ionChannel="naf_tcr" segmentGroup="soma_prox_dends" ion="na" erev="50.0 mV"/>

                <channelDensity condDensity="-1.0E8 mS_per_cm2" id="napf_tcr_ModelViewParmSubset_1" ionChannel="napf_tcr" segmentGroup="ModelViewParmSubset_1" a="0.0" b="0.0" c="0.0" d="0.0" fastNa_shift="7.0" ion="na" erev="50.0 mV">    <!--Note: Units of extra parameters are not known, except if it's e or erev!!-->
    <!--Note: Units of extra parameters are not known, except if it's e or erev!!-->
    <!--Note: Units of extra parameters are not known, except if it's e or erev!!-->
    <!--Note: Units of extra parameters are not known, except if it's e or erev!!-->
    <!--Note: Units of extra parameters are not known, except if it's e or erev!!-->
</channelDensity>

                <channelDensity condDensity="0.2 mS_per_cm2" id="napf_tcr_soma_prox_dends" ionChannel="napf_tcr" segmentGroup="soma_prox_dends" ion="na" erev="50.0 mV"/>

                <channelDensity condDensity="0.01 mS_per_cm2" id="napf_tcr_ModelViewParmSubset_4" ionChannel="napf_tcr" segmentGroup="ModelViewParmSubset_4" ion="na" erev="50.0 mV"/>

                <channelDensity condDensity="1.0 mS_per_cm2" id="pas_ModelViewParmSubset_3" ionChannel="pas" segmentGroup="ModelViewParmSubset_3" ion="non_specific" erev="-66.6 mV"/>

                <channelDensity condDensity="-1.0E8 mS_per_cm2" id="pas_all" ionChannel="pas" erev="-70.0 mV" ion="non_specific">    <!--Note: Units of extra parameters are not known, except if it's e or erev!!-->
</channelDensity>

                <channelDensity condDensity="0.0378788 mS_per_cm2" id="pas_ModelViewParmSubset_1" ionChannel="pas" segmentGroup="ModelViewParmSubset_1" ion="non_specific" erev="-66.6 mV"/>

                <spikeThresh value="0 mV"/>

                <specificCapacitance value="0.9 uF_per_cm2"/>

                <initMembPotential value="-70.0 mV"/>

            </membraneProperties>

            <intracellularProperties>

                <species segmentGroup="ModelViewParmSubset_6" beta="0.05" phi="104000.0" id="ca" ion="ca" concentrationModel="cad">    <!--Note: Units of extra parameters are not known, except if it's e or erev!!-->
    <!--Note: Units of extra parameters are not known, except if it's e or erev!!-->
</species>

                <species segmentGroup="OneSecGrp_SectionRef_1" beta="0.02" phi="52000.0" id="ca" ion="ca" concentrationModel="cad">    <!--Note: Units of extra parameters are not known, except if it's e or erev!!-->
    <!--Note: Units of extra parameters are not known, except if it's e or erev!!-->
</species>

                <resistivity segmentGroup="ModelViewParmSubset_3" value="0.1 kohm_cm"/>

                <resistivity segmentGroup="ModelViewParmSubset_1" value="0.175 kohm_cm"/>

            </intracellularProperties>

        </biophysicalProperties>

    </cell>

</neuroml>
