<?xml version="1.0" encoding="UTF-8"?>
<neuroml xmlns="http://www.neuroml.org/schema/neuroml2" xmlns:xsi="http://www.w3.org/2001/XMLSchema-instance" xsi:schemaLocation="http://www.neuroml.org/schema/neuroml2  https://raw.github.com/NeuroML/NeuroML2/development/Schemas/NeuroML2/NeuroML_v2beta1.xsd" id="network_Thalamocortical">

<notes>

Network structure (NeuroML 2beta1) for project: Thalamocortical saved with neuroConstruct v1.7.0 on: 14:27:22, 29-Oct-13

Cell Group: CG_C04_RS_sm contains 20 cells
Cell Group: CG_C04_LTS_sm contains 10 cells

Network connection: RS_LTS_sm contains 900 individual synaptic connections
Network connection: RS_RS_sm contains 900 individual synaptic connections
Network connection: LTS_RS_sm contains 1200 individual synaptic connections
Network connection: LTS_LTS_sm contains 200 individual synaptic connections

</notes>

    <include href="L23PyrRS.cell.nml"/>
    <include href="SupLTSInter.cell.nml"/>

    <network id="network_Thalamocortical" type="networkWithTemperature" temperature="6.3 degC">

        <population id="CG_C04_RS_sm" component="L23PyrRS" type="populationList">
            <instance id="0">
                <location x="1134.8223" y="-776.051" z="-129.93982"/>
            </instance>
            <instance id="1">
                <location x="-496.0758" y="-702.01074" z="762.28784"/>
            </instance>
            <instance id="2">
                <location x="240.46411" y="-819.8961" z="-783.1913"/>
            </instance>
            <instance id="3">
                <location x="887.9175" y="-701.2943" z="1158.7278"/>
            </instance>
            <instance id="4">
                <location x="-554.7776" y="-828.9773" z="1056.148"/>
            </instance>
            <instance id="5">
                <location x="938.2964" y="-796.336" z="280.615"/>
            </instance>
            <instance id="6">
                <location x="1142.8838" y="-711.64166" z="322.99292"/>
            </instance>
            <instance id="7">
                <location x="-423.49487" y="-652.4899" z="1215.8467"/>
            </instance>
            <instance id="8">
                <location x="1022.85767" y="-863.53" z="859.4719"/>
            </instance>
            <instance id="9">
                <location x="-1194.0303" y="-783.8359" z="398.04358"/>
            </instance>
            <instance id="10">
                <location x="356.43738" y="-836.92365" z="-1058.7839"/>
            </instance>
            <instance id="11">
                <location x="685.2727" y="-651.5847" z="197.53967"/>
            </instance>
            <instance id="12">
                <location x="446.5293" y="-753.94196" z="-833.2291"/>
            </instance>
            <instance id="13">
                <location x="-747.80524" y="-655.67456" z="-273.02283"/>
            </instance>
            <instance id="14">
                <location x="1011.91724" y="-883.5836" z="-713.6089"/>
            </instance>
            <instance id="15">
                <location x="271.16455" y="-746.6334" z="283.146"/>
            </instance>
            <instance id="16">
                <location x="-844.07904" y="-752.80994" z="-380.43628"/>
            </instance>
            <instance id="17">
                <location x="-700.5463" y="-882.7521" z="123.91626"/>
            </instance>
            <instance id="18">
                <location x="906.07007" y="-779.26715" z="-536.3492"/>
            </instance>
            <instance id="19">
                <location x="-226.51233" y="-740.028" z="-489.77673"/>
            </instance>
        </population>

        <population id="CG_C04_LTS_sm" component="SupLTSInter" type="populationList">
            <instance id="0">
                <location x="871.94995" y="-740.6863" z="865.21704"/>
            </instance>
            <instance id="1">
                <location x="27.609985" y="-690.89844" z="-568.10724"/>
            </instance>
            <instance id="2">
                <location x="905.9907" y="-877.61316" z="-1069.0552"/>
            </instance>
            <instance id="3">
                <location x="400.6836" y="-758.5695" z="-842.8021"/>
            </instance>
            <instance id="4">
                <location x="-72.53735" y="-777.7542" z="-91.0387"/>
            </instance>
            <instance id="5">
                <location x="1060.8345" y="-770.14624" z="630.3052"/>
            </instance>
            <instance id="6">
                <location x="896.2073" y="-753.4585" z="-625.56573"/>
            </instance>
            <instance id="7">
                <location x="327.79346" y="-813.6451" z="1330.9656"/>
            </instance>
            <instance id="8">
                <location x="-202.79578" y="-767.26624" z="-1198.6935"/>
            </instance>
            <instance id="9">
                <location x="-1021.26825" y="-723.8092" z="-156.11365"/>
            </instance>
        </population>

        <projection id="RS_LTS_sm" presynapticPopulation="CG_C04_RS_sm" postsynapticPopulation="CG_C04_LTS_sm" synapse="Exc_Pyr_Int">
            <connection id="0" preCellId="../CG_C04_RS_sm/14/L23PyrRS" postCellId="../CG_C04_LTS_sm/0/SupLTSInter" preSegmentId="147" preFractionAlong="0.8782005" postSegmentId="32" postFractionAlong="0.7611481"/>
            <connection id="1" preCellId="../CG_C04_RS_sm/14/L23PyrRS" postCellId="../CG_C04_LTS_sm/0/SupLTSInter" preSegmentId="142" preFractionAlong="0.64573675" postSegmentId="104" postFractionAlong="0.6156973"/>
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        </projection>

        <projection id="RS_RS_sm" presynapticPopulation="CG_C04_RS_sm" postsynapticPopulation="CG_C04_RS_sm" synapse="Exc_Pyr_Pyr">
            <connection id="0" preCellId="../CG_C04_RS_sm/8/L23PyrRS" postCellId="../CG_C04_RS_sm/0/L23PyrRS" preSegmentId="143" preFractionAlong="0.4353634" postSegmentId="36" postFractionAlong="0.6046002"/>
            <connection id="1" preCellId="../CG_C04_RS_sm/15/L23PyrRS" postCellId="../CG_C04_RS_sm/0/L23PyrRS" preSegmentId="142" preFractionAlong="0.880876" postSegmentId="28" postFractionAlong="0.3362929"/>
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        </projection>

        <projection id="LTS_RS_sm" presynapticPopulation="CG_C04_LTS_sm" postsynapticPopulation="CG_C04_RS_sm" synapse="Inh_LTS_Pyr">
            <connection id="0" preCellId="../CG_C04_LTS_sm/4/SupLTSInter" postCellId="../CG_C04_RS_sm/0/L23PyrRS" preSegmentId="113" preFractionAlong="0.7352004" postSegmentId="55" postFractionAlong="0.74996626"/>
            <connection id="1" preCellId="../CG_C04_LTS_sm/5/SupLTSInter" postCellId="../CG_C04_RS_sm/0/L23PyrRS" preSegmentId="112" preFractionAlong="0.5066859" postSegmentId="50" postFractionAlong="0.5228888"/>
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        </projection>

        <projection id="LTS_LTS_sm" presynapticPopulation="CG_C04_LTS_sm" postsynapticPopulation="CG_C04_LTS_sm" synapse="Inh_LTS_LTS">
            <connection id="0" preCellId="../CG_C04_LTS_sm/1/SupLTSInter" postCellId="../CG_C04_LTS_sm/0/SupLTSInter" preSegmentId="112" preFractionAlong="3.2760017E-4" postSegmentId="32" postFractionAlong="0.91920316"/>
            <connection id="1" preCellId="../CG_C04_LTS_sm/3/SupLTSInter" postCellId="../CG_C04_LTS_sm/0/SupLTSInter" preSegmentId="112" preFractionAlong="0.52730554" postSegmentId="39" postFractionAlong="0.16417316"/>
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        </projection>

            <!--There are no electrical inputs present in the network-->

    </network>

</neuroml>
