<?xml version="1.0" encoding="UTF-8"?>
<neuroml xmlns="http://morphml.org/neuroml/schema" xmlns:meta="http://morphml.org/metadata/schema" xmlns:mml="http://morphml.org/morphml/schema" xmlns:bio="http://morphml.org/biophysics/schema" xmlns:cml="http://morphml.org/channelml/schema" xmlns:xsi="http://www.w3.org/2001/XMLSchema-instance" xsi:schemaLocation="http://morphml.org/neuroml/schema  NeuroML.xsd" lengthUnits="micron">
<meta:notes>This Level 2 NeuroML file (specification version 1.7.3) has been generated by neuroConstruct v1.1.4</meta:notes>
<cells>
    <cell name="L4SpinyStellate">
        <meta:notes>Cell: spinstell_0 exported from NEURON ModelView</meta:notes>

        <mml:segments>
                    <mml:segment id="0" name="Seg0_comp_1" cable="0">
                        <mml:proximal x="0.0" y="-20.0" z="0.0" diameter="15.0"/>
                            <mml:distal x="0.0" y="-10.0" z="0.0" diameter="15.0"/>
                        </mml:segment>
                    <mml:segment id="1" name="Seg1_comp_1" parent="0" cable="0">
                        <mml:distal x="-4.371139E-7" y="0.0" z="0.0" diameter="15.0"/>
                        </mml:segment>
                    <mml:segment id="106" name="Seg0_comp_54" parent="0" cable="1">
                        <mml:proximal x="4.371139E-7" y="-20.0" z="0.0" diameter="1.4"/>
                            <mml:distal x="-3.7745E-7" y="-45.0" z="0.0" diameter="1.4"/>
                        </mml:segment>
                    <mml:segment id="107" name="Seg1_comp_54" parent="106" cable="1">
                        <mml:distal x="-1.1920139E-6" y="-70.0" z="0.0" diameter="1.4"/>
                        </mml:segment>
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        </mml:segments>

        <mml:cables>
            <mml:cable id="0" name="comp_1">
                <meta:group>all</meta:group>
                <meta:group>ModelViewParmSubset_1</meta:group>
                <meta:group>ModelViewParmSubset_2</meta:group>
                <meta:group>ModelViewParmSubset_3</meta:group>
                <meta:group>ModelViewParmSubset_5</meta:group>
                <meta:group>ModelViewParmSubset_14</meta:group>
                <meta:group>OneSecGrp_SectionRef_1</meta:group>
                <meta:group>soma_group</meta:group>
            </mml:cable>
            <mml:cable id="1" name="comp_54" fract_along_parent="0.0">
                <meta:group>all</meta:group>
                <meta:group>dendrite_group</meta:group>
                <meta:group>ModelViewParmSubset_3</meta:group>
                <meta:group>ModelViewParmSubset_4</meta:group>
                <meta:group>ModelViewParmSubset_5</meta:group>
            </mml:cable>
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        </mml:cables>
        <!--Adding the biophysical parameters-->
        <biophysics units="Physiological Units">
            <bio:mechanism name="km" type="Channel Mechanism">
                <bio:parameter name="gmax" value="7.5">
                    <bio:group>ModelViewParmSubset_6</bio:group>
                </bio:parameter>
            </bio:mechanism>
            <bio:mechanism name="ka" type="Channel Mechanism">
                <bio:parameter name="gmax" value="30.0">
                    <bio:group>OneSecGrp_SectionRef_1</bio:group>
                </bio:parameter>
            </bio:mechanism>
            <bio:mechanism name="napf_spinstell" type="Channel Mechanism">
                <bio:parameter name="gmax" value="-1.0E8">
                    <bio:group>ModelViewParmSubset_1</bio:group>
                </bio:parameter>
                <bio:parameter name="a" value="0.0">                    <!--Note: Units of extra parameters are not known!!-->
                    <bio:group>ModelViewParmSubset_1</bio:group>
                </bio:parameter>
                <bio:parameter name="b" value="0.0">                    <!--Note: Units of extra parameters are not known!!-->
                    <bio:group>ModelViewParmSubset_1</bio:group>
                </bio:parameter>
                <bio:parameter name="c" value="0.0">                    <!--Note: Units of extra parameters are not known!!-->
                    <bio:group>ModelViewParmSubset_1</bio:group>
                </bio:parameter>
                <bio:parameter name="d" value="0.0">                    <!--Note: Units of extra parameters are not known!!-->
                    <bio:group>ModelViewParmSubset_1</bio:group>
                </bio:parameter>
                <bio:parameter name="fastNa_shift" value="-2.5">                    <!--Note: Units of extra parameters are not known!!-->
                    <bio:group>ModelViewParmSubset_1</bio:group>
                </bio:parameter>
            </bio:mechanism>
            <bio:mechanism name="km" type="Channel Mechanism">
                <bio:parameter name="gmax" value="3.75">
                    <bio:group>OneSecGrp_SectionRef_1</bio:group>
                </bio:parameter>
            </bio:mechanism>
            <bio:mechanism name="cal" type="Channel Mechanism">
                <bio:parameter name="gmax" value="1.0">
                    <bio:group>ModelViewParmSubset_7</bio:group>
                </bio:parameter>
            </bio:mechanism>
            <bio:mechanism name="ar" type="Channel Mechanism">
                <bio:parameter name="gmax" value="0.5">
                    <bio:group>ModelViewParmSubset_6</bio:group>
                </bio:parameter>
            </bio:mechanism>
            <bio:mechanism name="pas" type="Channel Mechanism" passive_conductance="true">
                <bio:parameter name="e" value="-66.6">
                    <bio:group>ModelViewParmSubset_4</bio:group>
                </bio:parameter>
                <bio:parameter name="gmax" value="1.0">
                    <bio:group>ModelViewParmSubset_4</bio:group>
                </bio:parameter>
            </bio:mechanism>
            <bio:mechanism name="naf2" type="Channel Mechanism">
                <bio:parameter name="gmax" value="-1.0E8">
                    <bio:group>all</bio:group>
                </bio:parameter>
                <bio:parameter name="a" value="0.0">                    <!--Note: Units of extra parameters are not known!!-->
                    <bio:group>all</bio:group>
                </bio:parameter>
                <bio:parameter name="b" value="0.0">                    <!--Note: Units of extra parameters are not known!!-->
                    <bio:group>all</bio:group>
                </bio:parameter>
                <bio:parameter name="c" value="0.0">                    <!--Note: Units of extra parameters are not known!!-->
                    <bio:group>all</bio:group>
                </bio:parameter>
                <bio:parameter name="d" value="0.0">                    <!--Note: Units of extra parameters are not known!!-->
                    <bio:group>all</bio:group>
                </bio:parameter>
                <bio:parameter name="fastNa_shift" value="-2.5">                    <!--Note: Units of extra parameters are not known!!-->
                    <bio:group>all</bio:group>
                </bio:parameter>
            </bio:mechanism>
            <bio:mechanism name="pas" type="Channel Mechanism" passive_conductance="true">
                <bio:parameter name="e" value="-66.6">
                    <bio:group>OneSecGrp_SectionRef_1</bio:group>
                </bio:parameter>
                <bio:parameter name="gmax" value="0.02">
                    <bio:group>OneSecGrp_SectionRef_1</bio:group>
                </bio:parameter>
            </bio:mechanism>
            <bio:mechanism name="napf_spinstell" type="Channel Mechanism">
                <bio:parameter name="gmax" value="0.15">
                    <bio:group>ModelViewParmSubset_14</bio:group>
                </bio:parameter>
            </bio:mechanism>
            <bio:mechanism name="ka" type="Channel Mechanism">
                <bio:parameter name="gmax" value="60.0">
                    <bio:group>ModelViewParmSubset_10</bio:group>
                </bio:parameter>
            </bio:mechanism>
            <bio:mechanism name="k2" type="Channel Mechanism">
                <bio:parameter name="gmax" value="0.1">
                    <bio:group>ModelViewParmSubset_5</bio:group>
                </bio:parameter>
            </bio:mechanism>
            <bio:mechanism name="kc_fast" type="Channel Mechanism">
                <bio:parameter name="gmax" value="20.0">
                    <bio:group>ModelViewParmSubset_11</bio:group>
                </bio:parameter>
            </bio:mechanism>
            <bio:mechanism name="cad" type="Channel Mechanism">
                <bio:parameter name="gmax" value="-1.0E8">
                    <bio:group>ModelViewParmSubset_6</bio:group>
                </bio:parameter>
                <bio:parameter name="beta" value="0.05">                    <!--Note: Units of extra parameters are not known!!-->
                    <bio:group>ModelViewParmSubset_6</bio:group>
                </bio:parameter>
            </bio:mechanism>
            <bio:mechanism name="pas" type="Channel Mechanism" passive_conductance="true">
                <bio:parameter name="e" value="-65.0">
                    <bio:group>all</bio:group>
                </bio:parameter>
                <bio:parameter name="gmax" value="-1.0E8">
                    <bio:group>all</bio:group>
                </bio:parameter>
            </bio:mechanism>
            <bio:mechanism name="cat_a" type="Channel Mechanism">
                <bio:parameter name="gmax" value="0.1">
                    <bio:group>OneSecGrp_SectionRef_1</bio:group>
                </bio:parameter>
            </bio:mechanism>
            <bio:mechanism name="cad" type="Channel Mechanism">
                <bio:parameter name="gmax" value="-1.0E8">
                    <bio:group>OneSecGrp_SectionRef_1</bio:group>
                </bio:parameter>
                <bio:parameter name="beta" value="0.02">                    <!--Note: Units of extra parameters are not known!!-->
                    <bio:group>OneSecGrp_SectionRef_1</bio:group>
                </bio:parameter>
            </bio:mechanism>
            <bio:mechanism name="cal" type="Channel Mechanism">
                <bio:parameter name="gmax" value="0.5">
                    <bio:group>OneSecGrp_SectionRef_1</bio:group>
                </bio:parameter>
            </bio:mechanism>
            <bio:mechanism name="kahp_slower" type="Channel Mechanism">
                <bio:parameter name="gmax" value="0.2">
                    <bio:group>ModelViewParmSubset_6</bio:group>
                </bio:parameter>
            </bio:mechanism>
            <bio:mechanism name="kdr_fs" type="Channel Mechanism">
                <bio:parameter name="gmax" value="400.0">
                    <bio:group>ModelViewParmSubset_4</bio:group>
                </bio:parameter>
            </bio:mechanism>
            <bio:mechanism name="ka" type="Channel Mechanism">
                <bio:parameter name="gmax" value="4.0">
                    <bio:group>ModelViewParmSubset_9</bio:group>
                </bio:parameter>
            </bio:mechanism>
            <bio:mechanism name="kc_fast" type="Channel Mechanism">
                <bio:parameter name="gmax" value="10.0">
                    <bio:group>OneSecGrp_SectionRef_1</bio:group>
                </bio:parameter>
            </bio:mechanism>
            <bio:mechanism name="k2" type="Channel Mechanism">
                <bio:parameter name="gmax" value="0.2">
                    <bio:group>ModelViewParmSubset_6</bio:group>
                </bio:parameter>
            </bio:mechanism>
            <bio:mechanism name="kahp_slower" type="Channel Mechanism">
                <bio:parameter name="gmax" value="0.1">
                    <bio:group>OneSecGrp_SectionRef_1</bio:group>
                </bio:parameter>
            </bio:mechanism>
            <bio:mechanism name="cal" type="Channel Mechanism">
                <bio:parameter name="gmax" value="6.0">
                    <bio:group>ModelViewParmSubset_8</bio:group>
                </bio:parameter>
            </bio:mechanism>
            <bio:mechanism name="napf_spinstell" type="Channel Mechanism">
                <bio:parameter name="gmax" value="0.01">
                    <bio:group>ModelViewParmSubset_13</bio:group>
                </bio:parameter>
            </bio:mechanism>
            <bio:mechanism name="kdr_fs" type="Channel Mechanism">
                <bio:parameter name="gmax" value="150.0">
                    <bio:group>ModelViewParmSubset_12</bio:group>
                </bio:parameter>
            </bio:mechanism>
            <bio:mechanism name="ka" type="Channel Mechanism">
                <bio:parameter name="gmax" value="2.0">
                    <bio:group>ModelViewParmSubset_4</bio:group>
                </bio:parameter>
            </bio:mechanism>
            <bio:mechanism name="ar" type="Channel Mechanism">
                <bio:parameter name="gmax" value="0.25">
                    <bio:group>OneSecGrp_SectionRef_1</bio:group>
                </bio:parameter>
            </bio:mechanism>
            <bio:mechanism name="cad" type="Channel Mechanism">
                <bio:parameter name="gmax" value="-1.0E8">
                    <bio:group>ModelViewParmSubset_1</bio:group>
                </bio:parameter>
                <bio:parameter name="phi" value="260000.0">                    <!--Note: Units of extra parameters are not known!!-->
                    <bio:group>ModelViewParmSubset_1</bio:group>
                </bio:parameter>
            </bio:mechanism>
            <bio:mechanism name="naf2" type="Channel Mechanism">
                <bio:parameter name="gmax" value="10.0">
                    <bio:group>ModelViewParmSubset_13</bio:group>
                </bio:parameter>
            </bio:mechanism>
            <bio:mechanism name="cat_a" type="Channel Mechanism">
                <bio:parameter name="gmax" value="0.2">
                    <bio:group>ModelViewParmSubset_6</bio:group>
                </bio:parameter>
            </bio:mechanism>
            <bio:mechanism name="ar" type="Channel Mechanism">
                <bio:parameter name="gmax" value="-1.0E8">
                    <bio:group>ModelViewParmSubset_1</bio:group>
                </bio:parameter>
                <bio:parameter name="erev" value="-40.0">                    <!--Note: Units of extra parameters are not known!!-->
                    <bio:group>ModelViewParmSubset_1</bio:group>
                </bio:parameter>
                <bio:parameter name="m0" value="0.0">                    <!--Note: Units of extra parameters are not known!!-->
                    <bio:group>ModelViewParmSubset_1</bio:group>
                </bio:parameter>
            </bio:mechanism>
            <bio:mechanism name="kdr_fs" type="Channel Mechanism">
                <bio:parameter name="gmax" value="100.0">
                    <bio:group>OneSecGrp_SectionRef_1</bio:group>
                </bio:parameter>
            </bio:mechanism>
            <bio:mechanism name="pas" type="Channel Mechanism" passive_conductance="true">
                <bio:parameter name="e" value="-66.6">
                    <bio:group>ModelViewParmSubset_6</bio:group>
                </bio:parameter>
                <bio:parameter name="gmax" value="0.04">
                    <bio:group>ModelViewParmSubset_6</bio:group>
                </bio:parameter>
            </bio:mechanism>
            <bio:mechanism name="naf2" type="Channel Mechanism">
                <bio:parameter name="gmax" value="400.0">
                    <bio:group>ModelViewParmSubset_4</bio:group>
                </bio:parameter>
            </bio:mechanism>
            <bio:mechanism name="naf2" type="Channel Mechanism">
                <bio:parameter name="gmax" value="150.0">
                    <bio:group>ModelViewParmSubset_14</bio:group>
                </bio:parameter>
            </bio:mechanism>
            <bio:spec_capacitance>
                <bio:parameter value="0.9">
                    <bio:group>ModelViewParmSubset_5</bio:group>
                </bio:parameter>
                <bio:parameter value="1.8">
                    <bio:group>ModelViewParmSubset_6</bio:group>
                </bio:parameter>
            </bio:spec_capacitance>
            <bio:spec_axial_resistance>
                <bio:parameter value="0.1">
                    <bio:group>ModelViewParmSubset_4</bio:group>
                </bio:parameter>
                <bio:parameter value="0.25">
                    <bio:group>ModelViewParmSubset_1</bio:group>
                </bio:parameter>
            </bio:spec_axial_resistance>
            <bio:init_memb_potential>
                <bio:parameter value="-65.0">
                    <bio:group>all</bio:group>
                </bio:parameter>
            </bio:init_memb_potential>
        </biophysics>
    </cell>
</cells></neuroml>
