<?xml version="1.0" encoding="UTF-8"?>
<neuroml xmlns="http://morphml.org/neuroml/schema"
    xmlns:mml="http://morphml.org/morphml/schema"
    xmlns:meta="http://morphml.org/metadata/schema"
    xmlns:bio="http://morphml.org/biophysics/schema"
    xmlns:cml="http://morphml.org/channelml/schema"
    xmlns:xsi="http://www.w3.org/2001/XMLSchema-instance"
    xsi:schemaLocation="http://morphml.org/neuroml/schema NeuroML_Level2_v1.6.xsd"
    name = "NeuroML Level 2 file exported from NEURON"
    lengthUnits="micron">

<meta:notes>NeuroML Level 2 file generated by NEURON 6.1 ModelViewer
Authors: Michael Hines, Sushil Kambampati and Padraig Gleeson,
Yale University and UCL</meta:notes>

<cells>
  <cell name="pyr3_0">
    <meta:notes>Cell: pyr3_0 exported from NEURON ModelView</meta:notes>
    <segments  xmlns="http://morphml.org/morphml/schema"> <!-- Changing namespace from neuroml to morphml-->
      <segment id="0" name = "Seg0_comp_1" cable = "0">
        <proximal x="-149" y="-14" z="0" diameter="16"/>
        <distal x="-134" y="-14" z="0" diameter="16"/>
      </segment>
      <segment id="78" name = "Seg0_aux69" parent="0" cable = "78">  <!-- Connected at 0.5 on parent section: pyr3[0].comp[1]  -->
        <proximal x="-141.5" y="-14" z="0" diameter="16"/>
        <distal x="-134" y="-14" z="0" diameter="16"/>
      </segment>
      <segment id="87" name = "Seg0_aux2to9_7" parent="0" cable = "87">  <!-- Connected at 0.5 on parent section: pyr3[0].comp[1]  -->
        <proximal x="-141.5" y="-14" z="0" diameter="16"/>
        <distal x="-134" y="-14" z="0" diameter="16"/>
      </segment>
      <segment id="86" name = "Seg0_aux2to9_6" parent="0" cable = "86">  <!-- Connected at 0.5 on parent section: pyr3[0].comp[1]  -->
        <proximal x="-141.5" y="-14" z="0" diameter="16"/>
        <distal x="-134" y="-14" z="0" diameter="16"/>
      </segment>
      <segment id="85" name = "Seg0_aux2to9_5" parent="0" cable = "85">  <!-- Connected at 0.5 on parent section: pyr3[0].comp[1]  -->
        <proximal x="-141.5" y="-14" z="0" diameter="16"/>
        <distal x="-134" y="-14" z="0" diameter="16"/>
      </segment>
      <segment id="84" name = "Seg0_aux2to9_4" parent="0" cable = "84">  <!-- Connected at 0.5 on parent section: pyr3[0].comp[1]  -->
        <proximal x="-141.5" y="-14" z="0" diameter="16"/>
        <distal x="-134" y="-14" z="0" diameter="16"/>
      </segment>
      <segment id="83" name = "Seg0_aux2to9_3" parent="0" cable = "83">  <!-- Connected at 0.5 on parent section: pyr3[0].comp[1]  -->
        <proximal x="-141.5" y="-14" z="0" diameter="16"/>
        <distal x="-134" y="-14" z="0" diameter="16"/>
      </segment>
      <segment id="82" name = "Seg0_aux2to9_2" parent="0" cable = "82">  <!-- Connected at 0.5 on parent section: pyr3[0].comp[1]  -->
        <proximal x="-141.5" y="-14" z="0" diameter="16"/>
        <distal x="-134" y="-14" z="0" diameter="16"/>
      </segment>
      <segment id="81" name = "Seg0_aux2to9_1" parent="0" cable = "81">  <!-- Connected at 0.5 on parent section: pyr3[0].comp[1]  -->
        <proximal x="-141.5" y="-14" z="0" diameter="16"/>
        <distal x="-134" y="-14" z="0" diameter="16"/>
      </segment>
      <segment id="80" name = "Seg0_aux2to9_0" parent="0" cable = "80">  <!-- Connected at 0.5 on parent section: pyr3[0].comp[1]  -->
        <proximal x="-141.5" y="-14" z="0" diameter="16"/>
        <distal x="-134" y="-14" z="0" diameter="16"/>
      </segment>
      <segment id="79" name = "Seg0_aux38" parent="0" cable = "79">  <!-- Connected at 0.5 on parent section: pyr3[0].comp[1]  -->
        <proximal x="-141.5" y="-14" z="0" diameter="16"/>
        <distal x="-134" y="-14" z="0" diameter="16"/>
      </segment>
      <segment id="68" name = "Seg0_comp_69" parent="78" cable = "68">  <!-- Parent section: pyr3[0].aux69 -->
        <proximal x="-134" y="-14" z="0" diameter="1.8"/>
        <distal x="-134" y="-39" z="0" diameter="1.8"/>
      </segment>
      <segment id="8" name = "Seg0_comp_9" parent="87" cable = "8">  <!-- Parent section: pyr3[0].aux2to9[7] -->
        <proximal x="-134" y="-14" z="0" diameter="1"/>
        <distal x="-189.47" y="-97.205" z="0" diameter="1"/>
      </segment>
      <segment id="7" name = "Seg0_comp_8" parent="86" cable = "7">  <!-- Parent section: pyr3[0].aux2to9[6] -->
        <proximal x="-134" y="-14" z="0" diameter="1"/>
        <distal x="-217.205" y="-69.47" z="0" diameter="1"/>
      </segment>
      <segment id="6" name = "Seg0_comp_7" parent="85" cable = "6">  <!-- Parent section: pyr3[0].aux2to9[5] -->
        <proximal x="-134" y="-14" z="0" diameter="1"/>
        <distal x="-165.623" y="-108.868" z="0" diameter="1"/>
      </segment>
      <segment id="5" name = "Seg0_comp_6" parent="84" cable = "5">  <!-- Parent section: pyr3[0].aux2to9[4] -->
        <proximal x="-134" y="-14" z="0" diameter="1"/>
        <distal x="-228.868" y="-45.6228" z="0" diameter="1"/>
      </segment>
      <segment id="4" name = "Seg0_comp_5" parent="83" cable = "4">  <!-- Parent section: pyr3[0].aux2to9[3] -->
        <proximal x="-134" y="-14" z="0" diameter="1"/>
        <distal x="-229.486" y="15.7067" z="0" diameter="1"/>
      </segment>
      <segment id="3" name = "Seg0_comp_4" parent="82" cable = "3">  <!-- Parent section: pyr3[0].aux2to9[2] -->
        <proximal x="-134" y="-14" z="0" diameter="1"/>
        <distal x="-218.057" y="40.1701" z="0" diameter="1"/>
      </segment>
      <segment id="2" name = "Seg0_comp_3" parent="81" cable = "2">  <!-- Parent section: pyr3[0].aux2to9[1] -->
        <proximal x="-134" y="-14" z="0" diameter="1"/>
        <distal x="-190.334" y="68.6227" z="0" diameter="1"/>
      </segment>
      <segment id="1" name = "Seg0_comp_2" parent="80" cable = "1">  <!-- Parent section: pyr3[0].aux2to9[0] -->
        <proximal x="-134" y="-14" z="0" diameter="1"/>
        <distal x="-166.267" y="80.651" z="0" diameter="1"/>
      </segment>
      <segment id="37" name = "Seg0_comp_38" parent="79" cable = "37">  <!-- Parent section: pyr3[0].aux38 -->
        <proximal x="-134" y="-14" z="0" diameter="8"/>
        <distal x="-34" y="-14" z="0" diameter="8"/>
      </segment>
      <segment id="69" name = "Seg0_comp_70" parent="68" cable = "69">  <!-- Parent section: pyr3[0].comp[69] -->
        <proximal x="-134" y="-39" z="0" diameter="1.4"/>
        <distal x="-134" y="-89" z="0" diameter="1.4"/>
      </segment>
      <segment id="20" name = "Seg0_comp_21" parent="8" cable = "20">  <!-- Parent section: pyr3[0].comp[9] -->
        <proximal x="-189.47" y="-97.205" z="0" diameter="1"/>
        <distal x="-260.181" y="-167.916" z="0" diameter="1"/>
      </segment>
      <segment id="19" name = "Seg0_comp_20" parent="7" cable = "19">  <!-- Parent section: pyr3[0].comp[8] -->
        <proximal x="-217.205" y="-69.47" z="0" diameter="1"/>
        <distal x="-287.916" y="-140.181" z="0" diameter="1"/>
      </segment>
      <segment id="18" name = "Seg0_comp_19" parent="6" cable = "18">  <!-- Parent section: pyr3[0].comp[7] -->
        <proximal x="-165.623" y="-108.868" z="0" diameter="1"/>
        <distal x="-236.333" y="-179.579" z="0" diameter="1"/>
      </segment>
      <segment id="17" name = "Seg0_comp_18" parent="5" cable = "17">  <!-- Parent section: pyr3[0].comp[6] -->
        <proximal x="-228.868" y="-45.6228" z="0" diameter="1"/>
        <distal x="-299.579" y="-116.333" z="0" diameter="1"/>
      </segment>
      <segment id="16" name = "Seg0_comp_17" parent="4" cable = "16">  <!-- Parent section: pyr3[0].comp[5] -->
        <proximal x="-229.486" y="15.7067" z="0" diameter="1"/>
        <distal x="-300.196" y="86.4173" z="0" diameter="1"/>
      </segment>
      <segment id="15" name = "Seg0_comp_16" parent="3" cable = "15">  <!-- Parent section: pyr3[0].comp[4] -->
        <proximal x="-218.057" y="40.1701" z="0" diameter="1"/>
        <distal x="-288.768" y="110.881" z="0" diameter="1"/>
      </segment>
      <segment id="14" name = "Seg0_comp_15" parent="2" cable = "14">  <!-- Parent section: pyr3[0].comp[3] -->
        <proximal x="-190.334" y="68.6227" z="0" diameter="1"/>
        <distal x="-261.044" y="139.333" z="0" diameter="1"/>
      </segment>
      <segment id="13" name = "Seg0_comp_14" parent="1" cable = "13">  <!-- Parent section: pyr3[0].comp[2] -->
        <proximal x="-166.267" y="80.651" z="0" diameter="1"/>
        <distal x="-236.978" y="151.362" z="0" diameter="1"/>
      </segment>
      <segment id="77" name = "Seg0_aux10to13_3" parent="37" cable = "77">  <!-- Connected at 0.5 on parent section: pyr3[0].comp[38]  -->
        <proximal x="-84" y="-14" z="0" diameter="8"/>
        <distal x="-59" y="-14" z="0" diameter="8"/>
      </segment>
      <segment id="76" name = "Seg0_aux10to13_2" parent="37" cable = "76">  <!-- Connected at 0.5 on parent section: pyr3[0].comp[38]  -->
        <proximal x="-84" y="-14" z="0" diameter="8"/>
        <distal x="-59" y="-14" z="0" diameter="8"/>
      </segment>
      <segment id="75" name = "Seg0_aux10to13_1" parent="37" cable = "75">  <!-- Connected at 0.5 on parent section: pyr3[0].comp[38]  -->
        <proximal x="-84" y="-14" z="0" diameter="8"/>
        <distal x="-59" y="-14" z="0" diameter="8"/>
      </segment>
      <segment id="74" name = "Seg0_aux10to13_0" parent="37" cable = "74">  <!-- Connected at 0.5 on parent section: pyr3[0].comp[38]  -->
        <proximal x="-84" y="-14" z="0" diameter="8"/>
        <distal x="-59" y="-14" z="0" diameter="8"/>
      </segment>
      <segment id="38" name = "Seg0_comp_39" parent="37" cable = "38">  <!-- Parent section: pyr3[0].comp[38] -->
        <proximal x="-34" y="-14" z="0" diameter="7.2"/>
        <distal x="66" y="-14" z="0" diameter="7.2"/>
      </segment>
      <segment id="72" name = "Seg0_comp_73" parent="69" cable = "72">  <!-- Parent section: pyr3[0].comp[70] -->
        <proximal x="-134" y="-89" z="0" diameter="1"/>
        <distal x="-134" y="-139" z="0" diameter="1"/>
      </segment>
      <segment id="70" name = "Seg0_comp_71" parent="69" cable = "70">  <!-- Parent section: pyr3[0].comp[70] -->
        <proximal x="-134" y="-89" z="0" diameter="1"/>
        <distal x="-169.355" y="-124.355" z="0" diameter="1"/>
      </segment>
      <segment id="32" name = "Seg0_comp_33" parent="20" cable = "32">  <!-- Parent section: pyr3[0].comp[21] -->
        <proximal x="-260.181" y="-167.916" z="0" diameter="1"/>
        <distal x="-330.891" y="-238.626" z="0" diameter="1"/>
      </segment>
      <segment id="31" name = "Seg0_comp_32" parent="19" cable = "31">  <!-- Parent section: pyr3[0].comp[20] -->
        <proximal x="-287.916" y="-140.181" z="0" diameter="1"/>
        <distal x="-358.626" y="-210.891" z="0" diameter="1"/>
      </segment>
      <segment id="30" name = "Seg0_comp_31" parent="18" cable = "30">  <!-- Parent section: pyr3[0].comp[19] -->
        <proximal x="-236.333" y="-179.579" z="0" diameter="1"/>
        <distal x="-307.044" y="-250.29" z="0" diameter="1"/>
      </segment>
      <segment id="29" name = "Seg0_comp_30" parent="17" cable = "29">  <!-- Parent section: pyr3[0].comp[18] -->
        <proximal x="-299.579" y="-116.333" z="0" diameter="1"/>
        <distal x="-370.29" y="-187.044" z="0" diameter="1"/>
      </segment>
      <segment id="28" name = "Seg0_comp_29" parent="16" cable = "28">  <!-- Parent section: pyr3[0].comp[17] -->
        <proximal x="-300.196" y="86.4173" z="0" diameter="1"/>
        <distal x="-370.907" y="157.128" z="0" diameter="1"/>
      </segment>
      <segment id="27" name = "Seg0_comp_28" parent="15" cable = "27">  <!-- Parent section: pyr3[0].comp[16] -->
        <proximal x="-288.768" y="110.881" z="0" diameter="1"/>
        <distal x="-359.478" y="181.591" z="0" diameter="1"/>
      </segment>
      <segment id="26" name = "Seg0_comp_27" parent="14" cable = "26">  <!-- Parent section: pyr3[0].comp[15] -->
        <proximal x="-261.044" y="139.333" z="0" diameter="1"/>
        <distal x="-331.755" y="210.044" z="0" diameter="1"/>
      </segment>
      <segment id="25" name = "Seg0_comp_26" parent="13" cable = "25">  <!-- Parent section: pyr3[0].comp[14] -->
        <proximal x="-236.978" y="151.362" z="0" diameter="1"/>
        <distal x="-307.689" y="222.072" z="0" diameter="1"/>
      </segment>
      <segment id="12" name = "Seg0_comp_13" parent="77" cable = "12">  <!-- Parent section: pyr3[0].aux10to13[3] -->
        <proximal x="-59" y="-14" z="0" diameter="1"/>
        <distal x="11.7107" y="-84.7107" z="0" diameter="1"/>
      </segment>
      <segment id="11" name = "Seg0_comp_12" parent="76" cable = "11">  <!-- Parent section: pyr3[0].aux10to13[2] -->
        <proximal x="-59" y="-14" z="0" diameter="1"/>
        <distal x="-129.711" y="-84.7107" z="0" diameter="1"/>
      </segment>
      <segment id="10" name = "Seg0_comp_11" parent="75" cable = "10">  <!-- Parent section: pyr3[0].aux10to13[1] -->
        <proximal x="-59" y="-14" z="0" diameter="1"/>
        <distal x="14.1055" y="54.2318" z="0" diameter="1"/>
      </segment>
      <segment id="9" name = "Seg0_comp_10" parent="74" cable = "9">  <!-- Parent section: pyr3[0].aux10to13[0] -->
        <proximal x="-59" y="-14" z="0" diameter="1"/>
        <distal x="-132.106" y="54.2318" z="0" diameter="1"/>
      </segment>
      <segment id="39" name = "Seg0_comp_40" parent="38" cable = "39">  <!-- Parent section: pyr3[0].comp[39] -->
        <proximal x="66" y="-14" z="0" diameter="6.4"/>
        <distal x="166" y="-14" z="0" diameter="6.4"/>
      </segment>
      <segment id="73" name = "Seg0_comp_74" parent="72" cable = "73">  <!-- Parent section: pyr3[0].comp[73] -->
        <proximal x="-134" y="-139" z="0" diameter="1"/>
        <distal x="-134" y="-189" z="0" diameter="1"/>
      </segment>
      <segment id="71" name = "Seg0_comp_72" parent="70" cable = "71">  <!-- Parent section: pyr3[0].comp[71] -->
        <proximal x="-169.355" y="-124.355" z="0" diameter="1"/>
        <distal x="-169.355" y="-174.355" z="0" diameter="1"/>
      </segment>
      <segment id="24" name = "Seg0_comp_25" parent="12" cable = "24">  <!-- Parent section: pyr3[0].comp[13] -->
        <proximal x="11.7107" y="-84.7107" z="0" diameter="1"/>
        <distal x="11.7107" y="-184.711" z="0" diameter="1"/>
      </segment>
      <segment id="23" name = "Seg0_comp_24" parent="11" cable = "23">  <!-- Parent section: pyr3[0].comp[12] -->
        <proximal x="-129.711" y="-84.7107" z="0" diameter="1"/>
        <distal x="-129.711" y="-184.711" z="0" diameter="1"/>
      </segment>
      <segment id="22" name = "Seg0_comp_23" parent="10" cable = "22">  <!-- Parent section: pyr3[0].comp[11] -->
        <proximal x="14.1055" y="54.2318" z="0" diameter="1"/>
        <distal x="14.1055" y="154.232" z="0" diameter="1"/>
      </segment>
      <segment id="21" name = "Seg0_comp_22" parent="9" cable = "21">  <!-- Parent section: pyr3[0].comp[10] -->
        <proximal x="-132.106" y="54.2318" z="0" diameter="1"/>
        <distal x="-132.106" y="154.232" z="0" diameter="1"/>
      </segment>
      <segment id="41" name = "Seg0_comp_42" parent="39" cable = "41">  <!-- Parent section: pyr3[0].comp[40] -->
        <proximal x="166" y="-14" z="0" diameter="4"/>
        <distal x="221.47" y="-97.205" z="0" diameter="4"/>
      </segment>
      <segment id="40" name = "Seg0_comp_41" parent="39" cable = "40">  <!-- Parent section: pyr3[0].comp[40] -->
        <proximal x="166" y="-14" z="0" diameter="4"/>
        <distal x="222.334" y="68.6227" z="0" diameter="4"/>
      </segment>
      <segment id="36" name = "Seg0_comp_37" parent="24" cable = "36">  <!-- Parent section: pyr3[0].comp[25] -->
        <proximal x="11.7107" y="-184.711" z="0" diameter="1"/>
        <distal x="11.7107" y="-284.711" z="0" diameter="1"/>
      </segment>
      <segment id="35" name = "Seg0_comp_36" parent="23" cable = "35">  <!-- Parent section: pyr3[0].comp[24] -->
        <proximal x="-129.711" y="-184.711" z="0" diameter="1"/>
        <distal x="-129.711" y="-284.711" z="0" diameter="1"/>
      </segment>
      <segment id="34" name = "Seg0_comp_35" parent="22" cable = "34">  <!-- Parent section: pyr3[0].comp[23] -->
        <proximal x="14.1055" y="154.232" z="0" diameter="1"/>
        <distal x="14.1055" y="254.232" z="0" diameter="1"/>
      </segment>
      <segment id="33" name = "Seg0_comp_34" parent="21" cable = "33">  <!-- Parent section: pyr3[0].comp[22] -->
        <proximal x="-132.106" y="154.232" z="0" diameter="1"/>
        <distal x="-132.106" y="254.232" z="0" diameter="1"/>
      </segment>
      <segment id="43" name = "Seg0_comp_44" parent="41" cable = "43">  <!-- Parent section: pyr3[0].comp[42] -->
        <proximal x="221.47" y="-97.205" z="0" diameter="4"/>
        <distal x="289.702" y="-170.311" z="0" diameter="4"/>
      </segment>
      <segment id="42" name = "Seg0_comp_43" parent="40" cable = "42">  <!-- Parent section: pyr3[0].comp[41] -->
        <proximal x="222.334" y="68.6227" z="0" diameter="4"/>
        <distal x="290.565" y="141.728" z="0" diameter="4"/>
      </segment>
      <segment id="51" name = "Seg0_comp_52" parent="43" cable = "51">  <!-- Parent section: pyr3[0].comp[44] -->
        <proximal x="289.702" y="-170.311" z="0" diameter="1.6"/>
        <distal x="372.907" y="-225.781" z="0" diameter="1.6"/>
      </segment>
      <segment id="50" name = "Seg0_comp_51" parent="43" cable = "50">  <!-- Parent section: pyr3[0].comp[44] -->
        <proximal x="289.702" y="-170.311" z="0" diameter="1.6"/>
        <distal x="384.57" y="-201.933" z="0" diameter="1.6"/>
      </segment>
      <segment id="49" name = "Seg0_comp_50" parent="43" cable = "49">  <!-- Parent section: pyr3[0].comp[44] -->
        <proximal x="289.702" y="-170.311" z="0" diameter="1.6"/>
        <distal x="384.57" y="-138.688" z="0" diameter="1.6"/>
      </segment>
      <segment id="48" name = "Seg0_comp_49" parent="43" cable = "48">  <!-- Parent section: pyr3[0].comp[44] -->
        <proximal x="289.702" y="-170.311" z="0" diameter="1.6"/>
        <distal x="372.907" y="-114.841" z="0" diameter="1.6"/>
      </segment>
      <segment id="47" name = "Seg0_comp_48" parent="42" cable = "47">  <!-- Parent section: pyr3[0].comp[43] -->
        <proximal x="290.565" y="141.728" z="0" diameter="1.6"/>
        <distal x="373.771" y="86.2583" z="0" diameter="1.6"/>
      </segment>
      <segment id="46" name = "Seg0_comp_47" parent="42" cable = "46">  <!-- Parent section: pyr3[0].comp[43] -->
        <proximal x="290.565" y="141.728" z="0" diameter="1.6"/>
        <distal x="385.434" y="110.105" z="0" diameter="1.6"/>
      </segment>
      <segment id="45" name = "Seg0_comp_46" parent="42" cable = "45">  <!-- Parent section: pyr3[0].comp[43] -->
        <proximal x="290.565" y="141.728" z="0" diameter="1.6"/>
        <distal x="385.434" y="173.351" z="0" diameter="1.6"/>
      </segment>
      <segment id="44" name = "Seg0_comp_45" parent="42" cable = "44">  <!-- Parent section: pyr3[0].comp[43] -->
        <proximal x="290.565" y="141.728" z="0" diameter="1.6"/>
        <distal x="373.771" y="197.198" z="0" diameter="1.6"/>
      </segment>
      <segment id="59" name = "Seg0_comp_60" parent="51" cable = "59">  <!-- Parent section: pyr3[0].comp[52] -->
        <proximal x="372.907" y="-225.781" z="0" diameter="1.6"/>
        <distal x="472.907" y="-225.781" z="0" diameter="1.6"/>
      </segment>
      <segment id="58" name = "Seg0_comp_59" parent="50" cable = "58">  <!-- Parent section: pyr3[0].comp[51] -->
        <proximal x="384.57" y="-201.933" z="0" diameter="1.6"/>
        <distal x="484.57" y="-201.933" z="0" diameter="1.6"/>
      </segment>
      <segment id="57" name = "Seg0_comp_58" parent="49" cable = "57">  <!-- Parent section: pyr3[0].comp[50] -->
        <proximal x="384.57" y="-138.688" z="0" diameter="1.6"/>
        <distal x="484.57" y="-138.688" z="0" diameter="1.6"/>
      </segment>
      <segment id="56" name = "Seg0_comp_57" parent="48" cable = "56">  <!-- Parent section: pyr3[0].comp[49] -->
        <proximal x="372.907" y="-114.841" z="0" diameter="1.6"/>
        <distal x="472.907" y="-114.841" z="0" diameter="1.6"/>
      </segment>
      <segment id="55" name = "Seg0_comp_56" parent="47" cable = "55">  <!-- Parent section: pyr3[0].comp[48] -->
        <proximal x="373.771" y="86.2583" z="0" diameter="1.6"/>
        <distal x="473.771" y="86.2583" z="0" diameter="1.6"/>
      </segment>
      <segment id="54" name = "Seg0_comp_55" parent="46" cable = "54">  <!-- Parent section: pyr3[0].comp[47] -->
        <proximal x="385.434" y="110.105" z="0" diameter="1.6"/>
        <distal x="485.434" y="110.105" z="0" diameter="1.6"/>
      </segment>
      <segment id="53" name = "Seg0_comp_54" parent="45" cable = "53">  <!-- Parent section: pyr3[0].comp[46] -->
        <proximal x="385.434" y="173.351" z="0" diameter="1.6"/>
        <distal x="485.434" y="173.351" z="0" diameter="1.6"/>
      </segment>
      <segment id="52" name = "Seg0_comp_53" parent="44" cable = "52">  <!-- Parent section: pyr3[0].comp[45] -->
        <proximal x="373.771" y="197.198" z="0" diameter="1.6"/>
        <distal x="473.771" y="197.198" z="0" diameter="1.6"/>
      </segment>
      <segment id="67" name = "Seg0_comp_68" parent="59" cable = "67">  <!-- Parent section: pyr3[0].comp[60] -->
        <proximal x="472.907" y="-225.781" z="0" diameter="1.6"/>
        <distal x="543.618" y="-296.491" z="0" diameter="1.6"/>
      </segment>
      <segment id="66" name = "Seg0_comp_67" parent="58" cable = "66">  <!-- Parent section: pyr3[0].comp[59] -->
        <proximal x="484.57" y="-201.933" z="0" diameter="1.6"/>
        <distal x="555.281" y="-272.644" z="0" diameter="1.6"/>
      </segment>
      <segment id="65" name = "Seg0_comp_66" parent="57" cable = "65">  <!-- Parent section: pyr3[0].comp[58] -->
        <proximal x="484.57" y="-138.688" z="0" diameter="1.6"/>
        <distal x="555.281" y="-67.9771" z="0" diameter="1.6"/>
      </segment>
      <segment id="64" name = "Seg0_comp_65" parent="56" cable = "64">  <!-- Parent section: pyr3[0].comp[57] -->
        <proximal x="472.907" y="-114.841" z="0" diameter="1.6"/>
        <distal x="543.618" y="-44.1299" z="0" diameter="1.6"/>
      </segment>
      <segment id="63" name = "Seg0_comp_64" parent="55" cable = "63">  <!-- Parent section: pyr3[0].comp[56] -->
        <proximal x="473.771" y="86.2583" z="0" diameter="1.6"/>
        <distal x="544.481" y="15.5476" z="0" diameter="1.6"/>
      </segment>
      <segment id="62" name = "Seg0_comp_63" parent="54" cable = "62">  <!-- Parent section: pyr3[0].comp[55] -->
        <proximal x="485.434" y="110.105" z="0" diameter="1.6"/>
        <distal x="556.145" y="39.3948" z="0" diameter="1.6"/>
      </segment>
      <segment id="61" name = "Seg0_comp_62" parent="53" cable = "61">  <!-- Parent section: pyr3[0].comp[54] -->
        <proximal x="485.434" y="173.351" z="0" diameter="1.6"/>
        <distal x="556.145" y="244.062" z="0" diameter="1.6"/>
      </segment>
      <segment id="60" name = "Seg0_comp_61" parent="52" cable = "60">  <!-- Parent section: pyr3[0].comp[53] -->
        <proximal x="473.771" y="197.198" z="0" diameter="1.6"/>
        <distal x="544.481" y="267.909" z="0" diameter="1.6"/>
      </segment>
    </segments>
    <cables  xmlns="http://morphml.org/morphml/schema"> <!-- Changing namespace from neuroml to morphml-->
      <cable id = "0" name = "comp_1" fractAlongParent = "0"/>
      <cable id = "78" name = "aux69" fractAlongParent = "0.5"/>
      <cable id = "87" name = "aux2to9_7" fractAlongParent = "0.5"/>
      <cable id = "86" name = "aux2to9_6" fractAlongParent = "0.5"/>
      <cable id = "85" name = "aux2to9_5" fractAlongParent = "0.5"/>
      <cable id = "84" name = "aux2to9_4" fractAlongParent = "0.5"/>
      <cable id = "83" name = "aux2to9_3" fractAlongParent = "0.5"/>
      <cable id = "82" name = "aux2to9_2" fractAlongParent = "0.5"/>
      <cable id = "81" name = "aux2to9_1" fractAlongParent = "0.5"/>
      <cable id = "80" name = "aux2to9_0" fractAlongParent = "0.5"/>
      <cable id = "79" name = "aux38" fractAlongParent = "0.5"/>
      <cable id = "68" name = "comp_69"/>
      <cable id = "8" name = "comp_9"/>
      <cable id = "7" name = "comp_8"/>
      <cable id = "6" name = "comp_7"/>
      <cable id = "5" name = "comp_6"/>
      <cable id = "4" name = "comp_5"/>
      <cable id = "3" name = "comp_4"/>
      <cable id = "2" name = "comp_3"/>
      <cable id = "1" name = "comp_2"/>
      <cable id = "37" name = "comp_38"/>
      <cable id = "69" name = "comp_70"/>
      <cable id = "20" name = "comp_21"/>
      <cable id = "19" name = "comp_20"/>
      <cable id = "18" name = "comp_19"/>
      <cable id = "17" name = "comp_18"/>
      <cable id = "16" name = "comp_17"/>
      <cable id = "15" name = "comp_16"/>
      <cable id = "14" name = "comp_15"/>
      <cable id = "13" name = "comp_14"/>
      <cable id = "77" name = "aux10to13_3" fractAlongParent = "0.5"/>
      <cable id = "76" name = "aux10to13_2" fractAlongParent = "0.5"/>
      <cable id = "75" name = "aux10to13_1" fractAlongParent = "0.5"/>
      <cable id = "74" name = "aux10to13_0" fractAlongParent = "0.5"/>
      <cable id = "38" name = "comp_39"/>
      <cable id = "72" name = "comp_73"/>
      <cable id = "70" name = "comp_71"/>
      <cable id = "32" name = "comp_33"/>
      <cable id = "31" name = "comp_32"/>
      <cable id = "30" name = "comp_31"/>
      <cable id = "29" name = "comp_30"/>
      <cable id = "28" name = "comp_29"/>
      <cable id = "27" name = "comp_28"/>
      <cable id = "26" name = "comp_27"/>
      <cable id = "25" name = "comp_26"/>
      <cable id = "12" name = "comp_13"/>
      <cable id = "11" name = "comp_12"/>
      <cable id = "10" name = "comp_11"/>
      <cable id = "9" name = "comp_10"/>
      <cable id = "39" name = "comp_40"/>
      <cable id = "73" name = "comp_74"/>
      <cable id = "71" name = "comp_72"/>
      <cable id = "24" name = "comp_25"/>
      <cable id = "23" name = "comp_24"/>
      <cable id = "22" name = "comp_23"/>
      <cable id = "21" name = "comp_22"/>
      <cable id = "41" name = "comp_42"/>
      <cable id = "40" name = "comp_41"/>
      <cable id = "36" name = "comp_37"/>
      <cable id = "35" name = "comp_36"/>
      <cable id = "34" name = "comp_35"/>
      <cable id = "33" name = "comp_34"/>
      <cable id = "43" name = "comp_44"/>
      <cable id = "42" name = "comp_43"/>
      <cable id = "51" name = "comp_52"/>
      <cable id = "50" name = "comp_51"/>
      <cable id = "49" name = "comp_50"/>
      <cable id = "48" name = "comp_49"/>
      <cable id = "47" name = "comp_48"/>
      <cable id = "46" name = "comp_47"/>
      <cable id = "45" name = "comp_46"/>
      <cable id = "44" name = "comp_45"/>
      <cable id = "59" name = "comp_60"/>
      <cable id = "58" name = "comp_59"/>
      <cable id = "57" name = "comp_58"/>
      <cable id = "56" name = "comp_57"/>
      <cable id = "55" name = "comp_56"/>
      <cable id = "54" name = "comp_55"/>
      <cable id = "53" name = "comp_54"/>
      <cable id = "52" name = "comp_53"/>
      <cable id = "67" name = "comp_68"/>
      <cable id = "66" name = "comp_67"/>
      <cable id = "65" name = "comp_66"/>
      <cable id = "64" name = "comp_65"/>
      <cable id = "63" name = "comp_64"/>
      <cable id = "62" name = "comp_63"/>
      <cable id = "61" name = "comp_62"/>
      <cable id = "60" name = "comp_61"/>
      <cablegroup name="all"> <!-- Replacing subset name ModelViewParmSubset_0 with all, as it contains all sections -->
        <cable id = "0"/>
        <cable id = "78"/>
        <cable id = "87"/>
        <cable id = "86"/>
        <cable id = "85"/>
        <cable id = "84"/>
        <cable id = "83"/>
        <cable id = "82"/>
        <cable id = "81"/>
        <cable id = "80"/>
        <cable id = "79"/>
        <cable id = "68"/>
        <cable id = "8"/>
        <cable id = "7"/>
        <cable id = "6"/>
        <cable id = "5"/>
        <cable id = "4"/>
        <cable id = "3"/>
        <cable id = "2"/>
        <cable id = "1"/>
        <cable id = "37"/>
        <cable id = "69"/>
        <cable id = "20"/>
        <cable id = "19"/>
        <cable id = "18"/>
        <cable id = "17"/>
        <cable id = "16"/>
        <cable id = "15"/>
        <cable id = "14"/>
        <cable id = "13"/>
        <cable id = "77"/>
        <cable id = "76"/>
        <cable id = "75"/>
        <cable id = "74"/>
        <cable id = "38"/>
        <cable id = "72"/>
        <cable id = "70"/>
        <cable id = "32"/>
        <cable id = "31"/>
        <cable id = "30"/>
        <cable id = "29"/>
        <cable id = "28"/>
        <cable id = "27"/>
        <cable id = "26"/>
        <cable id = "25"/>
        <cable id = "12"/>
        <cable id = "11"/>
        <cable id = "10"/>
        <cable id = "9"/>
        <cable id = "39"/>
        <cable id = "73"/>
        <cable id = "71"/>
        <cable id = "24"/>
        <cable id = "23"/>
        <cable id = "22"/>
        <cable id = "21"/>
        <cable id = "41"/>
        <cable id = "40"/>
        <cable id = "36"/>
        <cable id = "35"/>
        <cable id = "34"/>
        <cable id = "33"/>
        <cable id = "43"/>
        <cable id = "42"/>
        <cable id = "51"/>
        <cable id = "50"/>
        <cable id = "49"/>
        <cable id = "48"/>
        <cable id = "47"/>
        <cable id = "46"/>
        <cable id = "45"/>
        <cable id = "44"/>
        <cable id = "59"/>
        <cable id = "58"/>
        <cable id = "57"/>
        <cable id = "56"/>
        <cable id = "55"/>
        <cable id = "54"/>
        <cable id = "53"/>
        <cable id = "52"/>
        <cable id = "67"/>
        <cable id = "66"/>
        <cable id = "65"/>
        <cable id = "64"/>
        <cable id = "63"/>
        <cable id = "62"/>
        <cable id = "61"/>
        <cable id = "60"/>
      </cablegroup>
      <cablegroup name="ModelViewParmSubset_1">
        <cable id = "0"/>
        <cable id = "68"/>
        <cable id = "8"/>
        <cable id = "7"/>
        <cable id = "6"/>
        <cable id = "5"/>
        <cable id = "4"/>
        <cable id = "3"/>
        <cable id = "2"/>
        <cable id = "1"/>
        <cable id = "37"/>
        <cable id = "69"/>
        <cable id = "20"/>
        <cable id = "19"/>
        <cable id = "18"/>
        <cable id = "17"/>
        <cable id = "16"/>
        <cable id = "15"/>
        <cable id = "14"/>
        <cable id = "13"/>
        <cable id = "38"/>
        <cable id = "72"/>
        <cable id = "70"/>
        <cable id = "32"/>
        <cable id = "31"/>
        <cable id = "30"/>
        <cable id = "29"/>
        <cable id = "28"/>
        <cable id = "27"/>
        <cable id = "26"/>
        <cable id = "25"/>
        <cable id = "12"/>
        <cable id = "11"/>
        <cable id = "10"/>
        <cable id = "9"/>
        <cable id = "39"/>
        <cable id = "73"/>
        <cable id = "71"/>
        <cable id = "24"/>
        <cable id = "23"/>
        <cable id = "22"/>
        <cable id = "21"/>
        <cable id = "41"/>
        <cable id = "40"/>
        <cable id = "36"/>
        <cable id = "35"/>
        <cable id = "34"/>
        <cable id = "33"/>
        <cable id = "43"/>
        <cable id = "42"/>
        <cable id = "51"/>
        <cable id = "50"/>
        <cable id = "49"/>
        <cable id = "48"/>
        <cable id = "47"/>
        <cable id = "46"/>
        <cable id = "45"/>
        <cable id = "44"/>
        <cable id = "59"/>
        <cable id = "58"/>
        <cable id = "57"/>
        <cable id = "56"/>
        <cable id = "55"/>
        <cable id = "54"/>
        <cable id = "53"/>
        <cable id = "52"/>
        <cable id = "67"/>
        <cable id = "66"/>
        <cable id = "65"/>
        <cable id = "64"/>
        <cable id = "63"/>
        <cable id = "62"/>
        <cable id = "61"/>
        <cable id = "60"/>
      </cablegroup>
      <cablegroup name="ModelViewParmSubset_2">
        <cable id = "0"/>
        <cable id = "8"/>
        <cable id = "7"/>
        <cable id = "6"/>
        <cable id = "5"/>
        <cable id = "4"/>
        <cable id = "3"/>
        <cable id = "2"/>
        <cable id = "1"/>
        <cable id = "37"/>
        <cable id = "20"/>
        <cable id = "19"/>
        <cable id = "18"/>
        <cable id = "17"/>
        <cable id = "16"/>
        <cable id = "15"/>
        <cable id = "14"/>
        <cable id = "13"/>
        <cable id = "38"/>
        <cable id = "32"/>
        <cable id = "31"/>
        <cable id = "30"/>
        <cable id = "29"/>
        <cable id = "28"/>
        <cable id = "27"/>
        <cable id = "26"/>
        <cable id = "25"/>
        <cable id = "12"/>
        <cable id = "11"/>
        <cable id = "10"/>
        <cable id = "9"/>
        <cable id = "39"/>
        <cable id = "24"/>
        <cable id = "23"/>
        <cable id = "22"/>
        <cable id = "21"/>
        <cable id = "41"/>
        <cable id = "40"/>
        <cable id = "36"/>
        <cable id = "35"/>
        <cable id = "34"/>
        <cable id = "33"/>
        <cable id = "43"/>
        <cable id = "42"/>
        <cable id = "51"/>
        <cable id = "50"/>
        <cable id = "49"/>
        <cable id = "48"/>
        <cable id = "47"/>
        <cable id = "46"/>
        <cable id = "45"/>
        <cable id = "44"/>
        <cable id = "59"/>
        <cable id = "58"/>
        <cable id = "57"/>
        <cable id = "56"/>
        <cable id = "55"/>
        <cable id = "54"/>
        <cable id = "53"/>
        <cable id = "52"/>
        <cable id = "67"/>
        <cable id = "66"/>
        <cable id = "65"/>
        <cable id = "64"/>
        <cable id = "63"/>
        <cable id = "62"/>
        <cable id = "61"/>
        <cable id = "60"/>
      </cablegroup>
      <cablegroup name="ModelViewParmSubset_3">
        <cable id = "68"/>
        <cable id = "69"/>
        <cable id = "72"/>
        <cable id = "70"/>
        <cable id = "73"/>
        <cable id = "71"/>
      </cablegroup>
      <cablegroup name="ModelViewParmSubset_4">
        <cable id = "8"/>
        <cable id = "7"/>
        <cable id = "6"/>
        <cable id = "5"/>
        <cable id = "4"/>
        <cable id = "3"/>
        <cable id = "2"/>
        <cable id = "1"/>
        <cable id = "37"/>
        <cable id = "20"/>
        <cable id = "19"/>
        <cable id = "18"/>
        <cable id = "17"/>
        <cable id = "16"/>
        <cable id = "15"/>
        <cable id = "14"/>
        <cable id = "13"/>
        <cable id = "38"/>
        <cable id = "32"/>
        <cable id = "31"/>
        <cable id = "30"/>
        <cable id = "29"/>
        <cable id = "28"/>
        <cable id = "27"/>
        <cable id = "26"/>
        <cable id = "25"/>
        <cable id = "12"/>
        <cable id = "11"/>
        <cable id = "10"/>
        <cable id = "9"/>
        <cable id = "39"/>
        <cable id = "24"/>
        <cable id = "23"/>
        <cable id = "22"/>
        <cable id = "21"/>
        <cable id = "41"/>
        <cable id = "40"/>
        <cable id = "36"/>
        <cable id = "35"/>
        <cable id = "34"/>
        <cable id = "33"/>
        <cable id = "43"/>
        <cable id = "42"/>
        <cable id = "51"/>
        <cable id = "50"/>
        <cable id = "49"/>
        <cable id = "48"/>
        <cable id = "47"/>
        <cable id = "46"/>
        <cable id = "45"/>
        <cable id = "44"/>
        <cable id = "59"/>
        <cable id = "58"/>
        <cable id = "57"/>
        <cable id = "56"/>
        <cable id = "55"/>
        <cable id = "54"/>
        <cable id = "53"/>
        <cable id = "52"/>
        <cable id = "67"/>
        <cable id = "66"/>
        <cable id = "65"/>
        <cable id = "64"/>
        <cable id = "63"/>
        <cable id = "62"/>
        <cable id = "61"/>
        <cable id = "60"/>
      </cablegroup>
      <cablegroup name="ModelViewParmSubset_5">
        <cable id = "0"/>
        <cable id = "78"/>
        <cable id = "87"/>
        <cable id = "86"/>
        <cable id = "85"/>
        <cable id = "84"/>
        <cable id = "83"/>
        <cable id = "82"/>
        <cable id = "81"/>
        <cable id = "80"/>
        <cable id = "79"/>
        <cable id = "77"/>
        <cable id = "76"/>
        <cable id = "75"/>
        <cable id = "74"/>
      </cablegroup>
      <cablegroup name="ModelViewParmSubset_6">
        <cable id = "78"/>
        <cable id = "87"/>
        <cable id = "86"/>
        <cable id = "85"/>
        <cable id = "84"/>
        <cable id = "83"/>
        <cable id = "82"/>
        <cable id = "81"/>
        <cable id = "80"/>
        <cable id = "79"/>
        <cable id = "77"/>
        <cable id = "76"/>
        <cable id = "75"/>
        <cable id = "74"/>
      </cablegroup>
      <cablegroup name="ModelViewParmSubset_7">
        <cable id = "0"/>
        <cable id = "8"/>
        <cable id = "7"/>
        <cable id = "6"/>
        <cable id = "5"/>
        <cable id = "4"/>
        <cable id = "3"/>
        <cable id = "2"/>
        <cable id = "1"/>
        <cable id = "37"/>
        <cable id = "20"/>
        <cable id = "19"/>
        <cable id = "18"/>
        <cable id = "17"/>
        <cable id = "16"/>
        <cable id = "15"/>
        <cable id = "14"/>
        <cable id = "13"/>
        <cable id = "38"/>
        <cable id = "32"/>
        <cable id = "31"/>
        <cable id = "30"/>
        <cable id = "29"/>
        <cable id = "28"/>
        <cable id = "27"/>
        <cable id = "26"/>
        <cable id = "25"/>
        <cable id = "12"/>
        <cable id = "11"/>
        <cable id = "10"/>
        <cable id = "9"/>
        <cable id = "39"/>
        <cable id = "24"/>
        <cable id = "23"/>
        <cable id = "22"/>
        <cable id = "21"/>
        <cable id = "41"/>
        <cable id = "40"/>
        <cable id = "36"/>
        <cable id = "35"/>
        <cable id = "34"/>
        <cable id = "33"/>
        <cable id = "43"/>
        <cable id = "51"/>
        <cable id = "50"/>
        <cable id = "49"/>
        <cable id = "48"/>
        <cable id = "47"/>
        <cable id = "46"/>
        <cable id = "45"/>
        <cable id = "44"/>
        <cable id = "59"/>
        <cable id = "58"/>
        <cable id = "57"/>
        <cable id = "56"/>
        <cable id = "55"/>
        <cable id = "54"/>
        <cable id = "53"/>
        <cable id = "52"/>
        <cable id = "67"/>
        <cable id = "66"/>
        <cable id = "65"/>
        <cable id = "64"/>
        <cable id = "63"/>
        <cable id = "62"/>
        <cable id = "61"/>
        <cable id = "60"/>
      </cablegroup>
      <cablegroup name="ModelViewParmSubset_8">
        <cable id = "0"/>
        <cable id = "8"/>
        <cable id = "7"/>
        <cable id = "6"/>
        <cable id = "5"/>
        <cable id = "4"/>
        <cable id = "3"/>
        <cable id = "2"/>
        <cable id = "1"/>
        <cable id = "37"/>
        <cable id = "20"/>
        <cable id = "19"/>
        <cable id = "18"/>
        <cable id = "17"/>
        <cable id = "16"/>
        <cable id = "15"/>
        <cable id = "14"/>
        <cable id = "13"/>
        <cable id = "38"/>
        <cable id = "32"/>
        <cable id = "31"/>
        <cable id = "30"/>
        <cable id = "29"/>
        <cable id = "28"/>
        <cable id = "27"/>
        <cable id = "26"/>
        <cable id = "25"/>
        <cable id = "12"/>
        <cable id = "11"/>
        <cable id = "10"/>
        <cable id = "9"/>
        <cable id = "39"/>
        <cable id = "24"/>
        <cable id = "23"/>
        <cable id = "22"/>
        <cable id = "21"/>
        <cable id = "41"/>
        <cable id = "40"/>
        <cable id = "36"/>
        <cable id = "35"/>
        <cable id = "34"/>
        <cable id = "33"/>
        <cable id = "43"/>
        <cable id = "42"/>
      </cablegroup>
      <cablegroup name="ModelViewParmSubset_9">
        <cable id = "51"/>
        <cable id = "50"/>
        <cable id = "49"/>
        <cable id = "48"/>
        <cable id = "47"/>
        <cable id = "46"/>
        <cable id = "45"/>
        <cable id = "44"/>
        <cable id = "59"/>
        <cable id = "58"/>
        <cable id = "57"/>
        <cable id = "56"/>
        <cable id = "55"/>
        <cable id = "54"/>
        <cable id = "53"/>
        <cable id = "52"/>
        <cable id = "67"/>
        <cable id = "66"/>
        <cable id = "65"/>
        <cable id = "64"/>
        <cable id = "63"/>
        <cable id = "62"/>
        <cable id = "61"/>
        <cable id = "60"/>
      </cablegroup>
      <cablegroup name="ModelViewParmSubset_10">
        <cable id = "68"/>
        <cable id = "8"/>
        <cable id = "7"/>
        <cable id = "6"/>
        <cable id = "5"/>
        <cable id = "4"/>
        <cable id = "3"/>
        <cable id = "2"/>
        <cable id = "1"/>
        <cable id = "69"/>
        <cable id = "20"/>
        <cable id = "19"/>
        <cable id = "18"/>
        <cable id = "17"/>
        <cable id = "16"/>
        <cable id = "15"/>
        <cable id = "14"/>
        <cable id = "13"/>
        <cable id = "38"/>
        <cable id = "72"/>
        <cable id = "70"/>
        <cable id = "32"/>
        <cable id = "31"/>
        <cable id = "30"/>
        <cable id = "29"/>
        <cable id = "28"/>
        <cable id = "27"/>
        <cable id = "26"/>
        <cable id = "25"/>
        <cable id = "12"/>
        <cable id = "11"/>
        <cable id = "10"/>
        <cable id = "9"/>
        <cable id = "39"/>
        <cable id = "73"/>
        <cable id = "71"/>
        <cable id = "24"/>
        <cable id = "23"/>
        <cable id = "22"/>
        <cable id = "21"/>
        <cable id = "41"/>
        <cable id = "40"/>
        <cable id = "36"/>
        <cable id = "35"/>
        <cable id = "34"/>
        <cable id = "33"/>
        <cable id = "43"/>
        <cable id = "42"/>
        <cable id = "51"/>
        <cable id = "50"/>
        <cable id = "49"/>
        <cable id = "48"/>
        <cable id = "47"/>
        <cable id = "46"/>
        <cable id = "45"/>
        <cable id = "44"/>
        <cable id = "59"/>
        <cable id = "58"/>
        <cable id = "57"/>
        <cable id = "56"/>
        <cable id = "55"/>
        <cable id = "54"/>
        <cable id = "53"/>
        <cable id = "52"/>
        <cable id = "67"/>
        <cable id = "66"/>
        <cable id = "65"/>
        <cable id = "64"/>
        <cable id = "63"/>
        <cable id = "62"/>
        <cable id = "61"/>
        <cable id = "60"/>
      </cablegroup>
      <cablegroup name="ModelViewParmSubset_11">
        <cable id = "0"/>
        <cable id = "37"/>
      </cablegroup>
      <cablegroup name="ModelViewParmSubset_12">
        <cable id = "20"/>
        <cable id = "19"/>
        <cable id = "18"/>
        <cable id = "17"/>
        <cable id = "16"/>
        <cable id = "15"/>
        <cable id = "14"/>
        <cable id = "13"/>
        <cable id = "32"/>
        <cable id = "31"/>
        <cable id = "30"/>
        <cable id = "29"/>
        <cable id = "28"/>
        <cable id = "27"/>
        <cable id = "26"/>
        <cable id = "25"/>
        <cable id = "39"/>
        <cable id = "24"/>
        <cable id = "23"/>
        <cable id = "22"/>
        <cable id = "21"/>
        <cable id = "41"/>
        <cable id = "40"/>
        <cable id = "36"/>
        <cable id = "35"/>
        <cable id = "34"/>
        <cable id = "33"/>
        <cable id = "43"/>
        <cable id = "42"/>
        <cable id = "51"/>
        <cable id = "50"/>
        <cable id = "49"/>
        <cable id = "48"/>
        <cable id = "47"/>
        <cable id = "46"/>
        <cable id = "45"/>
        <cable id = "44"/>
        <cable id = "59"/>
        <cable id = "58"/>
        <cable id = "57"/>
        <cable id = "56"/>
        <cable id = "55"/>
        <cable id = "54"/>
        <cable id = "53"/>
        <cable id = "52"/>
        <cable id = "67"/>
        <cable id = "66"/>
        <cable id = "65"/>
        <cable id = "64"/>
        <cable id = "63"/>
        <cable id = "62"/>
        <cable id = "61"/>
        <cable id = "60"/>
      </cablegroup>
      <cablegroup name="ModelViewParmSubset_13">
        <cable id = "0"/>
        <cable id = "8"/>
        <cable id = "7"/>
        <cable id = "6"/>
        <cable id = "5"/>
        <cable id = "4"/>
        <cable id = "3"/>
        <cable id = "2"/>
        <cable id = "1"/>
        <cable id = "37"/>
        <cable id = "38"/>
        <cable id = "12"/>
        <cable id = "11"/>
        <cable id = "10"/>
        <cable id = "9"/>
      </cablegroup>
      <cablegroup name="ModelViewParmSubset_14">
        <cable id = "8"/>
        <cable id = "7"/>
        <cable id = "6"/>
        <cable id = "5"/>
        <cable id = "4"/>
        <cable id = "3"/>
        <cable id = "2"/>
        <cable id = "1"/>
        <cable id = "38"/>
        <cable id = "12"/>
        <cable id = "11"/>
        <cable id = "10"/>
        <cable id = "9"/>
      </cablegroup>
      <cablegroup name="OneSecGrp_SectionRef_64"> <!-- Creating a group containing a single section... -->
        <cable id = "42"/>
      </cablegroup>
      <cablegroup name="OneSecGrp_SectionRef_1"> <!-- Creating a group containing a single section... -->
        <cable id = "0"/>
      </cablegroup>
      <cablegroup name="OneSecGrp_SectionRef_21"> <!-- Creating a group containing a single section... -->
        <cable id = "37"/>
      </cablegroup>
      <cablegroup name="OneSecGrp_SectionRef_1"> <!-- Creating a group containing a single section... -->
        <cable id = "0"/>
      </cablegroup>
    </cables>
    <biophysics  units = "Physiological Units"> <!-- Note: values of cond dens are different in NEURON and phy units-->
      <bio:mechanism name="pas" type="Channel Mechanism" passiveConductance="true">
        <bio:parameter name="gmax" value="0.02">
          <bio:group>ModelViewParmSubset_7</bio:group>
        </bio:parameter>
        <bio:parameter name="gmax" value="1">
          <bio:group>ModelViewParmSubset_3</bio:group>
        </bio:parameter>
        <bio:parameter name="gmax" value="2.00944">
          <bio:group>OneSecGrp_SectionRef_64</bio:group>
        </bio:parameter>
        <bio:parameter name="e" value="-70">
          <bio:group>ModelViewParmSubset_1</bio:group>
        </bio:parameter>
      </bio:mechanism>
      <bio:mechanism name="ar" type="Channel Mechanism">
        <bio:parameter name="gmax" value="0.25">
          <bio:group>ModelViewParmSubset_2</bio:group>
        </bio:parameter>
      </bio:mechanism>
      <bio:mechanism name="cad" type="Channel Mechanism">
        <bio:parameter name="phi" value="26000">
          <bio:group>ModelViewParmSubset_2</bio:group>
        </bio:parameter>
        <bio:parameter name="beta" value="0.01">
          <bio:group>OneSecGrp_SectionRef_1</bio:group>
        </bio:parameter>
        <bio:parameter name="beta" value="0.05">
          <bio:group>ModelViewParmSubset_4</bio:group>
        </bio:parameter>
      </bio:mechanism>
      <bio:mechanism name="cal" type="Channel Mechanism">
        <bio:parameter name="gmax" value="0.5">
          <bio:group>ModelViewParmSubset_8</bio:group>
        </bio:parameter>
        <bio:parameter name="gmax" value="3">
          <bio:group>ModelViewParmSubset_9</bio:group>
        </bio:parameter>
      </bio:mechanism>
      <bio:mechanism name="cat" type="Channel Mechanism">
        <bio:parameter name="gmax" value="0.1">
          <bio:group>ModelViewParmSubset_2</bio:group>
        </bio:parameter>
      </bio:mechanism>
      <bio:mechanism name="k2" type="Channel Mechanism">
        <bio:parameter name="gmax" value="0.1">
          <bio:group>ModelViewParmSubset_1</bio:group>
        </bio:parameter>
      </bio:mechanism>
      <bio:mechanism name="ka" type="Channel Mechanism">
        <bio:parameter name="gmax" value="2">
          <bio:group>ModelViewParmSubset_10</bio:group>
        </bio:parameter>
        <bio:parameter name="gmax" value="30">
          <bio:group>ModelViewParmSubset_11</bio:group>
        </bio:parameter>
      </bio:mechanism>
      <bio:mechanism name="kahp" type="Channel Mechanism">
        <bio:parameter name="gmax" value="0.1">
          <bio:group>ModelViewParmSubset_2</bio:group>
        </bio:parameter>
      </bio:mechanism>
      <bio:mechanism name="kc" type="Channel Mechanism">
        <bio:parameter name="gmax" value="0">
          <bio:group>ModelViewParmSubset_12</bio:group>
        </bio:parameter>
        <bio:parameter name="gmax" value="12">
          <bio:group>ModelViewParmSubset_13</bio:group>
        </bio:parameter>
      </bio:mechanism>
      <bio:mechanism name="kdr" type="Channel Mechanism">
        <bio:parameter name="gmax" value="0">
          <bio:group>ModelViewParmSubset_12</bio:group>
        </bio:parameter>
        <bio:parameter name="gmax" value="93.75">
          <bio:group>ModelViewParmSubset_14</bio:group>
        </bio:parameter>
        <bio:parameter name="gmax" value="125">
          <bio:group>ModelViewParmSubset_11</bio:group>
        </bio:parameter>
        <bio:parameter name="gmax" value="400">
          <bio:group>ModelViewParmSubset_3</bio:group>
        </bio:parameter>
      </bio:mechanism>
      <bio:mechanism name="km" type="Channel Mechanism">
        <bio:parameter name="gmax" value="7.5">
          <bio:group>ModelViewParmSubset_2</bio:group>
        </bio:parameter>
      </bio:mechanism>
      <bio:mechanism name="naf" type="Channel Mechanism">
        <bio:parameter name="gmax" value="6.25">
          <bio:group>ModelViewParmSubset_12</bio:group>
        </bio:parameter>
        <bio:parameter name="gmax" value="93.75">
          <bio:group>ModelViewParmSubset_14</bio:group>
        </bio:parameter>
        <bio:parameter name="gmax" value="125">
          <bio:group>OneSecGrp_SectionRef_21</bio:group>
        </bio:parameter>
        <bio:parameter name="gmax" value="187.5">
          <bio:group>OneSecGrp_SectionRef_1</bio:group>
        </bio:parameter>
        <bio:parameter name="gmax" value="400">
          <bio:group>ModelViewParmSubset_3</bio:group>
        </bio:parameter>
      </bio:mechanism>
      <bio:mechanism name="nap" type="Channel Mechanism">
        <bio:parameter name="gmax" value="0">
          <bio:group>ModelViewParmSubset_2</bio:group>
        </bio:parameter>
      </bio:mechanism>
      <bio:specificCapacitance>
        <bio:parameter value="0">
          <bio:group>ModelViewParmSubset_6</bio:group>
        </bio:parameter>
        <bio:parameter value="0.9">
          <bio:group>ModelViewParmSubset_1</bio:group>
        </bio:parameter>
      </bio:specificCapacitance>
      <bio:specificAxialResistance>
        <bio:parameter value="0.1">
          <bio:group>ModelViewParmSubset_3</bio:group>
        </bio:parameter>
        <bio:parameter value="0.125">
          <bio:group>ModelViewParmSubset_4</bio:group>
        </bio:parameter>
        <bio:parameter value="0.25">
          <bio:group>ModelViewParmSubset_5</bio:group>
        </bio:parameter>
      </bio:specificAxialResistance>
    </biophysics>
  </cell>
</cells>
</neuroml>
