<?xml version="1.0" encoding="UTF-8"?>
<neuroml xmlns="http://morphml.org/neuroml/schema"
    xmlns:mml="http://morphml.org/morphml/schema"
    xmlns:meta="http://morphml.org/metadata/schema"
    xmlns:bio="http://morphml.org/biophysics/schema"
    xmlns:cml="http://morphml.org/channelml/schema"
    xmlns:xsi="http://www.w3.org/2001/XMLSchema-instance"
    xsi:schemaLocation="http://morphml.org/neuroml/schema NeuroML_Level2_v1.6.xsd"
    name = "NeuroML Level 2 file exported from NEURON"
    lengthUnits="micron">

<meta:notes>NeuroML Level 2 file generated by NEURON 6.1 ModelViewer
Authors: Michael Hines, Sushil Kambampati and Padraig Gleeson,
Yale University and UCL</meta:notes>

<cells>
  <cell name="nRT_0">
    <meta:notes>Cell: nRT_0 exported from NEURON ModelView</meta:notes>
    <segments  xmlns="http://morphml.org/morphml/schema"> <!-- Changing namespace from neuroml to morphml-->
      <segment id="0" name = "Seg0_comp_1" cable = "0">
        <proximal x="0" y="0" z="0" diameter="18.68"/>
        <distal x="15" y="0" z="0" diameter="18.68"/>
      </segment>
      <segment id="1" name = "Seg1_comp_1" parent="0" cable = "0">
        <distal x="30" y="0" z="0" diameter="18.68"/>
      </segment>
      <segment id="106" name = "Seg0_comp_54" parent="0" cable = "53">  <!-- Connected at 0 on parent section: nRT[0].comp[1]  -->
        <proximal x="0" y="0" z="0" diameter="1.6"/>
        <distal x="-25" y="2.18557e-06" z="0" diameter="1.6"/>
      </segment>
      <segment id="107" name = "Seg1_comp_54" parent="106" cable = "53">
        <distal x="-50" y="4.37114e-06" z="0" diameter="1.6"/>
      </segment>
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    </segments>
    <cables  xmlns="http://morphml.org/morphml/schema"> <!-- Changing namespace from neuroml to morphml-->
      <cable id = "0" name = "comp_1" fractAlongParent = "0"/>
      <cable id = "53" name = "comp_54" fractAlongParent = "0"/>
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      <cablegroup name="all"> <!-- Replacing subset name ModelViewParmSubset_0 with all, as it contains all sections -->
        <cable id = "0"/>
        <cable id = "53"/>
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      </cablegroup>
      <cablegroup name="ModelViewParmSubset_1">
        <cable id = "0"/>
        <cable id = "40"/>
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      </cablegroup>
      <cablegroup name="ModelViewParmSubset_2">
        <cable id = "53"/>
        <cable id = "54"/>
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      </cablegroup>
      <cablegroup name="ModelViewParmSubset_3">
        <cable id = "40"/>
        <cable id = "27"/>
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      </cablegroup>
      <cablegroup name="ModelViewParmSubset_4">
        <cable id = "0"/>
        <cable id = "40"/>
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      </cablegroup>
      <cablegroup name="ModelViewParmSubset_5">
        <cable id = "45"/>
        <cable id = "44"/>
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      </cablegroup>
      <cablegroup name="ModelViewParmSubset_6">
        <cable id = "53"/>
        <cable id = "54"/>
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      </cablegroup>
      <cablegroup name="OneSecGrp_SectionRef_1"> <!-- Creating a group containing a single section... -->
        <cable id = "0"/>
      </cablegroup>
      <cablegroup name="OneSecGrp_SectionRef_1"> <!-- Creating a group containing a single section... -->
        <cable id = "0"/>
      </cablegroup>
    </cables>
    <biophysics  units = "Physiological Units"> <!-- Note: values of cond dens are different in NEURON and phy units-->
      <bio:mechanism name="pas" type="Channel Mechanism" passiveConductance="true">
        <bio:parameter name="gmax" value="0.05">
          <bio:group>ModelViewParmSubset_1</bio:group>
        </bio:parameter>
        <bio:parameter name="gmax" value="1">
          <bio:group>ModelViewParmSubset_2</bio:group>
        </bio:parameter>
        <bio:parameter name="e" value="-75">
          <bio:group>all</bio:group>
        </bio:parameter>
      </bio:mechanism>
      <bio:mechanism name="ar" type="Channel Mechanism">
        <bio:parameter name="gmax" value="0.025">
          <bio:group>ModelViewParmSubset_1</bio:group>
        </bio:parameter>
        <bio:parameter name="erev" value="-40">
          <bio:group>ModelViewParmSubset_1</bio:group>
        </bio:parameter>
        <bio:parameter name="m0" value="0">
          <bio:group>ModelViewParmSubset_1</bio:group>
        </bio:parameter>
      </bio:mechanism>
      <bio:mechanism name="cad" type="Channel Mechanism">
        <bio:parameter name="phi" value="10400">
          <bio:group>OneSecGrp_SectionRef_1</bio:group>
        </bio:parameter>
        <bio:parameter name="phi" value="260000">
          <bio:group>ModelViewParmSubset_3</bio:group>
        </bio:parameter>
        <bio:parameter name="beta" value="0.02">
          <bio:group>OneSecGrp_SectionRef_1</bio:group>
        </bio:parameter>
        <bio:parameter name="beta" value="0.05">
          <bio:group>ModelViewParmSubset_3</bio:group>
        </bio:parameter>
      </bio:mechanism>
      <bio:mechanism name="cal" type="Channel Mechanism">
        <bio:parameter name="gmax" value="0.5">
          <bio:group>ModelViewParmSubset_1</bio:group>
        </bio:parameter>
      </bio:mechanism>
      <bio:mechanism name="cat_a" type="Channel Mechanism">
        <bio:parameter name="gmax" value="0.05">
          <bio:group>ModelViewParmSubset_4</bio:group>
        </bio:parameter>
        <bio:parameter name="gmax" value="2">
          <bio:group>ModelViewParmSubset_5</bio:group>
        </bio:parameter>
      </bio:mechanism>
      <bio:mechanism name="k2" type="Channel Mechanism">
        <bio:parameter name="gmax" value="0.5">
          <bio:group>all</bio:group>
        </bio:parameter>
      </bio:mechanism>
      <bio:mechanism name="ka" type="Channel Mechanism">
        <bio:parameter name="gmax" value="1">
          <bio:group>ModelViewParmSubset_6</bio:group>
        </bio:parameter>
        <bio:parameter name="gmax" value="5">
          <bio:group>ModelViewParmSubset_4</bio:group>
        </bio:parameter>
      </bio:mechanism>
      <bio:mechanism name="kahp_slower" type="Channel Mechanism">
        <bio:parameter name="gmax" value="0.1">
          <bio:group>ModelViewParmSubset_1</bio:group>
        </bio:parameter>
      </bio:mechanism>
      <bio:mechanism name="kc" type="Channel Mechanism">
        <bio:parameter name="gmax" value="10">
          <bio:group>ModelViewParmSubset_1</bio:group>
        </bio:parameter>
      </bio:mechanism>
      <bio:mechanism name="kdr_fs" type="Channel Mechanism">
        <bio:parameter name="gmax" value="10">
          <bio:group>ModelViewParmSubset_5</bio:group>
        </bio:parameter>
        <bio:parameter name="gmax" value="60">
          <bio:group>ModelViewParmSubset_4</bio:group>
        </bio:parameter>
        <bio:parameter name="gmax" value="400">
          <bio:group>ModelViewParmSubset_2</bio:group>
        </bio:parameter>
      </bio:mechanism>
      <bio:mechanism name="km" type="Channel Mechanism">
        <bio:parameter name="gmax" value="0.5">
          <bio:group>ModelViewParmSubset_1</bio:group>
        </bio:parameter>
      </bio:mechanism>
      <bio:mechanism name="naf2" type="Channel Mechanism">
        <bio:parameter name="fastNa_shift" value="0">
          <bio:group>all</bio:group>
        </bio:parameter>
        <bio:parameter name="a" value="0">
          <bio:group>all</bio:group>
        </bio:parameter>
        <bio:parameter name="b" value="0">
          <bio:group>all</bio:group>
        </bio:parameter>
        <bio:parameter name="c" value="0">
          <bio:group>all</bio:group>
        </bio:parameter>
        <bio:parameter name="d" value="0">
          <bio:group>all</bio:group>
        </bio:parameter>
        <bio:parameter name="gmax" value="10">
          <bio:group>ModelViewParmSubset_5</bio:group>
        </bio:parameter>
        <bio:parameter name="gmax" value="60">
          <bio:group>ModelViewParmSubset_4</bio:group>
        </bio:parameter>
        <bio:parameter name="gmax" value="400">
          <bio:group>ModelViewParmSubset_2</bio:group>
        </bio:parameter>
      </bio:mechanism>
      <bio:mechanism name="napf" type="Channel Mechanism">
        <bio:parameter name="fastNa_shift" value="0">
          <bio:group>ModelViewParmSubset_1</bio:group>
        </bio:parameter>
        <bio:parameter name="a" value="0">
          <bio:group>ModelViewParmSubset_1</bio:group>
        </bio:parameter>
        <bio:parameter name="b" value="0">
          <bio:group>ModelViewParmSubset_1</bio:group>
        </bio:parameter>
        <bio:parameter name="c" value="0">
          <bio:group>ModelViewParmSubset_1</bio:group>
        </bio:parameter>
        <bio:parameter name="d" value="0">
          <bio:group>ModelViewParmSubset_1</bio:group>
        </bio:parameter>
        <bio:parameter name="gmax" value="0.1">
          <bio:group>ModelViewParmSubset_5</bio:group>
        </bio:parameter>
        <bio:parameter name="gmax" value="0.6">
          <bio:group>ModelViewParmSubset_4</bio:group>
        </bio:parameter>
      </bio:mechanism>
      <bio:specificCapacitance>
        <bio:parameter value="1">
          <bio:group>all</bio:group>
        </bio:parameter>
      </bio:specificCapacitance>
      <bio:specificAxialResistance>
        <bio:parameter value="0.1">
          <bio:group>ModelViewParmSubset_2</bio:group>
        </bio:parameter>
        <bio:parameter value="0.25">
          <bio:group>ModelViewParmSubset_1</bio:group>
        </bio:parameter>
      </bio:specificAxialResistance>
    </biophysics>
  </cell>
</cells>
</neuroml>
