<?xml version="1.0" encoding="UTF-8"?>
<neuroml xmlns="http://morphml.org/neuroml/schema"
    xmlns:mml="http://morphml.org/morphml/schema"
    xmlns:meta="http://morphml.org/metadata/schema"
    xmlns:bio="http://morphml.org/biophysics/schema"
    xmlns:cml="http://morphml.org/channelml/schema"
    xmlns:xsi="http://www.w3.org/2001/XMLSchema-instance"
    xsi:schemaLocation="http://morphml.org/neuroml/schema NeuroML_Level2_v1.6.xsd"
    name = "NeuroML Level 2 file exported from NEURON"
    lengthUnits="micron">

<meta:notes>NeuroML Level 2 file generated by NEURON 6.1 ModelViewer
Authors: Michael Hines, Sushil Kambampati and Padraig Gleeson,
Yale University and UCL</meta:notes>

<cells>
  <cell name="nontuftRS_0">
    <meta:notes>Cell: nontuftRS_0 exported from NEURON ModelView</meta:notes>
    <segments  xmlns="http://morphml.org/morphml/schema"> <!-- Changing namespace from neuroml to morphml-->
      <segment id="0" name = "Seg0_comp_1" cable = "0">
        <proximal x="0" y="0" z="0" diameter="16"/>
        <distal x="10" y="0" z="0" diameter="16"/>
      </segment>
      <segment id="1" name = "Seg1_comp_1" parent="0" cable = "0">
        <distal x="20" y="0" z="0" diameter="16"/>
      </segment>
      <segment id="88" name = "Seg0_comp_45" parent="0" cable = "44">  <!-- Connected at 0 on parent section: nontuftRS[0].comp[1]  -->
        <proximal x="0" y="0" z="0" diameter="1.8"/>
        <distal x="-12.5" y="1.09278e-06" z="0" diameter="1.8"/>
      </segment>
      <segment id="89" name = "Seg1_comp_45" parent="88" cable = "44">
        <distal x="-25" y="2.18557e-06" z="0" diameter="1.8"/>
      </segment>
      <segment id="68" name = "Seg0_comp_35" parent="1" cable = "34">  <!-- Parent section: nontuftRS[0].comp[1] -->
        <proximal x="20" y="0" z="0" diameter="3"/>
        <distal x="43.0265" y="-9.73546" z="0" diameter="3"/>
      </segment>
      <segment id="69" name = "Seg1_comp_35" parent="68" cable = "34">
        <distal x="66.053" y="-19.4709" z="0" diameter="3"/>
      </segment>
      <segment id="10" name = "Seg0_comp_6" parent="1" cable = "5">  <!-- Parent section: nontuftRS[0].comp[1] -->
        <proximal x="20" y="0" z="0" diameter="1.7"/>
        <distal x="49.1401" y="-7.13108" z="0" diameter="1.7"/>
      </segment>
      <segment id="11" name = "Seg1_comp_6" parent="10" cable = "5">
        <distal x="78.2803" y="-14.2622" z="0" diameter="1.7"/>
      </segment>
      <segment id="8" name = "Seg0_comp_5" parent="1" cable = "4">  <!-- Parent section: nontuftRS[0].comp[1] -->
        <proximal x="20" y="0" z="0" diameter="1.7"/>
        <distal x="49.9041" y="-2.39744" z="0" diameter="1.7"/>
      </segment>
      <segment id="9" name = "Seg1_comp_5" parent="8" cable = "4">
        <distal x="79.8081" y="-4.79488" z="0" diameter="1.7"/>
      </segment>
      <segment id="6" name = "Seg0_comp_4" parent="1" cable = "3">  <!-- Parent section: nontuftRS[0].comp[1] -->
        <proximal x="20" y="0" z="0" diameter="1.7"/>
        <distal x="49.9041" y="2.39744" z="0" diameter="1.7"/>
      </segment>
      <segment id="7" name = "Seg1_comp_4" parent="6" cable = "3">
        <distal x="79.8081" y="4.79488" z="0" diameter="1.7"/>
      </segment>
      <segment id="4" name = "Seg0_comp_3" parent="1" cable = "2">  <!-- Parent section: nontuftRS[0].comp[1] -->
        <proximal x="20" y="0" z="0" diameter="1.7"/>
        <distal x="49.1401" y="7.13108" z="0" diameter="1.7"/>
      </segment>
      <segment id="5" name = "Seg1_comp_3" parent="4" cable = "2">
        <distal x="78.2803" y="14.2622" z="0" diameter="1.7"/>
      </segment>
      <segment id="2" name = "Seg0_comp_2" parent="1" cable = "1">  <!-- Parent section: nontuftRS[0].comp[1] -->
        <proximal x="20" y="0" z="0" diameter="1.7"/>
        <distal x="47.6318" y="11.6826" z="0" diameter="1.7"/>
      </segment>
      <segment id="3" name = "Seg1_comp_2" parent="2" cable = "1">
        <distal x="75.2637" y="23.3651" z="0" diameter="1.7"/>
      </segment>
      <segment id="90" name = "Seg0_comp_46" parent="89" cable = "45">  <!-- Parent section: nontuftRS[0].comp[45] -->
        <proximal x="-25" y="2.18557e-06" z="0" diameter="1.4"/>
        <distal x="-50" y="5.96046e-06" z="0" diameter="1.4"/>
      </segment>
      <segment id="91" name = "Seg1_comp_46" parent="90" cable = "45">
        <distal x="-75" y="9.73536e-06" z="0" diameter="1.4"/>
      </segment>
      <segment id="70" name = "Seg0_comp_36" parent="69" cable = "35">  <!-- Parent section: nontuftRS[0].comp[35] -->
        <proximal x="66.053" y="-19.4709" z="0" diameter="2.8"/>
        <distal x="83.4707" y="-37.4048" z="0" diameter="2.8"/>
      </segment>
      <segment id="71" name = "Seg1_comp_36" parent="70" cable = "35">
        <distal x="100.888" y="-55.3387" z="0" diameter="2.8"/>
      </segment>
      <segment id="22" name = "Seg0_comp_12" parent="69" cable = "11">  <!-- Parent section: nontuftRS[0].comp[35] -->
        <proximal x="66.053" y="-19.4709" z="0" diameter="1.24"/>
        <distal x="93.6849" y="-31.1535" z="0" diameter="1.24"/>
      </segment>
      <segment id="23" name = "Seg1_comp_12" parent="22" cable = "11">
        <distal x="121.317" y="-42.836" z="0" diameter="1.24"/>
      </segment>
      <segment id="12" name = "Seg0_comp_7" parent="69" cable = "6">  <!-- Parent section: nontuftRS[0].comp[35] -->
        <proximal x="66.053" y="-19.4709" z="0" diameter="1.24"/>
        <distal x="96.053" y="-19.4709" z="0" diameter="1.24"/>
      </segment>
      <segment id="13" name = "Seg1_comp_7" parent="12" cable = "6">
        <distal x="126.053" y="-19.4709" z="0" diameter="1.24"/>
      </segment>
      <segment id="32" name = "Seg0_comp_17" parent="11" cable = "16">  <!-- Parent section: nontuftRS[0].comp[6] -->
        <proximal x="78.2803" y="-14.2622" z="0" diameter="1.7"/>
        <distal x="107.42" y="-21.3932" z="0" diameter="1.7"/>
      </segment>
      <segment id="33" name = "Seg1_comp_17" parent="32" cable = "16">
        <distal x="136.561" y="-28.5243" z="0" diameter="1.7"/>
      </segment>
      <segment id="30" name = "Seg0_comp_16" parent="9" cable = "15">  <!-- Parent section: nontuftRS[0].comp[5] -->
        <proximal x="79.8081" y="-4.79488" z="0" diameter="1.7"/>
        <distal x="109.712" y="-7.19232" z="0" diameter="1.7"/>
      </segment>
      <segment id="31" name = "Seg1_comp_16" parent="30" cable = "15">
        <distal x="139.616" y="-9.58976" z="0" diameter="1.7"/>
      </segment>
      <segment id="28" name = "Seg0_comp_15" parent="7" cable = "14">  <!-- Parent section: nontuftRS[0].comp[4] -->
        <proximal x="79.8081" y="4.79488" z="0" diameter="1.7"/>
        <distal x="109.712" y="7.19232" z="0" diameter="1.7"/>
      </segment>
      <segment id="29" name = "Seg1_comp_15" parent="28" cable = "14">
        <distal x="139.616" y="9.58976" z="0" diameter="1.7"/>
      </segment>
      <segment id="26" name = "Seg0_comp_14" parent="5" cable = "13">  <!-- Parent section: nontuftRS[0].comp[3] -->
        <proximal x="78.2803" y="14.2622" z="0" diameter="1.7"/>
        <distal x="107.42" y="21.3932" z="0" diameter="1.7"/>
      </segment>
      <segment id="27" name = "Seg1_comp_14" parent="26" cable = "13">
        <distal x="136.561" y="28.5243" z="0" diameter="1.7"/>
      </segment>
      <segment id="24" name = "Seg0_comp_13" parent="3" cable = "12">  <!-- Parent section: nontuftRS[0].comp[2] -->
        <proximal x="75.2637" y="23.3651" z="0" diameter="1.7"/>
        <distal x="102.895" y="35.0477" z="0" diameter="1.7"/>
      </segment>
      <segment id="25" name = "Seg1_comp_13" parent="24" cable = "12">
        <distal x="130.527" y="46.7302" z="0" diameter="1.7"/>
      </segment>
      <segment id="96" name = "Seg0_comp_49" parent="91" cable = "48">  <!-- Parent section: nontuftRS[0].comp[46] -->
        <proximal x="-75" y="9.73536e-06" z="0" diameter="1"/>
        <distal x="-98.0265" y="9.73547" z="0" diameter="1"/>
      </segment>
      <segment id="97" name = "Seg1_comp_49" parent="96" cable = "48">
        <distal x="-121.053" y="19.4709" z="0" diameter="1"/>
      </segment>
      <segment id="92" name = "Seg0_comp_47" parent="91" cable = "46">  <!-- Parent section: nontuftRS[0].comp[46] -->
        <proximal x="-75" y="9.73536e-06" z="0" diameter="1"/>
        <distal x="-98.0265" y="-9.73545" z="0" diameter="1"/>
      </segment>
      <segment id="93" name = "Seg1_comp_47" parent="92" cable = "46">
        <distal x="-121.053" y="-19.4709" z="0" diameter="1"/>
      </segment>
      <segment id="20" name = "Seg0_comp_11" parent="71" cable = "10">  <!-- Parent section: nontuftRS[0].comp[36] -->
        <proximal x="100.888" y="-55.3387" z="0" diameter="1.24"/>
        <distal x="111.759" y="-83.2999" z="0" diameter="1.24"/>
      </segment>
      <segment id="21" name = "Seg1_comp_11" parent="20" cable = "10">
        <distal x="122.63" y="-111.261" z="0" diameter="1.24"/>
      </segment>
      <segment id="14" name = "Seg0_comp_8" parent="71" cable = "7">  <!-- Parent section: nontuftRS[0].comp[36] -->
        <proximal x="100.888" y="-55.3387" z="0" diameter="1.24"/>
        <distal x="121.79" y="-76.8594" z="0" diameter="1.24"/>
      </segment>
      <segment id="15" name = "Seg1_comp_8" parent="14" cable = "7">
        <distal x="142.691" y="-98.3801" z="0" diameter="1.24"/>
      </segment>
      <segment id="72" name = "Seg0_comp_37" parent="71" cable = "36">  <!-- Parent section: nontuftRS[0].comp[36] -->
        <proximal x="100.888" y="-55.3387" z="0" diameter="2.6"/>
        <distal x="123.915" y="-65.0742" z="0" diameter="2.6"/>
      </segment>
      <segment id="73" name = "Seg1_comp_37" parent="72" cable = "36">
        <distal x="146.941" y="-74.8096" z="0" diameter="2.6"/>
      </segment>
      <segment id="44" name = "Seg0_comp_23" parent="23" cable = "22">  <!-- Parent section: nontuftRS[0].comp[12] -->
        <proximal x="121.317" y="-42.836" z="0" diameter="1.24"/>
        <distal x="148.949" y="-54.5186" z="0" diameter="1.24"/>
      </segment>
      <segment id="45" name = "Seg1_comp_23" parent="44" cable = "22">
        <distal x="176.58" y="-66.2011" z="0" diameter="1.24"/>
      </segment>
      <segment id="34" name = "Seg0_comp_18" parent="13" cable = "17">  <!-- Parent section: nontuftRS[0].comp[7] -->
        <proximal x="126.053" y="-19.4709" z="0" diameter="1.24"/>
        <distal x="156.053" y="-19.4709" z="0" diameter="1.24"/>
      </segment>
      <segment id="35" name = "Seg1_comp_18" parent="34" cable = "17">
        <distal x="186.053" y="-19.4709" z="0" diameter="1.24"/>
      </segment>
      <segment id="54" name = "Seg0_comp_28" parent="33" cable = "27">  <!-- Parent section: nontuftRS[0].comp[17] -->
        <proximal x="136.561" y="-28.5243" z="0" diameter="1.7"/>
        <distal x="165.701" y="-35.6554" z="0" diameter="1.7"/>
      </segment>
      <segment id="55" name = "Seg1_comp_28" parent="54" cable = "27">
        <distal x="194.841" y="-42.7865" z="0" diameter="1.7"/>
      </segment>
      <segment id="52" name = "Seg0_comp_27" parent="31" cable = "26">  <!-- Parent section: nontuftRS[0].comp[16] -->
        <proximal x="139.616" y="-9.58976" z="0" diameter="1.7"/>
        <distal x="169.52" y="-11.9872" z="0" diameter="1.7"/>
      </segment>
      <segment id="53" name = "Seg1_comp_27" parent="52" cable = "26">
        <distal x="199.424" y="-14.3846" z="0" diameter="1.7"/>
      </segment>
      <segment id="50" name = "Seg0_comp_26" parent="29" cable = "25">  <!-- Parent section: nontuftRS[0].comp[15] -->
        <proximal x="139.616" y="9.58976" z="0" diameter="1.7"/>
        <distal x="169.52" y="11.9872" z="0" diameter="1.7"/>
      </segment>
      <segment id="51" name = "Seg1_comp_26" parent="50" cable = "25">
        <distal x="199.424" y="14.3846" z="0" diameter="1.7"/>
      </segment>
      <segment id="48" name = "Seg0_comp_25" parent="27" cable = "24">  <!-- Parent section: nontuftRS[0].comp[14] -->
        <proximal x="136.561" y="28.5243" z="0" diameter="1.7"/>
        <distal x="165.701" y="35.6554" z="0" diameter="1.7"/>
      </segment>
      <segment id="49" name = "Seg1_comp_25" parent="48" cable = "24">
        <distal x="194.841" y="42.7865" z="0" diameter="1.7"/>
      </segment>
      <segment id="46" name = "Seg0_comp_24" parent="25" cable = "23">  <!-- Parent section: nontuftRS[0].comp[13] -->
        <proximal x="130.527" y="46.7302" z="0" diameter="1.7"/>
        <distal x="158.159" y="58.4128" z="0" diameter="1.7"/>
      </segment>
      <segment id="47" name = "Seg1_comp_24" parent="46" cable = "23">
        <distal x="185.791" y="70.0953" z="0" diameter="1.7"/>
      </segment>
      <segment id="98" name = "Seg0_comp_50" parent="97" cable = "49">  <!-- Parent section: nontuftRS[0].comp[49] -->
        <proximal x="-121.053" y="19.4709" z="0" diameter="1"/>
        <distal x="-144.08" y="29.2064" z="0" diameter="1"/>
      </segment>
      <segment id="99" name = "Seg1_comp_50" parent="98" cable = "49">
        <distal x="-167.106" y="38.9419" z="0" diameter="1"/>
      </segment>
      <segment id="94" name = "Seg0_comp_48" parent="93" cable = "47">  <!-- Parent section: nontuftRS[0].comp[47] -->
        <proximal x="-121.053" y="-19.4709" z="0" diameter="1"/>
        <distal x="-144.08" y="-29.2064" z="0" diameter="1"/>
      </segment>
      <segment id="95" name = "Seg1_comp_48" parent="94" cable = "47">
        <distal x="-167.106" y="-38.9418" z="0" diameter="1"/>
      </segment>
      <segment id="42" name = "Seg0_comp_22" parent="21" cable = "21">  <!-- Parent section: nontuftRS[0].comp[11] -->
        <proximal x="122.63" y="-111.261" z="0" diameter="1.24"/>
        <distal x="133.501" y="-139.222" z="0" diameter="1.24"/>
      </segment>
      <segment id="43" name = "Seg1_comp_22" parent="42" cable = "21">
        <distal x="144.371" y="-167.183" z="0" diameter="1.24"/>
      </segment>
      <segment id="36" name = "Seg0_comp_19" parent="15" cable = "18">  <!-- Parent section: nontuftRS[0].comp[8] -->
        <proximal x="142.691" y="-98.3801" z="0" diameter="1.24"/>
        <distal x="163.592" y="-119.901" z="0" diameter="1.24"/>
      </segment>
      <segment id="37" name = "Seg1_comp_19" parent="36" cable = "18">
        <distal x="184.493" y="-141.421" z="0" diameter="1.24"/>
      </segment>
      <segment id="18" name = "Seg0_comp_10" parent="73" cable = "9">  <!-- Parent section: nontuftRS[0].comp[37] -->
        <proximal x="146.941" y="-74.8096" z="0" diameter="1.24"/>
        <distal x="167.843" y="-96.3303" z="0" diameter="1.24"/>
      </segment>
      <segment id="19" name = "Seg1_comp_10" parent="18" cable = "9">
        <distal x="188.744" y="-117.851" z="0" diameter="1.24"/>
      </segment>
      <segment id="16" name = "Seg0_comp_9" parent="73" cable = "8">  <!-- Parent section: nontuftRS[0].comp[37] -->
        <proximal x="146.941" y="-74.8096" z="0" diameter="1.24"/>
        <distal x="174.573" y="-86.4922" z="0" diameter="1.24"/>
      </segment>
      <segment id="17" name = "Seg1_comp_9" parent="16" cable = "8">
        <distal x="202.205" y="-98.1747" z="0" diameter="1.24"/>
      </segment>
      <segment id="74" name = "Seg0_comp_38" parent="73" cable = "37">  <!-- Parent section: nontuftRS[0].comp[37] -->
        <proximal x="146.941" y="-74.8096" z="0" diameter="2.4"/>
        <distal x="171.941" y="-74.8096" z="0" diameter="2.4"/>
      </segment>
      <segment id="75" name = "Seg1_comp_38" parent="74" cable = "37">
        <distal x="196.941" y="-74.8096" z="0" diameter="2.4"/>
      </segment>
      <segment id="66" name = "Seg0_comp_34" parent="45" cable = "33">  <!-- Parent section: nontuftRS[0].comp[23] -->
        <proximal x="176.58" y="-66.2011" z="0" diameter="1.24"/>
        <distal x="204.212" y="-77.8837" z="0" diameter="1.24"/>
      </segment>
      <segment id="67" name = "Seg1_comp_34" parent="66" cable = "33">
        <distal x="231.844" y="-89.5662" z="0" diameter="1.24"/>
      </segment>
      <segment id="56" name = "Seg0_comp_29" parent="35" cable = "28">  <!-- Parent section: nontuftRS[0].comp[18] -->
        <proximal x="186.053" y="-19.4709" z="0" diameter="1.24"/>
        <distal x="216.053" y="-19.4709" z="0" diameter="1.24"/>
      </segment>
      <segment id="57" name = "Seg1_comp_29" parent="56" cable = "28">
        <distal x="246.053" y="-19.4709" z="0" diameter="1.24"/>
      </segment>
      <segment id="64" name = "Seg0_comp_33" parent="43" cable = "32">  <!-- Parent section: nontuftRS[0].comp[22] -->
        <proximal x="144.371" y="-167.183" z="0" diameter="1.24"/>
        <distal x="155.242" y="-195.145" z="0" diameter="1.24"/>
      </segment>
      <segment id="65" name = "Seg1_comp_33" parent="64" cable = "32">
        <distal x="166.113" y="-223.106" z="0" diameter="1.24"/>
      </segment>
      <segment id="58" name = "Seg0_comp_30" parent="37" cable = "29">  <!-- Parent section: nontuftRS[0].comp[19] -->
        <proximal x="184.493" y="-141.421" z="0" diameter="1.24"/>
        <distal x="205.394" y="-162.942" z="0" diameter="1.24"/>
      </segment>
      <segment id="59" name = "Seg1_comp_30" parent="58" cable = "29">
        <distal x="226.296" y="-184.463" z="0" diameter="1.24"/>
      </segment>
      <segment id="40" name = "Seg0_comp_21" parent="19" cable = "20">  <!-- Parent section: nontuftRS[0].comp[10] -->
        <proximal x="188.744" y="-117.851" z="0" diameter="1.24"/>
        <distal x="209.645" y="-139.372" z="0" diameter="1.24"/>
      </segment>
      <segment id="41" name = "Seg1_comp_21" parent="40" cable = "20">
        <distal x="230.546" y="-160.892" z="0" diameter="1.24"/>
      </segment>
      <segment id="38" name = "Seg0_comp_20" parent="17" cable = "19">  <!-- Parent section: nontuftRS[0].comp[9] -->
        <proximal x="202.205" y="-98.1747" z="0" diameter="1.24"/>
        <distal x="229.837" y="-109.857" z="0" diameter="1.24"/>
      </segment>
      <segment id="39" name = "Seg1_comp_20" parent="38" cable = "19">
        <distal x="257.469" y="-121.54" z="0" diameter="1.24"/>
      </segment>
      <segment id="76" name = "Seg0_comp_39" parent="75" cable = "38">  <!-- Parent section: nontuftRS[0].comp[38] -->
        <proximal x="196.941" y="-74.8096" z="0" diameter="2.2"/>
        <distal x="221.941" y="-74.8096" z="0" diameter="2.2"/>
      </segment>
      <segment id="77" name = "Seg1_comp_39" parent="76" cable = "38">
        <distal x="246.941" y="-74.8096" z="0" diameter="2.2"/>
      </segment>
      <segment id="62" name = "Seg0_comp_32" parent="41" cable = "31">  <!-- Parent section: nontuftRS[0].comp[21] -->
        <proximal x="230.546" y="-160.892" z="0" diameter="1.24"/>
        <distal x="251.447" y="-182.413" z="0" diameter="1.24"/>
      </segment>
      <segment id="63" name = "Seg1_comp_32" parent="62" cable = "31">
        <distal x="272.349" y="-203.934" z="0" diameter="1.24"/>
      </segment>
      <segment id="60" name = "Seg0_comp_31" parent="39" cable = "30">  <!-- Parent section: nontuftRS[0].comp[20] -->
        <proximal x="257.469" y="-121.54" z="0" diameter="1.24"/>
        <distal x="285.101" y="-133.222" z="0" diameter="1.24"/>
      </segment>
      <segment id="61" name = "Seg1_comp_31" parent="60" cable = "30">
        <distal x="312.732" y="-144.905" z="0" diameter="1.24"/>
      </segment>
      <segment id="78" name = "Seg0_comp_40" parent="77" cable = "39">  <!-- Parent section: nontuftRS[0].comp[39] -->
        <proximal x="246.941" y="-74.8096" z="0" diameter="2"/>
        <distal x="271.941" y="-74.8096" z="0" diameter="2"/>
      </segment>
      <segment id="79" name = "Seg1_comp_40" parent="78" cable = "39">
        <distal x="296.941" y="-74.8096" z="0" diameter="2"/>
      </segment>
      <segment id="80" name = "Seg0_comp_41" parent="79" cable = "40">  <!-- Parent section: nontuftRS[0].comp[40] -->
        <proximal x="296.941" y="-74.8096" z="0" diameter="1.8"/>
        <distal x="321.941" y="-74.8096" z="0" diameter="1.8"/>
      </segment>
      <segment id="81" name = "Seg1_comp_41" parent="80" cable = "40">
        <distal x="346.941" y="-74.8096" z="0" diameter="1.8"/>
      </segment>
      <segment id="82" name = "Seg0_comp_42" parent="81" cable = "41">  <!-- Parent section: nontuftRS[0].comp[41] -->
        <proximal x="346.941" y="-74.8096" z="0" diameter="1.6"/>
        <distal x="371.941" y="-74.8096" z="0" diameter="1.6"/>
      </segment>
      <segment id="83" name = "Seg1_comp_42" parent="82" cable = "41">
        <distal x="396.941" y="-74.8096" z="0" diameter="1.6"/>
      </segment>
      <segment id="84" name = "Seg0_comp_43" parent="83" cable = "42">  <!-- Parent section: nontuftRS[0].comp[42] -->
        <proximal x="396.941" y="-74.8096" z="0" diameter="1.4"/>
        <distal x="421.941" y="-74.8096" z="0" diameter="1.4"/>
      </segment>
      <segment id="85" name = "Seg1_comp_43" parent="84" cable = "42">
        <distal x="446.941" y="-74.8096" z="0" diameter="1.4"/>
      </segment>
      <segment id="86" name = "Seg0_comp_44" parent="85" cable = "43">  <!-- Parent section: nontuftRS[0].comp[43] -->
        <proximal x="446.941" y="-74.8096" z="0" diameter="1.2"/>
        <distal x="471.941" y="-74.8096" z="0" diameter="1.2"/>
      </segment>
      <segment id="87" name = "Seg1_comp_44" parent="86" cable = "43">
        <distal x="496.941" y="-74.8096" z="0" diameter="1.2"/>
      </segment>
    </segments>
    <cables  xmlns="http://morphml.org/morphml/schema"> <!-- Changing namespace from neuroml to morphml-->
      <cable id = "0" name = "comp_1" fractAlongParent = "0"/>
      <cable id = "44" name = "comp_45" fractAlongParent = "0"/>
      <cable id = "34" name = "comp_35"/>
      <cable id = "5" name = "comp_6"/>
      <cable id = "4" name = "comp_5"/>
      <cable id = "3" name = "comp_4"/>
      <cable id = "2" name = "comp_3"/>
      <cable id = "1" name = "comp_2"/>
      <cable id = "45" name = "comp_46"/>
      <cable id = "35" name = "comp_36"/>
      <cable id = "11" name = "comp_12"/>
      <cable id = "6" name = "comp_7"/>
      <cable id = "16" name = "comp_17"/>
      <cable id = "15" name = "comp_16"/>
      <cable id = "14" name = "comp_15"/>
      <cable id = "13" name = "comp_14"/>
      <cable id = "12" name = "comp_13"/>
      <cable id = "48" name = "comp_49"/>
      <cable id = "46" name = "comp_47"/>
      <cable id = "10" name = "comp_11"/>
      <cable id = "7" name = "comp_8"/>
      <cable id = "36" name = "comp_37"/>
      <cable id = "22" name = "comp_23"/>
      <cable id = "17" name = "comp_18"/>
      <cable id = "27" name = "comp_28"/>
      <cable id = "26" name = "comp_27"/>
      <cable id = "25" name = "comp_26"/>
      <cable id = "24" name = "comp_25"/>
      <cable id = "23" name = "comp_24"/>
      <cable id = "49" name = "comp_50"/>
      <cable id = "47" name = "comp_48"/>
      <cable id = "21" name = "comp_22"/>
      <cable id = "18" name = "comp_19"/>
      <cable id = "9" name = "comp_10"/>
      <cable id = "8" name = "comp_9"/>
      <cable id = "37" name = "comp_38"/>
      <cable id = "33" name = "comp_34"/>
      <cable id = "28" name = "comp_29"/>
      <cable id = "32" name = "comp_33"/>
      <cable id = "29" name = "comp_30"/>
      <cable id = "20" name = "comp_21"/>
      <cable id = "19" name = "comp_20"/>
      <cable id = "38" name = "comp_39"/>
      <cable id = "31" name = "comp_32"/>
      <cable id = "30" name = "comp_31"/>
      <cable id = "39" name = "comp_40"/>
      <cable id = "40" name = "comp_41"/>
      <cable id = "41" name = "comp_42"/>
      <cable id = "42" name = "comp_43"/>
      <cable id = "43" name = "comp_44"/>
      <cablegroup name="all"> <!-- Replacing subset name ModelViewParmSubset_0 with all, as it contains all sections -->
        <cable id = "0"/>
        <cable id = "44"/>
        <cable id = "34"/>
        <cable id = "5"/>
        <cable id = "4"/>
        <cable id = "3"/>
        <cable id = "2"/>
        <cable id = "1"/>
        <cable id = "45"/>
        <cable id = "35"/>
        <cable id = "11"/>
        <cable id = "6"/>
        <cable id = "16"/>
        <cable id = "15"/>
        <cable id = "14"/>
        <cable id = "13"/>
        <cable id = "12"/>
        <cable id = "48"/>
        <cable id = "46"/>
        <cable id = "10"/>
        <cable id = "7"/>
        <cable id = "36"/>
        <cable id = "22"/>
        <cable id = "17"/>
        <cable id = "27"/>
        <cable id = "26"/>
        <cable id = "25"/>
        <cable id = "24"/>
        <cable id = "23"/>
        <cable id = "49"/>
        <cable id = "47"/>
        <cable id = "21"/>
        <cable id = "18"/>
        <cable id = "9"/>
        <cable id = "8"/>
        <cable id = "37"/>
        <cable id = "33"/>
        <cable id = "28"/>
        <cable id = "32"/>
        <cable id = "29"/>
        <cable id = "20"/>
        <cable id = "19"/>
        <cable id = "38"/>
        <cable id = "31"/>
        <cable id = "30"/>
        <cable id = "39"/>
        <cable id = "40"/>
        <cable id = "41"/>
        <cable id = "42"/>
        <cable id = "43"/>
      </cablegroup>
      <cablegroup name="ModelViewParmSubset_1">
        <cable id = "0"/>
        <cable id = "34"/>
        <cable id = "5"/>
        <cable id = "4"/>
        <cable id = "3"/>
        <cable id = "2"/>
        <cable id = "1"/>
        <cable id = "35"/>
        <cable id = "11"/>
        <cable id = "6"/>
        <cable id = "16"/>
        <cable id = "15"/>
        <cable id = "14"/>
        <cable id = "13"/>
        <cable id = "12"/>
        <cable id = "10"/>
        <cable id = "7"/>
        <cable id = "36"/>
        <cable id = "22"/>
        <cable id = "17"/>
        <cable id = "27"/>
        <cable id = "26"/>
        <cable id = "25"/>
        <cable id = "24"/>
        <cable id = "23"/>
        <cable id = "21"/>
        <cable id = "18"/>
        <cable id = "9"/>
        <cable id = "8"/>
        <cable id = "37"/>
        <cable id = "33"/>
        <cable id = "28"/>
        <cable id = "32"/>
        <cable id = "29"/>
        <cable id = "20"/>
        <cable id = "19"/>
        <cable id = "38"/>
        <cable id = "31"/>
        <cable id = "30"/>
        <cable id = "39"/>
        <cable id = "40"/>
        <cable id = "41"/>
        <cable id = "42"/>
        <cable id = "43"/>
      </cablegroup>
      <cablegroup name="ModelViewParmSubset_2">
        <cable id = "0"/>
        <cable id = "34"/>
        <cable id = "5"/>
        <cable id = "4"/>
        <cable id = "3"/>
        <cable id = "2"/>
        <cable id = "1"/>
        <cable id = "35"/>
        <cable id = "11"/>
        <cable id = "6"/>
        <cable id = "10"/>
        <cable id = "7"/>
        <cable id = "9"/>
        <cable id = "8"/>
      </cablegroup>
      <cablegroup name="ModelViewParmSubset_3">
        <cable id = "0"/>
        <cable id = "44"/>
        <cable id = "34"/>
        <cable id = "5"/>
        <cable id = "4"/>
        <cable id = "3"/>
        <cable id = "2"/>
        <cable id = "1"/>
        <cable id = "45"/>
        <cable id = "35"/>
        <cable id = "11"/>
        <cable id = "6"/>
        <cable id = "48"/>
        <cable id = "46"/>
        <cable id = "10"/>
        <cable id = "7"/>
        <cable id = "49"/>
        <cable id = "47"/>
        <cable id = "9"/>
        <cable id = "8"/>
      </cablegroup>
      <cablegroup name="ModelViewParmSubset_4">
        <cable id = "44"/>
        <cable id = "45"/>
        <cable id = "48"/>
        <cable id = "46"/>
        <cable id = "49"/>
        <cable id = "47"/>
      </cablegroup>
      <cablegroup name="ModelViewParmSubset_5">
        <cable id = "0"/>
        <cable id = "44"/>
        <cable id = "45"/>
        <cable id = "48"/>
        <cable id = "46"/>
        <cable id = "49"/>
        <cable id = "47"/>
      </cablegroup>
      <cablegroup name="ModelViewParmSubset_6">
        <cable id = "34"/>
        <cable id = "5"/>
        <cable id = "4"/>
        <cable id = "3"/>
        <cable id = "2"/>
        <cable id = "1"/>
        <cable id = "35"/>
        <cable id = "11"/>
        <cable id = "6"/>
        <cable id = "16"/>
        <cable id = "15"/>
        <cable id = "14"/>
        <cable id = "13"/>
        <cable id = "12"/>
        <cable id = "10"/>
        <cable id = "7"/>
        <cable id = "36"/>
        <cable id = "22"/>
        <cable id = "17"/>
        <cable id = "27"/>
        <cable id = "26"/>
        <cable id = "25"/>
        <cable id = "24"/>
        <cable id = "23"/>
        <cable id = "21"/>
        <cable id = "18"/>
        <cable id = "9"/>
        <cable id = "8"/>
        <cable id = "37"/>
        <cable id = "33"/>
        <cable id = "28"/>
        <cable id = "32"/>
        <cable id = "29"/>
        <cable id = "20"/>
        <cable id = "19"/>
        <cable id = "38"/>
        <cable id = "31"/>
        <cable id = "30"/>
        <cable id = "39"/>
        <cable id = "40"/>
        <cable id = "41"/>
        <cable id = "42"/>
        <cable id = "43"/>
      </cablegroup>
      <cablegroup name="ModelViewParmSubset_7">
        <cable id = "34"/>
        <cable id = "5"/>
        <cable id = "4"/>
        <cable id = "3"/>
        <cable id = "2"/>
        <cable id = "1"/>
        <cable id = "35"/>
        <cable id = "11"/>
        <cable id = "6"/>
        <cable id = "16"/>
        <cable id = "15"/>
        <cable id = "14"/>
        <cable id = "13"/>
        <cable id = "12"/>
        <cable id = "10"/>
        <cable id = "7"/>
        <cable id = "36"/>
        <cable id = "22"/>
        <cable id = "17"/>
        <cable id = "27"/>
        <cable id = "26"/>
        <cable id = "25"/>
        <cable id = "24"/>
        <cable id = "23"/>
        <cable id = "21"/>
        <cable id = "18"/>
        <cable id = "9"/>
        <cable id = "8"/>
        <cable id = "37"/>
        <cable id = "33"/>
        <cable id = "28"/>
        <cable id = "32"/>
        <cable id = "29"/>
        <cable id = "20"/>
        <cable id = "19"/>
        <cable id = "38"/>
        <cable id = "31"/>
        <cable id = "30"/>
      </cablegroup>
      <cablegroup name="ModelViewParmSubset_8">
        <cable id = "39"/>
        <cable id = "40"/>
        <cable id = "41"/>
        <cable id = "42"/>
        <cable id = "43"/>
      </cablegroup>
      <cablegroup name="ModelViewParmSubset_9">
        <cable id = "5"/>
        <cable id = "4"/>
        <cable id = "3"/>
        <cable id = "2"/>
        <cable id = "1"/>
        <cable id = "35"/>
        <cable id = "11"/>
        <cable id = "6"/>
        <cable id = "16"/>
        <cable id = "15"/>
        <cable id = "14"/>
        <cable id = "13"/>
        <cable id = "12"/>
        <cable id = "10"/>
        <cable id = "7"/>
        <cable id = "36"/>
        <cable id = "22"/>
        <cable id = "17"/>
        <cable id = "27"/>
        <cable id = "26"/>
        <cable id = "25"/>
        <cable id = "24"/>
        <cable id = "23"/>
        <cable id = "21"/>
        <cable id = "18"/>
        <cable id = "9"/>
        <cable id = "8"/>
        <cable id = "37"/>
        <cable id = "33"/>
        <cable id = "28"/>
        <cable id = "32"/>
        <cable id = "29"/>
        <cable id = "20"/>
        <cable id = "19"/>
        <cable id = "38"/>
        <cable id = "31"/>
        <cable id = "30"/>
        <cable id = "39"/>
        <cable id = "40"/>
        <cable id = "41"/>
        <cable id = "42"/>
        <cable id = "43"/>
      </cablegroup>
      <cablegroup name="ModelViewParmSubset_10">
        <cable id = "34"/>
        <cable id = "5"/>
        <cable id = "4"/>
        <cable id = "3"/>
        <cable id = "2"/>
        <cable id = "1"/>
        <cable id = "35"/>
        <cable id = "11"/>
        <cable id = "6"/>
        <cable id = "10"/>
        <cable id = "7"/>
        <cable id = "9"/>
        <cable id = "8"/>
      </cablegroup>
      <cablegroup name="ModelViewParmSubset_11">
        <cable id = "5"/>
        <cable id = "4"/>
        <cable id = "3"/>
        <cable id = "2"/>
        <cable id = "1"/>
        <cable id = "35"/>
        <cable id = "11"/>
        <cable id = "6"/>
        <cable id = "10"/>
        <cable id = "7"/>
        <cable id = "9"/>
        <cable id = "8"/>
      </cablegroup>
      <cablegroup name="ModelViewParmSubset_12">
        <cable id = "16"/>
        <cable id = "15"/>
        <cable id = "14"/>
        <cable id = "13"/>
        <cable id = "12"/>
        <cable id = "36"/>
        <cable id = "22"/>
        <cable id = "17"/>
        <cable id = "27"/>
        <cable id = "26"/>
        <cable id = "25"/>
        <cable id = "24"/>
        <cable id = "23"/>
        <cable id = "21"/>
        <cable id = "18"/>
        <cable id = "37"/>
        <cable id = "33"/>
        <cable id = "28"/>
        <cable id = "32"/>
        <cable id = "29"/>
        <cable id = "20"/>
        <cable id = "19"/>
        <cable id = "38"/>
        <cable id = "31"/>
        <cable id = "30"/>
        <cable id = "39"/>
        <cable id = "40"/>
        <cable id = "41"/>
        <cable id = "42"/>
        <cable id = "43"/>
      </cablegroup>
      <cablegroup name="OneSecGrp_SectionRef_1"> <!-- Creating a group containing a single section... -->
        <cable id = "0"/>
      </cablegroup>
      <cablegroup name="OneSecGrp_SectionRef_1"> <!-- Creating a group containing a single section... -->
        <cable id = "0"/>
      </cablegroup>
      <cablegroup name="OneSecGrp_SectionRef_1"> <!-- Creating a group containing a single section... -->
        <cable id = "0"/>
      </cablegroup>
      <cablegroup name="OneSecGrp_SectionRef_1"> <!-- Creating a group containing a single section... -->
        <cable id = "0"/>
      </cablegroup>
      <cablegroup name="OneSecGrp_SectionRef_1"> <!-- Creating a group containing a single section... -->
        <cable id = "0"/>
      </cablegroup>
      <cablegroup name="OneSecGrp_SectionRef_1"> <!-- Creating a group containing a single section... -->
        <cable id = "0"/>
      </cablegroup>
      <cablegroup name="OneSecGrp_SectionRef_1"> <!-- Creating a group containing a single section... -->
        <cable id = "0"/>
      </cablegroup>
      <cablegroup name="OneSecGrp_SectionRef_3"> <!-- Creating a group containing a single section... -->
        <cable id = "34"/>
      </cablegroup>
      <cablegroup name="OneSecGrp_SectionRef_1"> <!-- Creating a group containing a single section... -->
        <cable id = "0"/>
      </cablegroup>
      <cablegroup name="OneSecGrp_SectionRef_1"> <!-- Creating a group containing a single section... -->
        <cable id = "0"/>
      </cablegroup>
      <cablegroup name="OneSecGrp_SectionRef_1"> <!-- Creating a group containing a single section... -->
        <cable id = "0"/>
      </cablegroup>
      <cablegroup name="OneSecGrp_SectionRef_3"> <!-- Creating a group containing a single section... -->
        <cable id = "34"/>
      </cablegroup>
      <cablegroup name="OneSecGrp_SectionRef_1"> <!-- Creating a group containing a single section... -->
        <cable id = "0"/>
      </cablegroup>
      <cablegroup name="OneSecGrp_SectionRef_1"> <!-- Creating a group containing a single section... -->
        <cable id = "0"/>
      </cablegroup>
      <cablegroup name="OneSecGrp_SectionRef_3"> <!-- Creating a group containing a single section... -->
        <cable id = "34"/>
      </cablegroup>
      <cablegroup name="OneSecGrp_SectionRef_1"> <!-- Creating a group containing a single section... -->
        <cable id = "0"/>
      </cablegroup>
      <cablegroup name="OneSecGrp_SectionRef_3"> <!-- Creating a group containing a single section... -->
        <cable id = "34"/>
      </cablegroup>
    </cables>
    <biophysics  units = "Physiological Units"> <!-- Note: values of cond dens are different in NEURON and phy units-->
      <bio:mechanism name="pas" type="Channel Mechanism" passiveConductance="true">
        <bio:parameter name="gmax" value="0.02">
          <bio:group>OneSecGrp_SectionRef_1</bio:group>
        </bio:parameter>
        <bio:parameter name="gmax" value="0.04">
          <bio:group>ModelViewParmSubset_6</bio:group>
        </bio:parameter>
        <bio:parameter name="gmax" value="1">
          <bio:group>ModelViewParmSubset_4</bio:group>
        </bio:parameter>
        <bio:parameter name="e" value="-70">
          <bio:group>all</bio:group>
        </bio:parameter>
      </bio:mechanism>
      <bio:mechanism name="ar" type="Channel Mechanism">
        <bio:parameter name="gmax" value="0.25">
          <bio:group>OneSecGrp_SectionRef_1</bio:group>
        </bio:parameter>
        <bio:parameter name="gmax" value="0.5">
          <bio:group>ModelViewParmSubset_6</bio:group>
        </bio:parameter>
        <bio:parameter name="erev" value="-35">
          <bio:group>ModelViewParmSubset_1</bio:group>
        </bio:parameter>
        <bio:parameter name="m0" value="0.25">
          <bio:group>ModelViewParmSubset_1</bio:group>
        </bio:parameter>
      </bio:mechanism>
      <bio:mechanism name="cad" type="Channel Mechanism">
        <bio:parameter name="phi" value="13000">
          <bio:group>OneSecGrp_SectionRef_1</bio:group>
        </bio:parameter>
        <bio:parameter name="phi" value="65000">
          <bio:group>ModelViewParmSubset_6</bio:group>
        </bio:parameter>
        <bio:parameter name="beta" value="0.01">
          <bio:group>OneSecGrp_SectionRef_1</bio:group>
        </bio:parameter>
        <bio:parameter name="beta" value="0.05">
          <bio:group>ModelViewParmSubset_6</bio:group>
        </bio:parameter>
      </bio:mechanism>
      <bio:mechanism name="cal" type="Channel Mechanism">
        <bio:parameter name="gmax" value="0.2">
          <bio:group>OneSecGrp_SectionRef_1</bio:group>
        </bio:parameter>
        <bio:parameter name="gmax" value="0.4">
          <bio:group>ModelViewParmSubset_7</bio:group>
        </bio:parameter>
        <bio:parameter name="gmax" value="4">
          <bio:group>ModelViewParmSubset_8</bio:group>
        </bio:parameter>
      </bio:mechanism>
      <bio:mechanism name="cat" type="Channel Mechanism">
        <bio:parameter name="gmax" value="0.1">
          <bio:group>OneSecGrp_SectionRef_1</bio:group>
        </bio:parameter>
        <bio:parameter name="gmax" value="0.2">
          <bio:group>ModelViewParmSubset_6</bio:group>
        </bio:parameter>
      </bio:mechanism>
      <bio:mechanism name="k2" type="Channel Mechanism">
        <bio:parameter name="gmax" value="0.1">
          <bio:group>ModelViewParmSubset_5</bio:group>
        </bio:parameter>
        <bio:parameter name="gmax" value="0.2">
          <bio:group>ModelViewParmSubset_6</bio:group>
        </bio:parameter>
      </bio:mechanism>
      <bio:mechanism name="ka" type="Channel Mechanism">
        <bio:parameter name="gmax" value="4">
          <bio:group>ModelViewParmSubset_4</bio:group>
        </bio:parameter>
        <bio:parameter name="gmax" value="27.2">
          <bio:group>ModelViewParmSubset_9</bio:group>
        </bio:parameter>
        <bio:parameter name="gmax" value="119">
          <bio:group>OneSecGrp_SectionRef_1</bio:group>
        </bio:parameter>
        <bio:parameter name="gmax" value="238">
          <bio:group>OneSecGrp_SectionRef_3</bio:group>
        </bio:parameter>
      </bio:mechanism>
      <bio:mechanism name="kahp_deeppyr" type="Channel Mechanism">
        <bio:parameter name="gmax" value="0.2">
          <bio:group>OneSecGrp_SectionRef_1</bio:group>
        </bio:parameter>
        <bio:parameter name="gmax" value="0.4">
          <bio:group>ModelViewParmSubset_6</bio:group>
        </bio:parameter>
      </bio:mechanism>
      <bio:mechanism name="kc" type="Channel Mechanism">
        <bio:parameter name="gmax" value="15">
          <bio:group>OneSecGrp_SectionRef_1</bio:group>
        </bio:parameter>
        <bio:parameter name="gmax" value="30">
          <bio:group>ModelViewParmSubset_10</bio:group>
        </bio:parameter>
      </bio:mechanism>
      <bio:mechanism name="kdr" type="Channel Mechanism">
        <bio:parameter name="gmax" value="150">
          <bio:group>ModelViewParmSubset_11</bio:group>
        </bio:parameter>
        <bio:parameter name="gmax" value="170">
          <bio:group>OneSecGrp_SectionRef_1</bio:group>
        </bio:parameter>
        <bio:parameter name="gmax" value="240">
          <bio:group>OneSecGrp_SectionRef_3</bio:group>
        </bio:parameter>
        <bio:parameter name="gmax" value="450">
          <bio:group>ModelViewParmSubset_4</bio:group>
        </bio:parameter>
      </bio:mechanism>
      <bio:mechanism name="km" type="Channel Mechanism">
        <bio:parameter name="gmax" value="4.2">
          <bio:group>OneSecGrp_SectionRef_1</bio:group>
        </bio:parameter>
        <bio:parameter name="gmax" value="8.4">
          <bio:group>ModelViewParmSubset_6</bio:group>
        </bio:parameter>
      </bio:mechanism>
      <bio:mechanism name="naf" type="Channel Mechanism">
        <bio:parameter name="fastNa_shift" value="-3.5">
          <bio:group>all</bio:group>
        </bio:parameter>
        <bio:parameter name="a" value="0">
          <bio:group>all</bio:group>
        </bio:parameter>
        <bio:parameter name="b" value="0">
          <bio:group>all</bio:group>
        </bio:parameter>
        <bio:parameter name="c" value="0">
          <bio:group>all</bio:group>
        </bio:parameter>
        <bio:parameter name="d" value="0">
          <bio:group>all</bio:group>
        </bio:parameter>
        <bio:parameter name="gmax" value="10">
          <bio:group>ModelViewParmSubset_12</bio:group>
        </bio:parameter>
        <bio:parameter name="gmax" value="150">
          <bio:group>ModelViewParmSubset_11</bio:group>
        </bio:parameter>
        <bio:parameter name="gmax" value="200">
          <bio:group>OneSecGrp_SectionRef_1</bio:group>
        </bio:parameter>
        <bio:parameter name="gmax" value="300">
          <bio:group>OneSecGrp_SectionRef_3</bio:group>
        </bio:parameter>
        <bio:parameter name="gmax" value="450">
          <bio:group>ModelViewParmSubset_4</bio:group>
        </bio:parameter>
      </bio:mechanism>
      <bio:mechanism name="nap" type="Channel Mechanism">
        <bio:parameter name="gmax" value="0.004">
          <bio:group>ModelViewParmSubset_12</bio:group>
        </bio:parameter>
        <bio:parameter name="gmax" value="0.06">
          <bio:group>ModelViewParmSubset_11</bio:group>
        </bio:parameter>
        <bio:parameter name="gmax" value="0.08">
          <bio:group>OneSecGrp_SectionRef_1</bio:group>
        </bio:parameter>
        <bio:parameter name="gmax" value="0.12">
          <bio:group>OneSecGrp_SectionRef_3</bio:group>
        </bio:parameter>
      </bio:mechanism>
      <bio:specificCapacitance>
        <bio:parameter value="0.9">
          <bio:group>ModelViewParmSubset_5</bio:group>
        </bio:parameter>
        <bio:parameter value="1.8">
          <bio:group>ModelViewParmSubset_6</bio:group>
        </bio:parameter>
      </bio:specificCapacitance>
      <bio:specificAxialResistance>
        <bio:parameter value="0.1">
          <bio:group>ModelViewParmSubset_4</bio:group>
        </bio:parameter>
        <bio:parameter value="0.25">
          <bio:group>ModelViewParmSubset_1</bio:group>
        </bio:parameter>
      </bio:specificAxialResistance>
    </biophysics>
  </cell>
</cells>
</neuroml>
