<?xml version="1.0" encoding="UTF-8"?>
<neuroml xmlns="http://morphml.org/neuroml/schema"
    xmlns:mml="http://morphml.org/morphml/schema"
    xmlns:meta="http://morphml.org/metadata/schema"
    xmlns:bio="http://morphml.org/biophysics/schema"
    xmlns:cml="http://morphml.org/channelml/schema"
    xmlns:xsi="http://www.w3.org/2001/XMLSchema-instance"
    xsi:schemaLocation="http://morphml.org/neuroml/schema NeuroML_Level2_v1.6.xsd"
    name = "NeuroML Level 2 file exported from NEURON"
    lengthUnits="micron">

<meta:notes>NeuroML Level 2 file generated by NEURON 6.1 ModelViewer
Authors: Michael Hines, Sushil Kambampati and Padraig Gleeson,
Yale University and UCL</meta:notes>

<cells>
  <cell name="suppyrFRB_0">
    <meta:notes>Cell: suppyrFRB_0 exported from NEURON ModelView</meta:notes>
    <segments  xmlns="http://morphml.org/morphml/schema"> <!-- Changing namespace from neuroml to morphml-->
      <segment id="0" name = "Seg0_comp_1" cable = "0">
        <proximal x="0" y="0" z="0" diameter="16"/>
        <distal x="7.5" y="0" z="0" diameter="16"/>
      </segment>
      <segment id="1" name = "Seg1_comp_1" parent="0" cable = "0">
        <distal x="15" y="0" z="0" diameter="16"/>
      </segment>
      <segment id="136" name = "Seg0_comp_69" parent="0" cable = "68">  <!-- Connected at 0 on parent section: suppyrFRB[0].comp[1]  -->
        <proximal x="0" y="0" z="0" diameter="1.8"/>
        <distal x="-12.5" y="1.09278e-06" z="0" diameter="1.8"/>
      </segment>
      <segment id="137" name = "Seg1_comp_69" parent="136" cable = "68">
        <distal x="-25" y="2.18557e-06" z="0" diameter="1.8"/>
      </segment>
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    </segments>
    <cables  xmlns="http://morphml.org/morphml/schema"> <!-- Changing namespace from neuroml to morphml-->
      <cable id = "0" name = "comp_1" fractAlongParent = "0"/>
      <cable id = "68" name = "comp_69" fractAlongParent = "0"/>
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      <cablegroup name="all"> <!-- Replacing subset name ModelViewParmSubset_0 with all, as it contains all sections -->
        <cable id = "0"/>
        <cable id = "68"/>
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      </cablegroup>
      <cablegroup name="ModelViewParmSubset_1">
        <cable id = "0"/>
        <cable id = "37"/>
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      </cablegroup>
      <cablegroup name="ModelViewParmSubset_2">
        <cable id = "68"/>
        <cable id = "69"/>
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      </cablegroup>
      <cablegroup name="ModelViewParmSubset_3">
        <cable id = "0"/>
        <cable id = "68"/>
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      </cablegroup>
      <cablegroup name="ModelViewParmSubset_4">
        <cable id = "37"/>
        <cable id = "8"/>
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      </cablegroup>
      <cablegroup name="ModelViewParmSubset_5">
        <cable id = "8"/>
        <cable id = "7"/>
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      </cablegroup>
      <cablegroup name="ModelViewParmSubset_6">
        <cable id = "20"/>
        <cable id = "19"/>
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      </cablegroup>
      <cablegroup name="ModelViewParmSubset_7">
        <cable id = "8"/>
        <cable id = "7"/>
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      </cablegroup>
      <cablegroup name="ModelViewParmSubset_8">
        <cable id = "0"/>
        <cable id = "8"/>
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      </cablegroup>
      <cablegroup name="OneSecGrp_SectionRef_1"> <!-- Creating a group containing a single section... -->
        <cable id = "0"/>
      </cablegroup>
      <cablegroup name="OneSecGrp_SectionRef_1"> <!-- Creating a group containing a single section... -->
        <cable id = "0"/>
      </cablegroup>
      <cablegroup name="OneSecGrp_SectionRef_1"> <!-- Creating a group containing a single section... -->
        <cable id = "0"/>
      </cablegroup>
      <cablegroup name="OneSecGrp_SectionRef_1"> <!-- Creating a group containing a single section... -->
        <cable id = "0"/>
      </cablegroup>
      <cablegroup name="OneSecGrp_SectionRef_1"> <!-- Creating a group containing a single section... -->
        <cable id = "0"/>
      </cablegroup>
      <cablegroup name="OneSecGrp_SectionRef_1"> <!-- Creating a group containing a single section... -->
        <cable id = "0"/>
      </cablegroup>
      <cablegroup name="OneSecGrp_SectionRef_1"> <!-- Creating a group containing a single section... -->
        <cable id = "0"/>
      </cablegroup>
      <cablegroup name="OneSecGrp_SectionRef_3"> <!-- Creating a group containing a single section... -->
        <cable id = "37"/>
      </cablegroup>
      <cablegroup name="OneSecGrp_SectionRef_1"> <!-- Creating a group containing a single section... -->
        <cable id = "0"/>
      </cablegroup>
      <cablegroup name="OneSecGrp_SectionRef_1"> <!-- Creating a group containing a single section... -->
        <cable id = "0"/>
      </cablegroup>
      <cablegroup name="OneSecGrp_SectionRef_1"> <!-- Creating a group containing a single section... -->
        <cable id = "0"/>
      </cablegroup>
      <cablegroup name="OneSecGrp_SectionRef_3"> <!-- Creating a group containing a single section... -->
        <cable id = "37"/>
      </cablegroup>
      <cablegroup name="OneSecGrp_SectionRef_1"> <!-- Creating a group containing a single section... -->
        <cable id = "0"/>
      </cablegroup>
      <cablegroup name="OneSecGrp_SectionRef_3"> <!-- Creating a group containing a single section... -->
        <cable id = "37"/>
      </cablegroup>
      <cablegroup name="OneSecGrp_SectionRef_3"> <!-- Creating a group containing a single section... -->
        <cable id = "37"/>
      </cablegroup>
    </cables>
    <biophysics  units = "Physiological Units"> <!-- Note: values of cond dens are different in NEURON and phy units-->
      <bio:mechanism name="pas" type="Channel Mechanism" passiveConductance="true">
        <bio:parameter name="gmax" value="0.02">
          <bio:group>OneSecGrp_SectionRef_1</bio:group>
        </bio:parameter>
        <bio:parameter name="gmax" value="0.04">
          <bio:group>ModelViewParmSubset_4</bio:group>
        </bio:parameter>
        <bio:parameter name="gmax" value="1">
          <bio:group>ModelViewParmSubset_2</bio:group>
        </bio:parameter>
        <bio:parameter name="e" value="-70">
          <bio:group>all</bio:group>
        </bio:parameter>
      </bio:mechanism>
      <bio:mechanism name="ar" type="Channel Mechanism">
        <bio:parameter name="gmax" value="0.25">
          <bio:group>OneSecGrp_SectionRef_1</bio:group>
        </bio:parameter>
        <bio:parameter name="gmax" value="0.5">
          <bio:group>ModelViewParmSubset_4</bio:group>
        </bio:parameter>
        <bio:parameter name="erev" value="-35">
          <bio:group>ModelViewParmSubset_1</bio:group>
        </bio:parameter>
        <bio:parameter name="m0" value="0.25">
          <bio:group>ModelViewParmSubset_1</bio:group>
        </bio:parameter>
      </bio:mechanism>
      <bio:mechanism name="cad" type="Channel Mechanism">
        <bio:parameter name="phi" value="26000">
          <bio:group>OneSecGrp_SectionRef_1</bio:group>
        </bio:parameter>
        <bio:parameter name="phi" value="52000">
          <bio:group>ModelViewParmSubset_4</bio:group>
        </bio:parameter>
        <bio:parameter name="beta" value="0.01">
          <bio:group>OneSecGrp_SectionRef_1</bio:group>
        </bio:parameter>
        <bio:parameter name="beta" value="0.05">
          <bio:group>ModelViewParmSubset_4</bio:group>
        </bio:parameter>
      </bio:mechanism>
      <bio:mechanism name="cal" type="Channel Mechanism">
        <bio:parameter name="gmax" value="1">
          <bio:group>OneSecGrp_SectionRef_1</bio:group>
        </bio:parameter>
        <bio:parameter name="gmax" value="2">
          <bio:group>ModelViewParmSubset_4</bio:group>
        </bio:parameter>
      </bio:mechanism>
      <bio:mechanism name="cat" type="Channel Mechanism">
        <bio:parameter name="gmax" value="0.1">
          <bio:group>OneSecGrp_SectionRef_1</bio:group>
        </bio:parameter>
        <bio:parameter name="gmax" value="0.2">
          <bio:group>ModelViewParmSubset_4</bio:group>
        </bio:parameter>
      </bio:mechanism>
      <bio:mechanism name="k2" type="Channel Mechanism">
        <bio:parameter name="gmax" value="0.1">
          <bio:group>ModelViewParmSubset_3</bio:group>
        </bio:parameter>
        <bio:parameter name="gmax" value="0.2">
          <bio:group>ModelViewParmSubset_4</bio:group>
        </bio:parameter>
      </bio:mechanism>
      <bio:mechanism name="ka" type="Channel Mechanism">
        <bio:parameter name="gmax" value="2">
          <bio:group>ModelViewParmSubset_2</bio:group>
        </bio:parameter>
        <bio:parameter name="gmax" value="4">
          <bio:group>ModelViewParmSubset_5</bio:group>
        </bio:parameter>
        <bio:parameter name="gmax" value="30">
          <bio:group>OneSecGrp_SectionRef_1</bio:group>
        </bio:parameter>
        <bio:parameter name="gmax" value="60">
          <bio:group>OneSecGrp_SectionRef_3</bio:group>
        </bio:parameter>
      </bio:mechanism>
      <bio:mechanism name="kahp" type="Channel Mechanism">
        <bio:parameter name="gmax" value="0.1">
          <bio:group>OneSecGrp_SectionRef_1</bio:group>
        </bio:parameter>
        <bio:parameter name="gmax" value="0.2">
          <bio:group>ModelViewParmSubset_4</bio:group>
        </bio:parameter>
      </bio:mechanism>
      <bio:mechanism name="kc" type="Channel Mechanism">
        <bio:parameter name="gmax" value="4.5">
          <bio:group>OneSecGrp_SectionRef_1</bio:group>
        </bio:parameter>
        <bio:parameter name="gmax" value="9">
          <bio:group>ModelViewParmSubset_4</bio:group>
        </bio:parameter>
      </bio:mechanism>
      <bio:mechanism name="kdr" type="Channel Mechanism">
        <bio:parameter name="gmax" value="12.5">
          <bio:group>ModelViewParmSubset_6</bio:group>
        </bio:parameter>
        <bio:parameter name="gmax" value="125">
          <bio:group>OneSecGrp_SectionRef_1</bio:group>
        </bio:parameter>
        <bio:parameter name="gmax" value="187.5">
          <bio:group>ModelViewParmSubset_7</bio:group>
        </bio:parameter>
        <bio:parameter name="gmax" value="250">
          <bio:group>OneSecGrp_SectionRef_3</bio:group>
        </bio:parameter>
        <bio:parameter name="gmax" value="400">
          <bio:group>ModelViewParmSubset_2</bio:group>
        </bio:parameter>
      </bio:mechanism>
      <bio:mechanism name="km" type="Channel Mechanism">
        <bio:parameter name="gmax" value="7.5">
          <bio:group>OneSecGrp_SectionRef_1</bio:group>
        </bio:parameter>
        <bio:parameter name="gmax" value="15">
          <bio:group>ModelViewParmSubset_4</bio:group>
        </bio:parameter>
      </bio:mechanism>
      <bio:mechanism name="naf" type="Channel Mechanism">
        <bio:parameter name="fastNa_shift" value="-3.5">
          <bio:group>all</bio:group>
        </bio:parameter>
        <bio:parameter name="a" value="0">
          <bio:group>all</bio:group>
        </bio:parameter>
        <bio:parameter name="b" value="0">
          <bio:group>all</bio:group>
        </bio:parameter>
        <bio:parameter name="c" value="0">
          <bio:group>all</bio:group>
        </bio:parameter>
        <bio:parameter name="d" value="0">
          <bio:group>all</bio:group>
        </bio:parameter>
        <bio:parameter name="gmax" value="25">
          <bio:group>ModelViewParmSubset_6</bio:group>
        </bio:parameter>
        <bio:parameter name="gmax" value="187.5">
          <bio:group>ModelViewParmSubset_8</bio:group>
        </bio:parameter>
        <bio:parameter name="gmax" value="250">
          <bio:group>OneSecGrp_SectionRef_3</bio:group>
        </bio:parameter>
        <bio:parameter name="gmax" value="400">
          <bio:group>ModelViewParmSubset_2</bio:group>
        </bio:parameter>
      </bio:mechanism>
      <bio:mechanism name="nap" type="Channel Mechanism">
        <bio:parameter name="gmax" value="0.064">
          <bio:group>ModelViewParmSubset_6</bio:group>
        </bio:parameter>
        <bio:parameter name="gmax" value="0.48">
          <bio:group>ModelViewParmSubset_8</bio:group>
        </bio:parameter>
        <bio:parameter name="gmax" value="0.64">
          <bio:group>OneSecGrp_SectionRef_3</bio:group>
        </bio:parameter>
      </bio:mechanism>
      <bio:specificCapacitance>
        <bio:parameter value="0.9">
          <bio:group>ModelViewParmSubset_3</bio:group>
        </bio:parameter>
        <bio:parameter value="1.8">
          <bio:group>ModelViewParmSubset_4</bio:group>
        </bio:parameter>
      </bio:specificCapacitance>
      <bio:specificAxialResistance>
        <bio:parameter value="0.1">
          <bio:group>ModelViewParmSubset_2</bio:group>
        </bio:parameter>
        <bio:parameter value="0.25">
          <bio:group>ModelViewParmSubset_1</bio:group>
        </bio:parameter>
      </bio:specificAxialResistance>
    </biophysics>
  </cell>
</cells>
</neuroml>
