<?xml version="1.0" encoding="UTF-8"?>
<neuroml xmlns="http://morphml.org/neuroml/schema"
    xmlns:mml="http://morphml.org/morphml/schema"
    xmlns:meta="http://morphml.org/metadata/schema"
    xmlns:bio="http://morphml.org/biophysics/schema"
    xmlns:cml="http://morphml.org/channelml/schema"
    xmlns:xsi="http://www.w3.org/2001/XMLSchema-instance"
    xsi:schemaLocation="http://morphml.org/neuroml/schema NeuroML_Level2_v1.6.xsd"
    name = "NeuroML Level 2 file exported from NEURON"
    lengthUnits="micron">

<meta:notes>NeuroML Level 2 file generated by NEURON 6.1 ModelViewer
Authors: Michael Hines, Sushil Kambampati and Padraig Gleeson,
Yale University and UCL</meta:notes>

<cells>
  <cell name="TestSeg_inh_0">
    <meta:notes>Cell: TestSeg_inh_0 exported from NEURON ModelView</meta:notes>
    <segments  xmlns="http://morphml.org/morphml/schema"> <!-- Changing namespace from neuroml to morphml-->
      <segment id="0" name = "Seg0_Soma" cable = "0">
        <proximal x="0" y="-10" z="0" diameter="20"/>
        <distal x="0" y="10" z="0" diameter="20"/>
      </segment>
      <segment id="1" name = "Seg0_Section_1" parent="0" cable = "1">  <!-- Connected at 0.5 on parent section: TestSeg_inh[0].Soma  -->
        <proximal x="0" y="0" z="0" diameter="6"/>
        <distal x="0" y="20" z="0" diameter="6"/>
      </segment>
    </segments>
    <cables  xmlns="http://morphml.org/morphml/schema"> <!-- Changing namespace from neuroml to morphml-->
      <cable id = "0" name = "Soma" fractAlongParent = "0"/>
      <cable id = "1" name = "Section_1" fractAlongParent = "0.5"/>
      <cablegroup name="all"> <!-- Replacing subset name ModelViewParmSubset_0 with all, as it contains all sections -->
        <cable id = "0"/>
        <cable id = "1"/>
      </cablegroup>
      <cablegroup name="OneSecGrp_SectionRef_1"> <!-- Creating a group containing a single section... -->
        <cable id = "0"/>
      </cablegroup>
      <cablegroup name="OneSecGrp_SectionRef_2"> <!-- Creating a group containing a single section... -->
        <cable id = "1"/>
      </cablegroup>
    </cables>
    <biophysics  units = "Physiological Units"> <!-- Note: values of cond dens are different in NEURON and phy units-->
      <bio:mechanism name="pas" type="Channel Mechanism" passiveConductance="true">
        <bio:parameter name="gmax" value="0.3">
          <bio:group>all</bio:group>
        </bio:parameter>
        <bio:parameter name="e" value="-66.6">
          <bio:group>all</bio:group>
        </bio:parameter>
      </bio:mechanism>
      <bio:mechanism name="napf_spinstell" type="Channel Mechanism">
        <bio:parameter name="gmax" value="3.2">
          <bio:group>all</bio:group>
        </bio:parameter>
        <bio:parameter name="fastNa_shift" value="-2.5">
          <bio:group>OneSecGrp_SectionRef_1</bio:group>
        </bio:parameter>
        <bio:parameter name="fastNa_shift" value="5">
          <bio:group>OneSecGrp_SectionRef_2</bio:group>
        </bio:parameter>
        <bio:parameter name="a" value="0">
          <bio:group>all</bio:group>
        </bio:parameter>
        <bio:parameter name="b" value="0">
          <bio:group>all</bio:group>
        </bio:parameter>
        <bio:parameter name="c" value="0">
          <bio:group>all</bio:group>
        </bio:parameter>
        <bio:parameter name="dd" value="0">
          <bio:group>all</bio:group>
        </bio:parameter>
      </bio:mechanism>
      <bio:specificCapacitance>
        <bio:parameter value="1">
          <bio:group>all</bio:group>
        </bio:parameter>
      </bio:specificCapacitance>
      <bio:specificAxialResistance>
        <bio:parameter value="0.03">
          <bio:group>all</bio:group>
        </bio:parameter>
      </bio:specificAxialResistance>
    </biophysics>
  </cell>
</cells>
</neuroml>
