<?xml version="1.0" encoding="UTF-8"?>
<neuroml xmlns="http://morphml.org/neuroml/schema"
    xmlns:mml="http://morphml.org/morphml/schema"
    xmlns:meta="http://morphml.org/metadata/schema"
    xmlns:bio="http://morphml.org/biophysics/schema"
    xmlns:cml="http://morphml.org/channelml/schema"
    xmlns:xsi="http://www.w3.org/2001/XMLSchema-instance"
    xsi:schemaLocation="http://morphml.org/neuroml/schema NeuroML_Level2_v1.6.xsd"
    name = "NeuroML Level 2 file exported from NEURON"
    lengthUnits="micron">

<meta:notes>NeuroML Level 2 file generated by NEURON 6.1 ModelViewer
Authors: Michael Hines, Sushil Kambampati and Padraig Gleeson,
Yale University and UCL</meta:notes>

<cells>
  <cell name="tuftRS_0">
    <meta:notes>Cell: tuftRS_0 exported from NEURON ModelView</meta:notes>
    <segments  xmlns="http://morphml.org/morphml/schema"> <!-- Changing namespace from neuroml to morphml-->
      <segment id="0" name = "Seg0_comp_1" cable = "0">
        <proximal x="0" y="0" z="0" diameter="18"/>
        <distal x="12.5" y="0" z="0" diameter="18"/>
      </segment>
      <segment id="1" name = "Seg1_comp_1" parent="0" cable = "0">
        <distal x="25" y="0" z="0" diameter="18"/>
      </segment>
      <segment id="110" name = "Seg0_comp_56" parent="0" cable = "55">  <!-- Connected at 0 on parent section: tuftRS[0].comp[1]  -->
        <proximal x="0" y="0" z="0" diameter="1.8"/>
        <distal x="-12.5" y="1.09278e-06" z="0" diameter="1.8"/>
      </segment>
      <segment id="111" name = "Seg1_comp_56" parent="110" cable = "55">
        <distal x="-25" y="2.18557e-06" z="0" diameter="1.8"/>
      </segment>
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    </segments>
    <cables  xmlns="http://morphml.org/morphml/schema"> <!-- Changing namespace from neuroml to morphml-->
      <cable id = "0" name = "comp_1" fractAlongParent = "0"/>
      <cable id = "55" name = "comp_56" fractAlongParent = "0"/>
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      <cablegroup name="all"> <!-- Replacing subset name ModelViewParmSubset_0 with all, as it contains all sections -->
        <cable id = "0"/>
        <cable id = "55"/>
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      </cablegroup>
      <cablegroup name="ModelViewParmSubset_1">
        <cable id = "0"/>
        <cable id = "34"/>
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      </cablegroup>
      <cablegroup name="ModelViewParmSubset_2">
        <cable id = "0"/>
        <cable id = "55"/>
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      </cablegroup>
      <cablegroup name="ModelViewParmSubset_3">
        <cable id = "55"/>
        <cable id = "56"/>
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      </cablegroup>
      <cablegroup name="ModelViewParmSubset_4">
        <cable id = "0"/>
        <cable id = "55"/>
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      </cablegroup>
      <cablegroup name="ModelViewParmSubset_5">
        <cable id = "34"/>
        <cable id = "5"/>
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      </cablegroup>
      <cablegroup name="ModelViewParmSubset_6">
        <cable id = "34"/>
        <cable id = "5"/>
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      </cablegroup>
      <cablegroup name="ModelViewParmSubset_7">
        <cable id = "48"/>
        <cable id = "47"/>
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      </cablegroup>
      <cablegroup name="ModelViewParmSubset_8">
        <cable id = "5"/>
        <cable id = "4"/>
        <cable id = "1"/>
      </cablegroup>
      <cablegroup name="ModelViewParmSubset_9">
        <cable id = "34"/>
        <cable id = "3"/>
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      </cablegroup>
      <cablegroup name="ModelViewParmSubset_10">
        <cable id = "50"/>
        <cable id = "49"/>
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      </cablegroup>
      <cablegroup name="ModelViewParmSubset_11">
        <cable id = "37"/>
        <cable id = "38"/>
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      </cablegroup>
      <cablegroup name="ModelViewParmSubset_12">
        <cable id = "48"/>
        <cable id = "47"/>
      </cablegroup>
      <cablegroup name="ModelViewParmSubset_13">
        <cable id = "34"/>
        <cable id = "5"/>
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      </cablegroup>
      <cablegroup name="ModelViewParmSubset_14">
        <cable id = "16"/>
        <cable id = "15"/>
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      </cablegroup>
      <cablegroup name="ModelViewParmSubset_15">
        <cable id = "34"/>
        <cable id = "5"/>
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      </cablegroup>
      <cablegroup name="ModelViewParmSubset_16">
        <cable id = "16"/>
        <cable id = "15"/>
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      </cablegroup>
      <cablegroup name="ModelViewParmSubset_17">
        <cable id = "44"/>
        <cable id = "45"/>
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      </cablegroup>
      <cablegroup name="ModelViewParmSubset_18">
        <cable id = "5"/>
        <cable id = "4"/>
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      </cablegroup>
      <cablegroup name="ModelViewParmSubset_19">
        <cable id = "34"/>
        <cable id = "5"/>
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      </cablegroup>
      <cablegroup name="OneSecGrp_SectionRef_1"> <!-- Creating a group containing a single section... -->
        <cable id = "0"/>
      </cablegroup>
      <cablegroup name="OneSecGrp_SectionRef_1"> <!-- Creating a group containing a single section... -->
        <cable id = "0"/>
      </cablegroup>
      <cablegroup name="OneSecGrp_SectionRef_1"> <!-- Creating a group containing a single section... -->
        <cable id = "0"/>
      </cablegroup>
      <cablegroup name="OneSecGrp_SectionRef_1"> <!-- Creating a group containing a single section... -->
        <cable id = "0"/>
      </cablegroup>
      <cablegroup name="OneSecGrp_SectionRef_1"> <!-- Creating a group containing a single section... -->
        <cable id = "0"/>
      </cablegroup>
      <cablegroup name="OneSecGrp_SectionRef_1"> <!-- Creating a group containing a single section... -->
        <cable id = "0"/>
      </cablegroup>
      <cablegroup name="OneSecGrp_SectionRef_1"> <!-- Creating a group containing a single section... -->
        <cable id = "0"/>
      </cablegroup>
      <cablegroup name="OneSecGrp_SectionRef_1"> <!-- Creating a group containing a single section... -->
        <cable id = "0"/>
      </cablegroup>
      <cablegroup name="OneSecGrp_SectionRef_1"> <!-- Creating a group containing a single section... -->
        <cable id = "0"/>
      </cablegroup>
      <cablegroup name="OneSecGrp_SectionRef_1"> <!-- Creating a group containing a single section... -->
        <cable id = "0"/>
      </cablegroup>
      <cablegroup name="OneSecGrp_SectionRef_3"> <!-- Creating a group containing a single section... -->
        <cable id = "34"/>
      </cablegroup>
      <cablegroup name="OneSecGrp_SectionRef_1"> <!-- Creating a group containing a single section... -->
        <cable id = "0"/>
      </cablegroup>
      <cablegroup name="OneSecGrp_SectionRef_1"> <!-- Creating a group containing a single section... -->
        <cable id = "0"/>
      </cablegroup>
      <cablegroup name="OneSecGrp_SectionRef_3"> <!-- Creating a group containing a single section... -->
        <cable id = "34"/>
      </cablegroup>
      <cablegroup name="OneSecGrp_SectionRef_1"> <!-- Creating a group containing a single section... -->
        <cable id = "0"/>
      </cablegroup>
      <cablegroup name="OneSecGrp_SectionRef_3"> <!-- Creating a group containing a single section... -->
        <cable id = "34"/>
      </cablegroup>
    </cables>
    <biophysics  units = "Physiological Units"> <!-- Note: values of cond dens are different in NEURON and phy units-->
      <bio:mechanism name="pas" type="Channel Mechanism" passiveConductance="true">
        <bio:parameter name="gmax" value="0.02">
          <bio:group>OneSecGrp_SectionRef_1</bio:group>
        </bio:parameter>
        <bio:parameter name="gmax" value="0.04">
          <bio:group>ModelViewParmSubset_5</bio:group>
        </bio:parameter>
        <bio:parameter name="gmax" value="1">
          <bio:group>ModelViewParmSubset_3</bio:group>
        </bio:parameter>
        <bio:parameter name="e" value="-70">
          <bio:group>all</bio:group>
        </bio:parameter>
      </bio:mechanism>
      <bio:mechanism name="ar" type="Channel Mechanism">
        <bio:parameter name="gmax" value="0.1">
          <bio:group>OneSecGrp_SectionRef_1</bio:group>
        </bio:parameter>
        <bio:parameter name="gmax" value="0.2">
          <bio:group>ModelViewParmSubset_6</bio:group>
        </bio:parameter>
        <bio:parameter name="gmax" value="0.4">
          <bio:group>ModelViewParmSubset_7</bio:group>
        </bio:parameter>
        <bio:parameter name="erev" value="-35">
          <bio:group>ModelViewParmSubset_1</bio:group>
        </bio:parameter>
        <bio:parameter name="m0" value="0.25">
          <bio:group>ModelViewParmSubset_1</bio:group>
        </bio:parameter>
      </bio:mechanism>
      <bio:mechanism name="cad" type="Channel Mechanism">
        <bio:parameter name="phi" value="4333.33">
          <bio:group>OneSecGrp_SectionRef_1</bio:group>
        </bio:parameter>
        <bio:parameter name="phi" value="86666.7">
          <bio:group>ModelViewParmSubset_5</bio:group>
        </bio:parameter>
        <bio:parameter name="beta" value="0.01">
          <bio:group>OneSecGrp_SectionRef_1</bio:group>
        </bio:parameter>
        <bio:parameter name="beta" value="0.02">
          <bio:group>ModelViewParmSubset_8</bio:group>
        </bio:parameter>
        <bio:parameter name="beta" value="0.075">
          <bio:group>ModelViewParmSubset_9</bio:group>
        </bio:parameter>
      </bio:mechanism>
      <bio:mechanism name="cal" type="Channel Mechanism">
        <bio:parameter name="gmax" value="0.48">
          <bio:group>ModelViewParmSubset_10</bio:group>
        </bio:parameter>
        <bio:parameter name="gmax" value="0.8">
          <bio:group>ModelViewParmSubset_11</bio:group>
        </bio:parameter>
        <bio:parameter name="gmax" value="1.6">
          <bio:group>OneSecGrp_SectionRef_1</bio:group>
        </bio:parameter>
        <bio:parameter name="gmax" value="2.16">
          <bio:group>ModelViewParmSubset_12</bio:group>
        </bio:parameter>
        <bio:parameter name="gmax" value="3.2">
          <bio:group>ModelViewParmSubset_13</bio:group>
        </bio:parameter>
      </bio:mechanism>
      <bio:mechanism name="cat" type="Channel Mechanism">
        <bio:parameter name="gmax" value="0.1">
          <bio:group>OneSecGrp_SectionRef_1</bio:group>
        </bio:parameter>
        <bio:parameter name="gmax" value="0.2">
          <bio:group>ModelViewParmSubset_5</bio:group>
        </bio:parameter>
      </bio:mechanism>
      <bio:mechanism name="k2" type="Channel Mechanism">
        <bio:parameter name="gmax" value="0.5">
          <bio:group>ModelViewParmSubset_4</bio:group>
        </bio:parameter>
        <bio:parameter name="gmax" value="1">
          <bio:group>ModelViewParmSubset_5</bio:group>
        </bio:parameter>
      </bio:mechanism>
      <bio:mechanism name="ka" type="Channel Mechanism">
        <bio:parameter name="gmax" value="0.6">
          <bio:group>ModelViewParmSubset_3</bio:group>
        </bio:parameter>
        <bio:parameter name="gmax" value="1.2">
          <bio:group>ModelViewParmSubset_14</bio:group>
        </bio:parameter>
        <bio:parameter name="gmax" value="16">
          <bio:group>ModelViewParmSubset_15</bio:group>
        </bio:parameter>
        <bio:parameter name="gmax" value="20">
          <bio:group>OneSecGrp_SectionRef_1</bio:group>
        </bio:parameter>
      </bio:mechanism>
      <bio:mechanism name="kahp_deeppyr" type="Channel Mechanism">
        <bio:parameter name="gmax" value="0.2">
          <bio:group>OneSecGrp_SectionRef_1</bio:group>
        </bio:parameter>
        <bio:parameter name="gmax" value="0.4">
          <bio:group>ModelViewParmSubset_5</bio:group>
        </bio:parameter>
      </bio:mechanism>
      <bio:mechanism name="kc" type="Channel Mechanism">
        <bio:parameter name="gmax" value="1.8">
          <bio:group>ModelViewParmSubset_16</bio:group>
        </bio:parameter>
        <bio:parameter name="gmax" value="4.32">
          <bio:group>ModelViewParmSubset_17</bio:group>
        </bio:parameter>
        <bio:parameter name="gmax" value="28.8">
          <bio:group>OneSecGrp_SectionRef_1</bio:group>
        </bio:parameter>
        <bio:parameter name="gmax" value="57.6">
          <bio:group>ModelViewParmSubset_15</bio:group>
        </bio:parameter>
      </bio:mechanism>
      <bio:mechanism name="kdr" type="Channel Mechanism">
        <bio:parameter name="gmax" value="150">
          <bio:group>ModelViewParmSubset_18</bio:group>
        </bio:parameter>
        <bio:parameter name="gmax" value="170">
          <bio:group>OneSecGrp_SectionRef_1</bio:group>
        </bio:parameter>
        <bio:parameter name="gmax" value="240">
          <bio:group>OneSecGrp_SectionRef_3</bio:group>
        </bio:parameter>
        <bio:parameter name="gmax" value="450">
          <bio:group>ModelViewParmSubset_3</bio:group>
        </bio:parameter>
      </bio:mechanism>
      <bio:mechanism name="km" type="Channel Mechanism">
        <bio:parameter name="gmax" value="8">
          <bio:group>ModelViewParmSubset_17</bio:group>
        </bio:parameter>
        <bio:parameter name="gmax" value="8.5">
          <bio:group>OneSecGrp_SectionRef_1</bio:group>
        </bio:parameter>
        <bio:parameter name="gmax" value="27.2">
          <bio:group>ModelViewParmSubset_19</bio:group>
        </bio:parameter>
        <bio:parameter name="gmax" value="30">
          <bio:group>ModelViewParmSubset_3</bio:group>
        </bio:parameter>
      </bio:mechanism>
      <bio:mechanism name="naf" type="Channel Mechanism">
        <bio:parameter name="fastNa_shift" value="-3.5">
          <bio:group>all</bio:group>
        </bio:parameter>
        <bio:parameter name="a" value="0">
          <bio:group>all</bio:group>
        </bio:parameter>
        <bio:parameter name="b" value="0">
          <bio:group>all</bio:group>
        </bio:parameter>
        <bio:parameter name="c" value="0">
          <bio:group>all</bio:group>
        </bio:parameter>
        <bio:parameter name="d" value="0">
          <bio:group>all</bio:group>
        </bio:parameter>
        <bio:parameter name="gmax" value="6">
          <bio:group>ModelViewParmSubset_17</bio:group>
        </bio:parameter>
        <bio:parameter name="gmax" value="30">
          <bio:group>ModelViewParmSubset_16</bio:group>
        </bio:parameter>
        <bio:parameter name="gmax" value="150">
          <bio:group>ModelViewParmSubset_18</bio:group>
        </bio:parameter>
        <bio:parameter name="gmax" value="200">
          <bio:group>OneSecGrp_SectionRef_1</bio:group>
        </bio:parameter>
        <bio:parameter name="gmax" value="300">
          <bio:group>OneSecGrp_SectionRef_3</bio:group>
        </bio:parameter>
        <bio:parameter name="gmax" value="450">
          <bio:group>ModelViewParmSubset_3</bio:group>
        </bio:parameter>
      </bio:mechanism>
      <bio:mechanism name="nap" type="Channel Mechanism">
        <bio:parameter name="gmax" value="0.0048">
          <bio:group>ModelViewParmSubset_17</bio:group>
        </bio:parameter>
        <bio:parameter name="gmax" value="0.024">
          <bio:group>ModelViewParmSubset_16</bio:group>
        </bio:parameter>
        <bio:parameter name="gmax" value="0.12">
          <bio:group>ModelViewParmSubset_18</bio:group>
        </bio:parameter>
        <bio:parameter name="gmax" value="0.16">
          <bio:group>OneSecGrp_SectionRef_1</bio:group>
        </bio:parameter>
        <bio:parameter name="gmax" value="0.24">
          <bio:group>OneSecGrp_SectionRef_3</bio:group>
        </bio:parameter>
      </bio:mechanism>
      <bio:specificCapacitance>
        <bio:parameter value="0.9">
          <bio:group>ModelViewParmSubset_4</bio:group>
        </bio:parameter>
        <bio:parameter value="1.8">
          <bio:group>ModelViewParmSubset_5</bio:group>
        </bio:parameter>
      </bio:specificCapacitance>
      <bio:specificAxialResistance>
        <bio:parameter value="0.1">
          <bio:group>ModelViewParmSubset_3</bio:group>
        </bio:parameter>
        <bio:parameter value="0.25">
          <bio:group>ModelViewParmSubset_1</bio:group>
        </bio:parameter>
      </bio:specificAxialResistance>
    </biophysics>
  </cell>
</cells>
</neuroml>
